<Lems>
<!--
    This LEMS file has been generated by org.neuroml.importer.sbml.SBMLImporter (see https://github.com/NeuroML/org.neuroml.import)
         org.neuroml.import  v1.7.1
         org.neuroml.model   v1.7.1
         jLEMS               v0.10.3
-->

    <Dimension name="time" m="0" l="0" t="1" i="0" k="0" n="0" j="0"/>
    <Dimension name="per_time" m="0" l="0" t="-1" i="0" k="0" n="0" j="0"/>
    <Dimension name="voltage" m="1" l="2" t="-3" i="-1" k="0" n="0" j="0"/>
    <Dimension name="per_voltage" m="-1" l="-2" t="3" i="1" k="0" n="0" j="0"/>
    <Dimension name="conductance" m="-1" l="-2" t="3" i="2" k="0" n="0" j="0"/>
    <Dimension name="conductanceDensity" m="-1" l="-4" t="3" i="2" k="0" n="0" j="0"/>
    <Dimension name="capacitance" m="-1" l="-2" t="4" i="2" k="0" n="0" j="0"/>
    <Dimension name="specificCapacitance" m="-1" l="-4" t="4" i="2" k="0" n="0" j="0"/>
    <Dimension name="resistance" m="1" l="2" t="-3" i="-2" k="0" n="0" j="0"/>
    <Dimension name="resistivity" m="2" l="2" t="-3" i="-2" k="0" n="0" j="0"/>
    <Dimension name="charge" m="0" l="0" t="1" i="1" k="0" n="0" j="0"/>
    <Dimension name="charge_per_mole" m="0" l="0" t="1" i="1" k="0" n="-1" j="0"/>
    <Dimension name="current" m="0" l="0" t="0" i="1" k="0" n="0" j="0"/>
    <Dimension name="currentDensity" m="0" l="-2" t="0" i="1" k="0" n="0" j="0"/>
    <Dimension name="length" m="0" l="1" t="0" i="0" k="0" n="0" j="0"/>
    <Dimension name="area" m="0" l="2" t="0" i="0" k="0" n="0" j="0"/>
    <Dimension name="volume" m="0" l="3" t="0" i="0" k="0" n="0" j="0"/>
    <Dimension name="concentration" m="0" l="-3" t="0" i="0" k="0" n="1" j="0"/>
    <Dimension name="substance" m="0" l="0" t="0" i="0" k="0" n="1" j="0"/>
    <Dimension name="permeability" m="0" l="1" t="-1" i="0" k="0" n="0" j="0"/>
    <Dimension name="temperature" m="0" l="0" t="0" i="0" k="1" n="0" j="0"/>
    <Dimension name="idealGasConstantDims" m="1" l="2" t="-2" i="0" k="-1" n="-1" j="0"/>
    <Dimension name="conductance_per_voltage" m="-2" l="-4" t="6" i="3" k="0" n="0" j="0"/>
    <Dimension name="rho_factor" m="0" l="-1" t="-1" i="-1" k="0" n="1" j="0"/>
    <Dimension name="none" m="0" l="0" t="0" i="0" k="0" n="0" j="0"/>
    <Unit name="s" symbol="s" dimension="time" power="0" scale="1.0" offset="0.0"/>
    <Unit name="per_s" symbol="per_s" dimension="per_time" power="0" scale="1.0" offset="0.0"/>
    <Unit name="Hz" symbol="Hz" dimension="per_time" power="0" scale="1.0" offset="0.0"/>
    <Unit name="ms" symbol="ms" dimension="time" power="-3" scale="1.0" offset="0.0"/>
    <Unit name="per_ms" symbol="per_ms" dimension="per_time" power="3" scale="1.0" offset="0.0"/>
    <Unit name="min" symbol="min" dimension="time" power="0" scale="60.0" offset="0.0"/>
    <Unit name="per_min" symbol="per_min" dimension="per_time" power="0" scale="0.01666666667" offset="0.0"/>
    <Unit name="hour" symbol="hour" dimension="time" power="0" scale="3600.0" offset="0.0"/>
    <Unit name="per_hour" symbol="per_hour" dimension="per_time" power="0" scale="2.7777777778E-4" offset="0.0"/>
    <Unit name="m" symbol="m" dimension="length" power="0" scale="1.0" offset="0.0"/>
    <Unit name="cm" symbol="cm" dimension="length" power="-2" scale="1.0" offset="0.0"/>
    <Unit name="um" symbol="um" dimension="length" power="-6" scale="1.0" offset="0.0"/>
    <Unit name="m2" symbol="m2" dimension="area" power="0" scale="1.0" offset="0.0"/>
    <Unit name="cm2" symbol="cm2" dimension="area" power="-4" scale="1.0" offset="0.0"/>
    <Unit name="um2" symbol="um2" dimension="area" power="-12" scale="1.0" offset="0.0"/>
    <Unit name="m3" symbol="m3" dimension="volume" power="0" scale="1.0" offset="0.0"/>
    <Unit name="cm3" symbol="cm3" dimension="volume" power="-6" scale="1.0" offset="0.0"/>
    <Unit name="litre" symbol="litre" dimension="volume" power="-3" scale="1.0" offset="0.0"/>
    <Unit name="um3" symbol="um3" dimension="volume" power="-18" scale="1.0" offset="0.0"/>
    <Unit name="V" symbol="V" dimension="voltage" power="0" scale="1.0" offset="0.0"/>
    <Unit name="mV" symbol="mV" dimension="voltage" power="-3" scale="1.0" offset="0.0"/>
    <Unit name="per_V" symbol="per_V" dimension="per_voltage" power="0" scale="1.0" offset="0.0"/>
    <Unit name="per_mV" symbol="per_mV" dimension="per_voltage" power="3" scale="1.0" offset="0.0"/>
    <Unit name="ohm" symbol="ohm" dimension="resistance" power="0" scale="1.0" offset="0.0"/>
    <Unit name="kohm" symbol="kohm" dimension="resistance" power="3" scale="1.0" offset="0.0"/>
    <Unit name="Mohm" symbol="Mohm" dimension="resistance" power="6" scale="1.0" offset="0.0"/>
    <Unit name="S" symbol="S" dimension="conductance" power="0" scale="1.0" offset="0.0"/>
    <Unit name="mS" symbol="mS" dimension="conductance" power="-3" scale="1.0" offset="0.0"/>
    <Unit name="uS" symbol="uS" dimension="conductance" power="-6" scale="1.0" offset="0.0"/>
    <Unit name="nS" symbol="nS" dimension="conductance" power="-9" scale="1.0" offset="0.0"/>
    <Unit name="pS" symbol="pS" dimension="conductance" power="-12" scale="1.0" offset="0.0"/>
    <Unit name="S_per_m2" symbol="S_per_m2" dimension="conductanceDensity" power="0" scale="1.0" offset="0.0"/>
    <Unit name="mS_per_cm2" symbol="mS_per_cm2" dimension="conductanceDensity" power="1" scale="1.0" offset="0.0"/>
    <Unit name="S_per_cm2" symbol="S_per_cm2" dimension="conductanceDensity" power="4" scale="1.0" offset="0.0"/>
    <Unit name="F" symbol="F" dimension="capacitance" power="0" scale="1.0" offset="0.0"/>
    <Unit name="uF" symbol="uF" dimension="capacitance" power="-6" scale="1.0" offset="0.0"/>
    <Unit name="nF" symbol="nF" dimension="capacitance" power="-9" scale="1.0" offset="0.0"/>
    <Unit name="pF" symbol="pF" dimension="capacitance" power="-12" scale="1.0" offset="0.0"/>
    <Unit name="F_per_m2" symbol="F_per_m2" dimension="specificCapacitance" power="0" scale="1.0" offset="0.0"/>
    <Unit name="uF_per_cm2" symbol="uF_per_cm2" dimension="specificCapacitance" power="-2" scale="1.0" offset="0.0"/>
    <Unit name="ohm_m" symbol="ohm_m" dimension="resistivity" power="0" scale="1.0" offset="0.0"/>
    <Unit name="kohm_cm" symbol="kohm_cm" dimension="resistivity" power="1" scale="1.0" offset="0.0"/>
    <Unit name="ohm_cm" symbol="ohm_cm" dimension="resistivity" power="-2" scale="1.0" offset="0.0"/>
    <Unit name="C" symbol="C" dimension="charge" power="0" scale="1.0" offset="0.0"/>
    <Unit name="e" symbol="e" dimension="charge" power="0" scale="1.602176634E-19" offset="0.0"/>
    <Unit name="C_per_mol" symbol="C_per_mol" dimension="charge_per_mole" power="0" scale="1.0" offset="0.0"/>
    <Unit name="nA_ms_per_amol" symbol="nA_ms_per_amol" dimension="charge_per_mole" power="6" scale="1.0" offset="0.0"/>
    <Unit name="A" symbol="A" dimension="current" power="0" scale="1.0" offset="0.0"/>
    <Unit name="uA" symbol="uA" dimension="current" power="-6" scale="1.0" offset="0.0"/>
    <Unit name="nA" symbol="nA" dimension="current" power="-9" scale="1.0" offset="0.0"/>
    <Unit name="pA" symbol="pA" dimension="current" power="-12" scale="1.0" offset="0.0"/>
    <Unit name="A_per_m2" symbol="A_per_m2" dimension="currentDensity" power="0" scale="1.0" offset="0.0"/>
    <Unit name="uA_per_cm2" symbol="uA_per_cm2" dimension="currentDensity" power="-2" scale="1.0" offset="0.0"/>
    <Unit name="mA_per_cm2" symbol="mA_per_cm2" dimension="currentDensity" power="1" scale="1.0" offset="0.0"/>
    <Unit name="mol_per_m3" symbol="mol_per_m3" dimension="concentration" power="0" scale="1.0" offset="0.0"/>
    <Unit name="mol_per_cm3" symbol="mol_per_cm3" dimension="concentration" power="6" scale="1.0" offset="0.0"/>
    <Unit name="M" symbol="M" dimension="concentration" power="3" scale="1.0" offset="0.0"/>
    <Unit name="mM" symbol="mM" dimension="concentration" power="0" scale="1.0" offset="0.0"/>
    <Unit name="mol" symbol="mol" dimension="substance" power="0" scale="1.0" offset="0.0"/>
    <Unit name="m_per_s" symbol="m_per_s" dimension="permeability" power="0" scale="1.0" offset="0.0"/>
    <Unit name="cm_per_s" symbol="cm_per_s" dimension="permeability" power="-2" scale="1.0" offset="0.0"/>
    <Unit name="um_per_ms" symbol="um_per_ms" dimension="permeability" power="-3" scale="1.0" offset="0.0"/>
    <Unit name="cm_per_ms" symbol="cm_per_ms" dimension="permeability" power="1" scale="1.0" offset="0.0"/>
    <Unit name="degC" symbol="degC" dimension="temperature" power="0" scale="1.0" offset="273.15"/>
    <Unit name="K" symbol="K" dimension="temperature" power="0" scale="1.0" offset="0.0"/>
    <Unit name="J_per_K_per_mol" symbol="J_per_K_per_mol" dimension="idealGasConstantDims" power="0" scale="1.0" offset="0.0"/>
    <Unit name="S_per_V" symbol="S_per_V" dimension="conductance_per_voltage" power="0" scale="1.0" offset="0.0"/>
    <Unit name="nS_per_mV" symbol="nS_per_mV" dimension="conductance_per_voltage" power="-6" scale="1.0" offset="0.0"/>
    <Unit name="mol_per_m_per_A_per_s" symbol="mol_per_m_per_A_per_s" dimension="rho_factor" power="0" scale="1.0" offset="0.0"/>
    <Unit name="mol_per_cm_per_uA_per_ms" symbol="mol_per_cm_per_uA_per_ms" dimension="rho_factor" power="11" scale="1.0" offset="0.0"/>
    <Unit name="none" symbol="none" dimension="none" power="0" scale="1.0" offset="0.0"/>
    <ComponentType name="Display" standalone="false">
        <Parameter name="xmin" dimension="none"/>
        <Parameter name="xmax" dimension="none"/>
        <Parameter name="ymin" dimension="none"/>
        <Parameter name="ymax" dimension="none"/>
        <Parameter name="timeScale" dimension="time"/>
        <Children name="lines" type="Line"/>
        <Simulation idCounter="0">
            <DataDisplay title="title" dataRegion="xmin,xmax,ymin,ymax"/>
        </Simulation>
        <Text name="title"/>
    </ComponentType>
    <ComponentType name="Line" standalone="false">
        <Parameter name="scale" dimension="*"/>
        <Parameter name="timeScale" dimension="*"/>
        <Simulation idCounter="0">
            <Record quantity="quantity" timeScale="timeScale" scale="scale" color="color"/>
        </Simulation>
        <Path name="quantity"/>
        <Text name="color"/>
    </ComponentType>
    <ComponentType name="Simulation" standalone="false">
        <Parameter name="length" dimension="time"/>
        <Parameter name="step" dimension="time"/>
        <Children name="displays" type="Display"/>
        <Children name="outputs" type="OutputFile"/>
        <Children name="events" type="EventOutputFile"/>
        <ComponentReference name="target" type="Component" isAny="true" local="false" required="true"/>
        <Dynamics simultaneous="false">
            <StateVariable name="t" dimension="time"/>
        </Dynamics>
        <Simulation idCounter="0">
            <Run component="target" variable="t" increment="step" total="length"/>
        </Simulation>
        <Text name="seed"/>
    </ComponentType>
    <ComponentType name="OutputFile" standalone="false">
        <Children name="outputColumn" type="OutputColumn"/>
        <Simulation idCounter="0">
            <DataWriter path="path" fileName="fileName"/>
        </Simulation>
        <Text name="path"/>
        <Text name="fileName"/>
    </ComponentType>
    <ComponentType name="OutputColumn" standalone="false">
        <Simulation idCounter="0">
            <Record quantity="quantity"/>
        </Simulation>
        <Path name="quantity"/>
    </ComponentType>
    <ComponentType name="EventOutputFile" standalone="false">
        <Children name="eventSelection" type="EventSelection"/>
        <Simulation idCounter="0">
            <EventWriter path="path" fileName="fileName" format="format"/>
        </Simulation>
        <Text name="path"/>
        <Text name="fileName"/>
        <Text name="format"/>
    </ComponentType>
    <ComponentType name="EventSelection" standalone="false">
        <Simulation idCounter="0">
            <EventRecord quantity="select" eventPort="eventPort"/>
        </Simulation>
        <Path name="select"/>
        <Text name="eventPort"/>
    </ComponentType>
    <ComponentType name="model_0000001" standalone="false">
        <Parameter name="a" dimension="none"/>
        <Parameter name="b" dimension="none"/>
        <Parameter name="c" dimension="none"/>
        <Parameter name="d" dimension="none"/>
        <Parameter name="Vthresh" dimension="none"/>
        <Exposure name="i" dimension="none"/>
        <Exposure name="v" dimension="none"/>
        <Exposure name="U" dimension="none"/>
        <Dynamics simultaneous="false">
            <StateVariable name="i" dimension="none" exposure="i"/>
            <StateVariable name="v" dimension="none" exposure="v"/>
            <StateVariable name="U" dimension="none" exposure="U"/>
            <StateVariable name="time" dimension="none"/>
            <TimeDerivative variable="i" value="tscale * 0"/>
            <TimeDerivative variable="v" value="tscale * (((((0.04 * (v ^ 2.0)) + (5.0 * v)) + (140.0 - U)) + i))"/>
            <TimeDerivative variable="U" value="tscale * ((a * ((b * v) - U)))"/>
            <TimeDerivative variable="time" value="1"/>
            <OnStart>
                <StateAssignment variable="i" value="0.0"/>
                <StateAssignment variable="v" value="-70.0"/>
                <StateAssignment variable="U" value="-14.0"/>
            </OnStart>
            <OnCondition test="v .gt. Vthresh">
                <StateAssignment variable="v" value="c"/>
                <StateAssignment variable="U" value="(U + d)"/>
            </OnCondition>
            <OnCondition test="(t * tscale)  .gt. 10">
                <StateAssignment variable="i" value="10.0"/>
            </OnCondition>
        </Dynamics>
        <Constant name="tscale" value="1per_s" dimension="per_time"/>
        <Constant name="cell" value="1.0" dimension="none"/>
    </ComponentType>
    <model_0000001 id="model_0000001_0" a="0.02" b="0.2" c="-65.0" d="8.0" Vthresh="30.0"/>
    <Simulation id="sim1" target="model_0000001_0" length="140.0s" step="0.01s">
        <Display id="disp1" timeScale="1s" title="Simulation of SBML model: model_0000001 from file: BIOMD0000000127_url.xml" xmin="0" xmax="140.0" ymin="0" ymax="1">
            <Line id="i__P" scale="1" quantity="i" color="#000000" timeScale="1 s"/>
            <Line id="v__P" scale="1" quantity="v" color="#ff0000" timeScale="1 s"/>
            <Line id="U__P" scale="1" quantity="U" color="#00ff00" timeScale="1 s"/>
        </Display>
        <OutputFile id="outputFile1" fileName="model_0000001.dat" path=".">
            <OutputColumn id="op_i" quantity="i"/>
            <OutputColumn id="op_v" quantity="v"/>
            <OutputColumn id="op_U" quantity="U"/>
        </OutputFile>
    </Simulation>
    <Target component="sim1"/>
</Lems>
