<Lems>

<!-- Specify which component to run -->
<Target component="sim1" reportFile="report.regular.__SIMULATOR__.txt"/>

<!-- Include core NeuroML2 ComponentType definitions -->
<Include file="Cells.xml"/>
<Include file="Networks.xml"/>
<Include file="Simulation.xml"/>

<Include file="HindmarshRose3d.xml"/>

<!-- parameter set for regular saddle-node/homoclinic (aka square wave) bursting -->
<hindmarshRoseCell id="hr_regular" a="1.0" b="3.0" c="-3.0"
    d="5.0" s="4.0" I="5.0" x1="-1.3" r="0.002"
    x0="-1.1" y0="-9" z0="1.0"/>

<network id="net1">
    <population id="hr_regular_pop" component="hr_regular" size="1"/>
</network>

<Simulation id="sim1" length="1400s" step="0.0025s" target="net1">

    <Display id="d1" title="Hindmarsh-Rose example run"
        timeScale="1s" xmin="-100" xmax="1500" ymin="-3" ymax="3">
        <Line id ="x" quantity="hr_regular_pop[0]/x" scale="1"
            color="#000000" timeScale="1s"/>
    </Display>

    <Display id="d2" title="y timeseries"
        timeScale="1s" xmin="-100" xmax="1500" ymin="-20" ymax="0">
        <Line id ="y" quantity="hr_regular_pop[0]/y" scale="1"
            color="#0000ff" timeScale="1s"/>
    </Display>

    <Display id="d3" title="z timeseries"
        timeScale="1s" xmin="-100" xmax="1500" ymin="0.5" ymax="1.5">
        <Line id ="z" quantity="hr_regular_pop[0]/z" scale="1"
            color="#00ff00" timeScale="1s"/>
    </Display>

    <OutputFile id="of0" fileName="hr.dat">
      <OutputColumn id="x" quantity="hr_regular_pop[0]/x"/>
      <OutputColumn id="y" quantity="hr_regular_pop[0]/y"/>
      <OutputColumn id="z" quantity="hr_regular_pop[0]/z"/>
    </OutputFile>

</Simulation>

</Lems>
