<?xml version="1.0" encoding="UTF-8"?>

<neuroml xmlns="http://www.neuroml.org/schema/neuroml2"
         xmlns:xsi="http://www.w3.org/2001/XMLSchema-instance"
         xsi:schemaLocation="http://www.neuroml.org/schema/neuroml2  https://raw.githubusercontent.com/NeuroML/NeuroML2/master/Schemas/NeuroML2/NeuroML_v2beta4.xsd"
         id="Test">

    <include href="Lavrentovich2008.xml"/>

    <izhikevich2007Cell id="RS" v0 = "-60mV" C="100 pF" k = "0.7 nS_per_mV"
                            vr = "-60 mV" vt = "-40 mV" vpeak = "35 mV"
                            a = "0.03 per_ms" b = "-2 nS" c = "-50 mV" d = "100 pA"/>

    <pulseGenerator id="RS_Iext" delay="1s" duration="2s" amplitude="100 pA"/>

    <network id="Test">

        <notes>Test network with a NeuroML 2 based cell (izhikevich2007Cell) together with an SBML based one</notes>
        <property tag="recommended_dt_ms" value="1"/>
        <property tag="recommended_duration_ms" value="1000000"/>

        <population id="izhpop" component="RS" type="populationList" size="1">
            <instance id="0">
                <location x="0" y="0" z="0"/>
            </instance>
        </population>
        <population id="testpop" component="LavrentovichSBML" type="populationList" size="1">
            <instance id="0">
                <location x="100" y="0" z="0"/>
            </instance>
        </population>

        <inputList id="IClampInput" component="RS_Iext" population="izhpop">
            <input id="0" target="../izhpop/0/RS" destination="synapses"/>
        </inputList>

    </network>

</neuroml>
