<?xml version="1.0" encoding="UTF-8"?>

<neuroml xmlns="http://www.neuroml.org/schema/neuroml2"
         xmlns:xsi="http://www.w3.org/2001/XMLSchema-instance"
         xsi:schemaLocation="http://www.neuroml.org/schema/neuroml2  https://raw.githubusercontent.com/NeuroML/NeuroML2/master/Schemas/NeuroML2/NeuroML_v2beta4.xsd"
         id="Test">

    <include href="Lavrentovich2008.xml"/>
    <include href="LavrentovichMulti.xml"/>

    <network id="Test">

        <notes>Testing...</notes>
        <property tag="recommended_dt_ms" value="10"/>
        <property tag="recommended_duration_ms" value="1000000"/>

        <population id="cellA" component="LavrentovichA" type="populationList" size="1">
            <instance id="0">
                <location x="0" y="0" z="0"/>
            </instance>
        </population>

        <population id="cellB" component="LavrentovichB" type="populationList" size="1">
            <instance id="0">
                <location x="20" y="0" z="0"/>
            </instance>
        </population>

        <population id="cellC" component="LavrentovichC" type="populationList" size="1">
            <instance id="0">
                <location x="40" y="0" z="0"/>
            </instance>
        </population>

    </network>

</neuroml>
