// SBML level 3 version 1
// dcterms:bibliographicCitation: http://identifiers.org/pubmed/12771127

function Function_for_PIPSyn(PI_PM, Ratebasal_PIPsyn_PIPSyn, Ratestim_PIPsyn_PIPSyn)
  (Ratebasal_PIPsyn_PIPSyn + Ratestim_PIPsyn_PIPSyn)*PI_PM;
end

function Function_for_PLCact(KfPLCact, PLC_PM, PLC_act_PM, krPLCact, signal_PLCact, stim_PM)
  KfPLCact*PLC_PM*stim_PM*signal_PLCact + (-(krPLCact*PLC_act_PM));
end

function Function_for_IP3_PHGFP(IP3_Cyt, IP3_PHGFP_Cyt, KMOLE, PH_GFP_Cyt, kf_IP3PH_IP3_PHGFP, kr_IP3PH_IP3_PHGFP)
  (kf_IP3PH_IP3_PHGFP*0.00166113*IP3_Cyt*0.00166113*PH_GFP_Cyt + (-(kr_IP3PH_IP3_PHGFP*0.00166113*IP3_PHGFP_Cyt)))*1*(1/KMOLE);
end
Function_for_IP3_PHGFP is "Function for IP3-PHGFP";

function Function_for_PIP2_PH(PH_GFP_Cyt, PIP2_PHGFP_PM, PIP2_PM, PM, kf_PIP2PH_PIP2_PH, kr_PIP2PH_PIP2_PH)
  (kf_PIP2PH_PIP2_PH*0.00166113*PH_GFP_Cyt*PIP2_PM + (-(kr_PIP2PH_PIP2_PH*PIP2_PHGFP_PM)))*PM;
end

function Function_for_PIP2_PH_hyd(PIP2_PHGFP_PM, PLC_act_PM, PM, k_PIP2PHhyd)
  k_PIP2PHhyd*PLC_act_PM*PIP2_PHGFP_PM*PM;
end

function Function_for_IP3deg(IP3_Cyt, IP3_basal, KMOLE, kIP3deg)
  kIP3deg*(0.00166113*IP3_Cyt + (-IP3_basal))*1*(1/KMOLE);
end

function Function_for_PIP2Syn(PIP_PM, Rate_PIP2SynStim_PIP2Syn, Rate_PIP2Synbasal_PIP2Syn)
  (Rate_PIP2Synbasal_PIP2Syn + Rate_PIP2SynStim_PIP2Syn)*PIP_PM;
end

function Function_for_PIP2_hyd(PIP2_PM, PLC_act_PM, PM, k_PIP2hyd)
  k_PIP2hyd*PIP2_PM*PLC_act_PM*PM;
end

model Xu2003_Phosphoinositide_turnover()
  // Xu2003 - Phosphoinositide turnover
  // The model reproduces the percentage change of PIP_PM, PIP2_PM and IP3_Cyt as depicted in Figure 1 of the paper. The model also contains the equations for the analysis of PH-GFP experiments, however the initial value of PH_GFP has been set to zero to more accurately reproduce Figure 1. The units of cytosolic species are given in molecules/um^3. In order to convert them to uM, divide the concentration by 602. For the analysis of PH_GFP experiments, one should plug in the values of PH_GFP, IP3_PHGFP and PIP2_PHGFP from Table AI in the appendix. The model was successfully tested on MathSBML.
  // This model has been generated by VCell
  // This model is described in the article:
  // Kinetic analysis of receptor-activated phosphoinositide turnover.
  // Xu C, Watras J, Loew LM.
  // J. Cell Biol. 2003 May; 161(4): 779-791
  // Abstract:
  // We studied the bradykinin-induced changes in phosphoinositide composition of N1E-115 neuroblastoma cells using a combination of biochemistry, microscope imaging, and mathematical modeling. Phosphatidylinositol-4,5-bisphosphate (PIP2) decreased over the first 30 s, and then recovered over the following 2-3 min. However, the rate and amount of inositol-1,4,5-trisphosphate (InsP3) production were much greater than the rate or amount of PIP2 decline. A mathematical model of phosphoinositide turnover based on this data predicted that PIP2 synthesis is also stimulated by bradykinin, causing an early transient increase in its concentration. This was subsequently confirmed experimentally. Then, we used single-cell microscopy to further examine phosphoinositide turnover by following the translocation of the pleckstrin homology domain of PLCdelta1 fused to green fluorescent protein (PH-GFP). The observed time course could be simulated by incorporating binding of PIP2 and InsP3 to PH-GFP into the model that had been used to analyze the biochemistry. Furthermore, this analysis could help to resolve a controversy over whether the translocation of PH-GFP from membrane to cytosol is due to a decrease in PIP2 on the membrane or an increase in InsP3 in cytosol; by computationally clamping the concentrations of each of these compounds, the model shows how both contribute to the dynamics of probe translocation.
  // This model is hosted on BioModels Database and identified by: BIOMD0000000075 .
  // To cite BioModels Database, please use: BioModels Database: An enhanced, curated and annotated resource for published quantitative kinetic models .
  // To the extent possible under law, all copyright and related or neighbouring rights to this encoded model have been dedicated to the public domain worldwide. Please refer to CC0 Public Domain Dedication for more information.
  // biomodels.db:MODEL3095606944 biomodels.db:BIOMD0000000075
  // biomodels.db:MODEL3095606944
  // biomodels.db:BIOMD0000000075
  // isPartOf kegg.pathway:map04070
  // isVersionOf GO:0046488
  // occursIn BTO:0000931
  // model units - substance: substance, time: time, volume: volume, area: area, length: length, extent: substance

  // Compartments:
  compartment Extracellular = 0.2777778 volume;  // GO:0005576
  compartment PM = 0.5555556 volume;  // 2-D; GO:0005886
  compartment Cytosol = 1 volume;  // GO:0005622
  compartment NM = 0.1111111 volume;  // 2-D; GO:0031965
  compartment Nucleus = 0.1111111 volume;  // GO:0005634

  // Species:
  species PIP2_PHGFP_PM in PM = 0;  // hasPart CHEBI:18348; hasPart interpro:IPR011584; hasPart interpro:IPR001849
  species PH_GFP_Cyt in Cytosol = 0;  // hasPart interpro:IPR001849; hasPart interpro:IPR011584
  species PI_PM in PM = 142857;  // isVersionOf CHEBI:28874
  species $stim_PM in PM = 1;  // hasProperty opb:OPB_01072; hasProperty opb:OPB_01072
  species IP3_PHGFP_Cyt in Cytosol = 0;  // hasPart interpro:IPR001849; hasPart CHEBI:16595; hasPart interpro:IPR011584
  species PIP2_PM in PM = 4000;  // isVersionOf CHEBI:18348
  species PIP_PM in PM = 2857;  // isVersionOf CHEBI:26034
  species DAG_PM in PM = 2000;  // isVersionOf CHEBI:18035
  species $hv_Cytosol in Cytosol = 0;  // isVersionOf CHEBI:30212
  species $IP3X_Cytosol in Cytosol = 0;  // PATO:0002355; isVersionOf CHEBI:16595
  species PLC_PM in PM = 100;  // isVersionOf uniprot:Q8K4S1
  species PLC_act_PM in PM = 0;  // isVersionOf uniprot:Q8K4S1; hasProperty ec-code:3.1.4.11; hasProperty ec-code:3.1.4.11
  species IP3_Cyt in Cytosol = 96.32;  // isVersionOf CHEBI:16595

  // Parameters:
  KMOLE = 0.00166113 unit_0;
  PIP_basal_PIPSyn = 2857 unit_1;
  kBasalSynPIP_PIPSyn = 0.0055 unit_2;
  kStimSynPIP_PIPSyn = 0.019 unit_2;
  tauPIPsyn_PIPSyn = 0.05 unit_3;
  PIPsyndecay_PIPSyn = 1 unit_3;
  Ratebasal_PIPsyn_PIPSyn has unit_2;
  Ratestim_PIPsyn_PIPSyn has unit_2;
  tau0_PLCact = 0.05 unit_3;
  stimdecay_PLCact = 1 unit_3;
  signal_PLCact has unit_4;
  kf_PIP2PH_PIP2_PH = 0.12 unit_5;
  KdPIP2PH_PIP2_PH = 2 unit_6;
  kr_PIP2PH_PIP2_PH has unit_2;
  kStimSynPIP2_PIP2Syn = 0.92 unit_2;
  tauPIP2syn_PIP2Syn = 0.05 unit_3;
  PIP2syndecay_PIP2Syn = 1 unit_3;
  PIP2_basal_PIP2Syn = 4000 unit_1;
  kBasalSynPIP2_PIP2Syn = 0.048 unit_2;
  Rate_PIP2Synbasal_PIP2Syn has unit_2;
  Rate_PIP2SynStim_PIP2Syn has unit_2;
  kf_IP3PH_IP3_PHGFP = 10 unit_5;
  KdIP3PH_IP3_PHGFP = 2 unit_6;
  kr_IP3PH_IP3_PHGFP has unit_2;

  // Assignment rules:
  Rate_PIP2SynStim_PIP2Syn := piecewise(kStimSynPIP2_PIP2Syn*exp(-((time + (-tauPIP2syn_PIP2Syn))*(1/PIP2syndecay_PIP2Syn))), time > tauPIP2syn_PIP2Syn, 0);
  signal_PLCact := piecewise(exp(-((time + (-tau0_PLCact))*(1/stimdecay_PLCact))), time > tau0_PLCact, 0);
  Rate_PIP2Synbasal_PIP2Syn := piecewise(0.581*kBasalSynPIP2_PIP2Syn*(-1 + exp((PIP2_basal_PIP2Syn + (-PIP2_PM))*(1/PIP2_basal_PIP2Syn))), PIP2_PM < PIP2_basal_PIP2Syn, 0);
  kr_PIP2PH_PIP2_PH := kf_PIP2PH_PIP2_PH*KdPIP2PH_PIP2_PH;
  kr_IP3PH_IP3_PHGFP := kf_IP3PH_IP3_PHGFP*KdIP3PH_IP3_PHGFP;
  Ratestim_PIPsyn_PIPSyn := piecewise(kStimSynPIP_PIPSyn*exp(-((time + (-tauPIPsyn_PIPSyn))*(1/PIPsyndecay_PIPSyn))), time > tauPIPsyn_PIPSyn, 0);
  Ratebasal_PIPsyn_PIPSyn := piecewise(0.581*kBasalSynPIP_PIPSyn*(-1 + exp((PIP_basal_PIPSyn + (-PIP_PM))*(1/PIP_basal_PIPSyn))), PIP_PM < PIP_basal_PIPSyn, 0);

  // Reactions:
  PIPSyn: PI_PM -> PIP_PM; PM*Function_for_PIPSyn(PI_PM, Ratebasal_PIPsyn_PIPSyn, Ratestim_PIPsyn_PIPSyn);
  PIP2_hyd: PIP2_PM -> DAG_PM + IP3_Cyt; Function_for_PIP2_hyd(PIP2_PM, PLC_act_PM, PM, k_PIP2hyd);  // modifiers: PLC_act_PM
    k_PIP2hyd = 2.4;
  PLCact: PLC_PM -> PLC_act_PM; PM*Function_for_PLCact(KfPLCact, PLC_PM, PLC_act_PM, krPLCact, signal_PLCact, stim_PM);  // modifiers: stim_PM
    KfPLCact = 0.0005; krPLCact = 0.1;
  PIP2_PH_hyd: PIP2_PHGFP_PM -> PH_GFP_Cyt + IP3_Cyt + DAG_PM; Function_for_PIP2_PH_hyd(PIP2_PHGFP_PM, PLC_act_PM, PM, k_PIP2PHhyd);  // modifiers: PLC_act_PM
    k_PIP2PHhyd = 0;
  PIP2_PH: PH_GFP_Cyt + PIP2_PM -> PIP2_PHGFP_PM; Function_for_PIP2_PH(PH_GFP_Cyt, PIP2_PHGFP_PM, PIP2_PM, PM, kf_PIP2PH_PIP2_PH, kr_PIP2PH_PIP2_PH);
  IP3deg: IP3_Cyt -> ; Cytosol*Function_for_IP3deg(IP3_Cyt, IP3_basal, KMOLE, kIP3deg);
    IP3_basal = 0.16; kIP3deg = 0.08;
  PIP2Syn: PIP_PM -> PIP2_PM; PM*Function_for_PIP2Syn(PIP_PM, Rate_PIP2SynStim_PIP2Syn, Rate_PIP2Synbasal_PIP2Syn);
  IP3_PHGFP: IP3_Cyt + PH_GFP_Cyt -> IP3_PHGFP_Cyt; Cytosol*Function_for_IP3_PHGFP(IP3_Cyt, IP3_PHGFP_Cyt, KMOLE, PH_GFP_Cyt, kf_IP3PH_IP3_PHGFP, kr_IP3PH_IP3_PHGFP); IP3_PHGFP is "IP3-PHGFP";

  // Unit definitions:
  unit length = metre;
  unit area = (1e-6 metre)^2;
  unit volume = litre;
  unit time = second;
  unit substance = item;
  unit unit_0 = 1e-18 avogadro; unit_0 is "aAvogadro";
  unit unit_1 = item / (1000000 metre)^2; unit_1 is "#/Mm²";
  unit unit_2 = 1 / second; unit_2 is "1/s";
  unit unit_3 = second; unit_3 is "s";
  unit unit_4 = dimensionless^0; unit_4 is "1";
  unit unit_5 = (1e-9 dimensionless)^0 * metre^3 / (mole * second); unit_5 is "µl/(mol*s)";
  unit unit_6 = (1e-6 dimensionless)^0 * item * avogadro / litre; unit_6 is "µmol/l";
end
