// SBML level 2 version 1

model Model_0()
  // Bornheimer2004_GTPaseCycle
  // This model is according to the paper Computational modeling reveals how interplay between components of a GTPase-cycle module regulates signal transduction by Bornheimer et al 2004.The figure 3 is reproduced by Copasi 4.0.19 (development) .It is three-dimensional logarithmic plots show the output of simulations of Z and v at various concentrations of R and GAP.
  // To the extent possible under law, all copyright and related or neighbouring rights to this encoded model have been dedicated to the public domain worldwide. Please refer to CC0 Public Domain Dedication for more information.
  // In summary, you are entitled to use this encoded model in absolutely any manner you deem suitable, verbatim, or with modification, alone or embedded it in a larger context, redistribute it, commercially or not, in a restricted way or not.
  // To cite BioModels Database, please use: Li C, Donizelli M, Rodriguez N, Dharuri H, Endler L, Chelliah V, Li L, He E, Henry A, Stefan MI, Snoep JL, Hucka M, Le Novère N, Laibe C (2010) BioModels Database: An enhanced, curated and annotated resource for published quantitative kinetic models. BMC Syst Biol., 4:92.
  // biomodels.db:MODEL4822989369
  // biomodels.db:BIOMD0000000086
  // isDescribedBy pubmed:15520372
  // hasTaxon taxonomy:131567
  // isVersionOf GO:0008277
  // hasProperty mamo:MAMO_0000046

  // Compartments:
  compartment cell = 1;  // isVersionOf GO:0005623

  // Species:
  // GAP
  species A in cell = 0;  // isVersionOf interpro:IPR000342
  // inactive G protein
  species G in cell = 1e-8;  // GO:0005834
  species GA in cell = 0;  // hasPart interpro:IPR000342 GO:0005834
  // GTP
  species T in cell = 0.000468;  // CHEBI:15996 kegg.compound:C00044
  // Receptor
  species R in cell = 1e-6;  // hasVersion interpro:IPR000337; isVersionOf GO:0043235
  // active G protein
  species G_T in cell = 0; G_T is "G*T";  // hasPart CHEBI:15996 GO:0005834
  species GD in cell = 0;  // hasPart CHEBI:17552 GO:0005834
  species Pi in cell = 0.0044;  // CHEBI:18367
  // GDP
  species D in cell = 0.000149;  // CHEBI:17552 kegg.compound:C00035
  species RG in cell = 0;  // hasPart GO:0043235 GO:0005834
  species RG_T in cell = 0; RG_T is "RG*T";  // hasPart CHEBI:15996 GO:0043235 GO:0005834
  species G_AT in cell = 0; G_AT is "G*AT";  // hasPart CHEBI:15996 interpro:IPR000342 GO:0005834
  species GAD in cell = 0;  // hasPart CHEBI:17552 interpro:IPR000342 GO:0005834
  species RGD in cell = 0;  // hasPart CHEBI:17552 GO:0043235 GO:0005834
  species RGA in cell = 0;  // hasPart interpro:IPR000342 GO:0043235 GO:0005834
  species RG_AT in cell = 0; RG_AT is "RG*AT";  // hasPart CHEBI:15996 interpro:IPR000342 GO:0043235 GO:0005834
  species RGAD in cell = 0;  // hasPart CHEBI:17552 interpro:IPR000342 GO:0043235 GO:0005834

  // Parameters:
  // fractional activity of G proteins
  var Z;
  // GTP hydrolytic rate
  var v;

  // Assignment rules:
  // The [Gtot]=the initial value of [G]=10e-9 M
  Z := (G_T + RG_T + RG_AT + G_AT)/1e-8;
  // The [Gtot]=the initial value of [G]=10e-9 M
  v := (25*RG_AT + 25*G_AT + 0.013*RG_T + 0.013*G_T)/1e-8;

  // Reactions:
  G_protein_binding_GAP: G + A -> GA; cell*(G_protein_binding_GAP_k1*G*A - G_protein_binding_GAP_k2*GA);  // isVersionOf GO:0005515
    G_protein_binding_GAP_k1 = 8780000; G_protein_binding_GAP_k2 = 8;
  G_protein_binding_GTP: G + T -> G_T; cell*(G_protein_binding_GTP_k1*G*T - G_protein_binding_GTP_k2*G_T);  // isVersionOf GO:0005515 GO:0005525
    G_protein_binding_GTP_k1 = 529000; G_protein_binding_GTP_k2 = 8.38e-6;
  G_binding_Receptor: G + R -> RG; cell*(G_binding_Receptor_k1*G*R - G_binding_Receptor_k2*RG);  // isVersionOf GO:0001664
    G_binding_Receptor_k1 = 636000000; G_binding_Receptor_k2 = 0.0179;
  G_T_hydrolysis: G_T -> GD + Pi; cell*(G_T_hydrolysis_k1*G_T - G_T_hydrolysis_k2*GD*Pi); G_T_hydrolysis is "G*T hydrolysis";  // hasVersion reactome:REACT_348; isVersionOf GO:0003924
    G_T_hydrolysis_k1 = 0.013; G_T_hydrolysis_k2 = 9.03e-7;
  GD_dissociation: GD -> G + D; cell*(GD_dissociation_k1*GD - GD_dissociation_k2*G*D);  // isVersionOf GO:0043241
    GD_dissociation_k1 = 0.0001; GD_dissociation_k2 = 62.3;
  RG_binding_GTP: RG + T -> RG_T; cell*(RG_binding_GTP_k1*RG*T - RG_binding_GTP_k2*RG_T);  // isVersionOf GO:0032403 GO:0005525
    RG_binding_GTP_k1 = 853000; RG_binding_GTP_k2 = 0.00468;
  G_T_binding_Receptor: G_T + R -> RG_T; cell*(G_T_binding_Receptor_k1*G_T*R - G_T_binding_Receptor_k2*RG_T); G_T_binding_Receptor is "G*T binding Receptor";  // isVersionOf GO:0005102 GO:0001664
    G_T_binding_Receptor_k1 = 132000000; G_T_binding_Receptor_k2 = 1.28;
  G_T_binding_GAP: G_T + A -> G_AT; cell*(G_T_binding_GAP_k1*G_T*A - G_T_binding_GAP_k2*G_AT); G_T_binding_GAP is "G*T binding GAP";  // isVersionOf GO:0032403
    G_T_binding_GAP_k1 = 386000; G_T_binding_GAP_k2 = 0.0408;
  GD_binding_GAP: GD + A -> GAD; cell*(GD_binding_GAP_k1*GD*A - GD_binding_GAP_k2*GAD);  // isVersionOf GO:0032403
    GD_binding_GAP_k1 = 64100; GD_binding_GAP_k2 = 0.95;
  GD_binding_Receptor: GD + R -> RGD; cell*(GD_binding_Receptor_k1*GD*R - GD_binding_Receptor_k2*RGD);  // isVersionOf GO:0005102 GO:0001664
    GD_binding_Receptor_k1 = 94700000; GD_binding_Receptor_k2 = 0.00227;
  RG_T_hydrolysis: RG_T -> RGD + Pi; cell*(RG_T_hydrolysis_k1*RG_T - RG_T_hydrolysis_k2*RGD*Pi); RG_T_hydrolysis is "RG*T hydrolysis";  // hasVersion reactome:REACT_348; isVersionOf GO:0003924
    RG_T_hydrolysis_k1 = 0.013; RG_T_hydrolysis_k2 = 2.22e-9;
  RGD_dissociation: RGD -> RG + D; cell*(RGD_dissociation_k1*RGD - RGD_dissociation_k2*RG*D);  // isVersionOf GO:0043241
    RGD_dissociation_k1 = 2; RGD_dissociation_k2 = 1470000;
  GA_binding_GTP: GA + T -> G_AT; cell*(GA_binding_GTP_k1*GA*T - GA_binding_GTP_k2*G_AT);  // isVersionOf GO:0005525 GO:0005515
    GA_binding_GTP_k1 = 44700; GA_binding_GTP_k2 = 8.32e-8;
  G_AT_hydrolysis: G_AT -> GAD + Pi; cell*(G_AT_hydrolysis_k1*G_AT - G_AT_hydrolysis_k2*GAD*Pi); G_AT_hydrolysis is "G*AT hydrolysis";  // hasVersion reactome:REACT_348; isVersionOf GO:0003924
    G_AT_hydrolysis_k1 = 25; G_AT_hydrolysis_k2 = 0.244;
  GAD_dissociation: GAD -> GA + D; cell*(GAD_dissociation_k1*GAD - GAD_dissociation_k2*GA*D);  // isVersionOf GO:0043241
    GAD_dissociation_k1 = 0.0001; GAD_dissociation_k2 = 3.83;
  RG_binding_GAP: RG + A -> RGA; cell*(RG_binding_GAP_k1*RG*A - RG_binding_GAP_k2*RGA);  // isVersionOf GO:0032403
    RG_binding_GAP_k1 = 74300; RG_binding_GAP_k2 = 0.00572;
  GA_binding_Receptor: GA + R -> RGA; cell*(GA_binding_Receptor_k1*GA*R - GA_binding_Receptor_k2*RGA);  // isVersionOf GO:0005102 GO:0001664
    GA_binding_Receptor_k1 = 22800000; GA_binding_Receptor_k2 = 5.43e-5;
  RGA_binding_GTP: RGA + T -> RG_AT; cell*(RGA_binding_GTP_k1*RGA*T - RGA_binding_GTP_k2*RG_AT);  // isVersionOf GO:0032403 GO:0005525
    RGA_binding_GTP_k1 = 1620000; RGA_binding_GTP_k2 = 0.00875;
  G_AT_binding_Receptor: G_AT + R -> RG_AT; cell*(G_AT_binding_Receptor_k1*G_AT*R - G_AT_binding_Receptor_k2*RG_AT); G_AT_binding_Receptor is "G*AT binding Receptor";  // isVersionOf GO:0001664 GO:0005102
    G_AT_binding_Receptor_k1 = 6200000; G_AT_binding_Receptor_k2 = 0.0433;
  RG_T_binding_GAP: RG_T + A -> RG_AT; cell*(RG_T_binding_GAP_k1*RG_T*A - RG_T_binding_GAP_k2*RG_AT); RG_T_binding_GAP is "RG*T binding GAP";  // isVersionOf GO:0032403
    RG_T_binding_GAP_k1 = 6300000; RG_T_binding_GAP_k2 = 0.478;
  RG_AT_hydrolysis: RG_AT -> RGAD + Pi; cell*(RG_AT_hydrolysis_k1*RG_AT - RG_AT_hydrolysis_k2*RGAD*Pi); RG_AT_hydrolysis is "RG*AT hydrolysis";  // isVersionOf GO:0003924; hasVersion reactome:REACT_348
    RG_AT_hydrolysis_k1 = 25; RG_AT_hydrolysis_k2 = 0.00297;
  RGD_binding_GAP: RGD + A -> RGAD; cell*(RGD_binding_GAP_k1*RGD*A - RGD_binding_GAP_k2*RGAD);  // isVersionOf GO:0032403
    RGD_binding_GAP_k1 = 13000; RGD_binding_GAP_k2 = 0.685;
  GAD_binding_Receptor: GAD + R -> RGAD; cell*(GAD_binding_Receptor_k1*GAD*R - GAD_binding_Receptor_k2*RGAD);  // isVersionOf GO:0001664 GO:0005102
    GAD_binding_Receptor_k1 = 49400000; GAD_binding_Receptor_k2 = 0.00421;
  RGAD_dissociation: RGAD -> RGA + D; cell*(RGAD_dissociation_k1*RGAD - RGAD_dissociation_k2*RGA*D);  // isVersionOf GO:0043241
    RGAD_dissociation_k1 = 2.75; RGAD_dissociation_k2 = 2940;
end
