// SBML level 2 version 1

model model_0000001()
  // Somogyi1990_CaOscillations
  // This model encoded according to the paper Hormone induced Calcium Oscillations in Liver Cells Can Be Explained by a Simple One Pool Model. The values of parameters a and alpha are varioused inorder to simulate results in different situations. For Figure 3A, a=3.5,alpha=1.2 ; Figure 3B, a=3,alpha=5 ; Figure 3C a= 0.95, alpha=1.5; Figure3D, a=1, alpha=5. Keep in mind that the value for the xy axies are arbitrary value. Figures3 in the paper are reproduced by COPASI 4.0.20(development) , and SBMLodeSolver online.
  // To the extent possible under law, all copyright and related or neighbouring rights to this encoded model have been dedicated to the public domain worldwide. Please refer to CC0 Public Domain Dedication for more information.
  // In summary, you are entitled to use this encoded model in absolutely any manner you deem suitable, verbatim, or with modification, alone or embedded it in a larger context, redistribute it, commercially or not, in a restricted way or not.
  // To cite BioModels Database, please use: Li C, Donizelli M, Rodriguez N, Dharuri H, Endler L, Chelliah V, Li L, He E, Henry A, Stefan MI, Snoep JL, Hucka M, Le Novère N, Laibe C (2010) BioModels Database: An enhanced, curated and annotated resource for published quantitative kinetic models. BMC Syst Biol., 4:92.
  // biomodels.db:MODEL8907365389
  // biomodels.db:BIOMD0000000114
  // isDescribedBy pubmed:1904060
  // isVersionOf GO:0009755 GO:0051924 GO:0019722
  // hasTaxon taxonomy:10114
  // hasProperty mamo:MAMO_0000046

  // Compartments:
  compartment cytoplasm = 1;  // isVersionOf GO:0005737
  compartment ER = 1; ER is "endoplasmic reticulum";  // isVersionOf GO:0005783
  compartment extracellular = 1;  // isVersionOf GO:0005576

  // Species:
  species x in ER = 1; x is "Ca_ER";  // CHEBI:29108 kegg.compound:C00076
  species y in cytoplasm = 1; y is "Ca_Cyt";  // CHEBI:29108 kegg.compound:C00076

  // Parameters:
  k = 0.01;
  // Value of alpha is changed for different figures.
  alpha = 5;
  n = 4;
  // Value of a is changed for different figures.
  a = 3;
  k1 = 2;
  beta = 1;
  gamma = 1;

  // Assignment rules:
  fy := y^n/(a^n + y^n);

  // Reactions:
  Ca_flux_into_the_cell: => y; gamma*cytoplasm;  // isVersionOf GO:0007204 GO:0006816
  reaction_0000002: x -> y; k*x*cytoplasm - k1*y*ER; reaction_0000002 is "Ca translocation between cytoplasm and ER";  // isVersionOf GO:0032471 GO:0007204 GO:0006816
  Ca_pumped_out_of_the_cell: y => ; beta*y*extracellular;  // isVersionOf GO:0005388 GO:0051481 GO:0006816
  InsP3_channel: x => y; alpha*fy*x*cytoplasm;  // isVersionOf GO:0006816 GO:0005220 GO:0051482
end
