// SBML level 2 version 1

model Hernjak2005_Calcium_Signaling()
  // The model reproduces the time profiles of Calcium in the spine and dendrites as depicted in Fig 8 and Fig 9 of the paper for CF activation.
  // The model was reproduced using MathSBML.
  // Please note that the units of volume species is molecules/micrometer cubed as against the units of microMolar given in the paper. To convert the units to microMolar multiply the species concentration by the conversion factor 1/602.
  // This model originates from BioModels Database: A Database of Annotated Published Models. It is copyright (c) 2005-2010 The BioModels Team.
  // For more information see the terms of use .
  // To cite BioModels Database, please use Le Novère N., Bornstein B., Broicher A., Courtot M., Donizelli M., Dharuri H., Li L., Sauro H., Schilstra M., Shapiro B., Snoep J.L., Hucka M. (2006) BioModels Database: A Free, Centralized Database of Curated, Published, Quantitative Kinetic Models of Biochemical and Cellular Systems Nucleic Acids Res., 34: D689-D691.
  // biomodels.db:MODEL1629310283
  // biomodels.db:BIOMD0000000162
  // isDescribedBy pubmed:16169982
  // isPartOf kegg.pathway:hsa04730 GO:0006816 GO:0060025
  // hasTaxon taxonomy:7711
  // occursIn BTO:0001011

  // Compartments:
  compartment Extracellular = 1;  // GO:0005576
  compartment Cytosol in PM = 14169.5;  // GO:0005829
  compartment ER in ERM = 2500;  // GO:0005783
  compartment PM in Extracellular = 16669.5 um2;  // 2-D; GO:0005886
  compartment ERM in Cytosol = 50000 um2;  // 2-D; GO:0005789

  // Species:
  species $ERDensity_ERM in ERM = 1;  // substance in molecules
  species PA_D_Cytosol in Cytosol = 1928.19396;  // substance in molecules; isVersionOf uniprot:P20472
  species PABCa_D_Cytosol in Cytosol = 9827.53562;  // substance in molecules; hasPart uniprot:P20472 kegg.compound:C00076; hasPart CHEBI:29108 uniprot:P20472
  species $Ca_D_ER in ER = 240800;  // substance in molecules; CHEBI:29108 kegg.compound:C00076
  species h_D_ERM in ERM = 0.8;  // substance in molecules
  species PABMg_D_Cytosol in Cytosol = 36404.28;  // substance in molecules; hasPart uniprot:P20472 kegg.compound:C00305; hasPart CHEBI:25107 uniprot:P20472
  species $ERDensity_D_ERM in ERM = 1;  // substance in molecules
  species CG_D_Cytosol in Cytosol = 84566.35;  // substance in molecules
  species D28kB_D_Cytosol in Cytosol = 2510.04502;  // substance in molecules; isVersionOf uniprot:P05937
  species PA_Cytosol in Cytosol = 1928.19396;  // substance in molecules; isVersionOf uniprot:P20472
  species CG_Cytosol in Cytosol = 84566.35;  // substance in molecules
  species PABCa_Cytosol in Cytosol = 9827.53562;  // substance in molecules; hasPart uniprot:P20472 kegg.compound:C00076; hasPart CHEBI:29108 uniprot:P20472
  species $Mg_Cytosol in Cytosol = 355180;  // substance in molecules; CHEBI:18420 kegg.compound:C00305
  species D28k_high_Cytosol in Cytosol = 43952.65;  // substance in molecules; isVersionOf uniprot:P05937
  species D28k_high_D_Cytosol in Cytosol = 43952.65;  // substance in molecules; isVersionOf uniprot:P05937
  species $Ca_ER in ER = 240800;  // substance in molecules; CHEBI:29108 kegg.compound:C00076
  species D28kB_high_D_Cytosol in Cytosol = 4207.35392;  // substance in molecules; isVersionOf uniprot:P05937
  species CGB_D_Cytosol in Cytosol = 1.17536286e4;  // substance in molecules
  species Ca_D_Cytosol in Cytosol = 27.09;  // substance in molecules; CHEBI:29108 kegg.compound:C00076
  species CGB_Cytosol in Cytosol = 1.17536286e4;  // substance in molecules
  species D28k_Cytosol in Cytosol = 45649.95;  // substance in molecules; isVersionOf uniprot:P05937
  species D28kB_high_Cytosol in Cytosol = 4207.35392;  // substance in molecules; isVersionOf uniprot:P05937
  species PABMg_Cytosol in Cytosol = 36404.28;  // substance in molecules; hasPart uniprot:P20472 kegg.compound:C00305; hasPart CHEBI:25107 uniprot:P20472
  species IP3_Cytosol in Cytosol = 96.32;  // substance in molecules; CHEBI:16595 kegg.compound:C01245
  species $Ca_Extracellular in Extracellular = 602000;  // substance in molecules; CHEBI:29108 kegg.compound:C00076
  species D28k_D_Cytosol in Cytosol = 45649.95;  // substance in molecules; isVersionOf uniprot:P05937
  species IP3_D_Cytosol in Cytosol = 96.32;  // substance in molecules; CHEBI:16595 kegg.compound:C01245
  species $Mg_D_Cytosol in Cytosol = 355180;  // substance in molecules; CHEBI:18420 kegg.compound:C00305
  species Ca_Cytosol in Cytosol = 27.09;  // substance in molecules; CHEBI:29108 kegg.compound:C00076
  species h_ERM in ERM = 0.8;  // substance in molecules
  species $Ca_D_Extracellular in Extracellular = 602000;  // substance in molecules; CHEBI:29108 kegg.compound:C00076
  species D28kB_Cytosol in Cytosol = 2510.04502;  // substance in molecules; isVersionOf uniprot:P05937

  // Parameters:
  KMOLE = 0.00166113 uM_um3_molecules_1;
  pulses0 = 0;
  p0 = 1;
  delta = 0;
  tau = 0.012;
  Ks = 1.188;
  A1 = 1;
  B1 = 2;
  Jch = 13.25;
  t1 = 0.1;
  t2 = 0.105;
  JchD = 6.25;
  p1 = 1;
  p2 = 1;
  p3 = 1;
  p4 = 1;
  p5 = 1;
  p6 = 1;
  p7 = 1;
  p8 = 1;
  p9 = 1;
  p10 = 1;
  p11 = 1;
  p12 = 1;
  p13 = 1;

  // Assignment rules:
  pulses_ar := piecewise(p0*exp(-((time + (-delta))*Ks)), time > delta, 0) + piecewise(p1*exp(-((time + (-(tau + delta)))*Ks)), time > tau + delta, 0) + piecewise(p2*exp(-(Ks*(time + (-(2*tau + delta))))), time > 2*tau + delta, 0) + piecewise(p3*exp(-(Ks*(time + (-(3*tau + delta))))), time > 3*tau + delta, 0) + piecewise(p4*exp(-(Ks*(time + (-(4*tau + delta))))), time > 4*tau + delta, 0) + piecewise(p5*exp(-(Ks*(time + (-(5*tau + delta))))), time > 5*tau + delta, 0) + piecewise(p6*exp(-(Ks*(time + (-(6*tau + delta))))), time > 6*tau + delta, 0) + piecewise(p7*exp(-(Ks*(time + (-(7*tau + delta))))), time > 7*tau + delta, 0) + piecewise(p8*exp(-(Ks*(time + (-(8*tau + delta))))), time > 8*tau + delta, 0) + piecewise(p9*exp(-(Ks*(time + (-(9*tau + delta))))), time > 9*tau + delta, 0) + piecewise(p10*exp(-(Ks*(time + (-(10*tau + delta))))), time > 10*tau + delta, 0) + piecewise(p11*exp(-(Ks*(time + (-(11*tau + delta))))), time > 11*tau + delta, 0);
  flux0_ar := piecewise(Jch*(0.00166113*Ca_Extracellular + (-(0.00166113*Ca_Cytosol))), (time > t1) && (time < t2), 0);
  flux1_ar := piecewise(JchD*(0.00166113*Ca_D_Extracellular + (-(0.00166113*Ca_D_Cytosol))), (time > t1) && (time < t2), 0);

  // Reactions:
  CD28k_highDbinding: Ca_D_Cytosol + D28k_high_D_Cytosol -> D28kB_high_D_Cytosol; (CD28k_highDbinding_Kf*0.00166113*Ca_D_Cytosol*0.00166113*D28k_high_D_Cytosol + (-(CD28k_highDbinding_Kr*0.00166113*D28kB_high_D_Cytosol)))*Cytosol*1*(1/KMOLE);  // isVersionOf GO:0005509
    CD28k_highDbinding_Kf = 5.5 uM_1_s_1; CD28k_highDbinding_Kr = 2.6 s_1;
  PA_Dbinding: PA_D_Cytosol + Ca_D_Cytosol -> PABCa_D_Cytosol; (PA_Dbinding_Kf*0.00166113*PA_D_Cytosol*0.00166113*Ca_D_Cytosol + (-(PA_Dbinding_Kr*0.00166113*PABCa_D_Cytosol)))*Cytosol*1*(1/KMOLE);  // isVersionOf GO:0005509
    PA_Dbinding_Kf = 107 uM_1_s_1; PA_Dbinding_Kr = 0.95 s_1;
  CG_deg: CG_D_Cytosol -> ; (CG_deg_D*CG_deg_r_n^2*(0.00166113*CG_D_Cytosol + (-(0.00166113*CG_Cytosol)))*(1/CG_deg_l_n)*(1/CG_deg_r_d^2)*(1/CG_deg_l_star) + CG_deg_D*(0.00166113*CG_D_Cytosol + (-CG_F))*(1/CG_deg_l_star)*(1/CG_deg_lc))*Cytosol*1*(1/KMOLE);  // modifiers: CG_Cytosol
    CG_deg_D = 15 um2_s_1; CG_deg_r_n = 0.1 um; CG_deg_l_n = 0.66 um; CG_deg_r_d = 1 um; CG_deg_l_star = 27.9812 um; CG_F = 140.47567 uM; CG_deg_lc = 5.6265 um;
  IP3deg: IP3_D_Cytosol -> ; (IP3deg_D*IP3deg_r_n^2*(0.00166113*IP3_D_Cytosol + (-(0.00166113*IP3_Cytosol)))*(1/IP3deg_l_n)*(1/IP3deg_r_d^2)*(1/IP3deg_l_star) + IP3deg_D*(0.00166113*IP3_D_Cytosol + (-IP3_F))*(1/IP3deg_l_star)*(1/IP3deg_lc))*Cytosol*1*(1/KMOLE);  // modifiers: IP3_Cytosol
    IP3deg_D = 283 um2_s_1; IP3deg_r_n = 0.1 um; IP3deg_l_n = 0.66 um; IP3deg_r_d = 1 um; IP3deg_l_star = 27.9812 um; IP3_F = 0.16 uM; IP3deg_lc = 5.6265 um;
  D28kB_deg: D28kB_D_Cytosol -> ; (D28kB_deg_D*D28kB_deg_r_n^2*(0.00166113*D28kB_D_Cytosol + (-(0.00166113*D28kB_Cytosol)))*(1/D28kB_deg_l_n)*(1/D28kB_deg_r_D^2)*(1/D28kB_deg_l_star) + D28kB_deg_D*(0.00166113*D28kB_D_Cytosol + (-D28kB_F))*(1/D28kB_deg_l_star)*(1/D28kB_deg_lc))*Cytosol*1*(1/KMOLE);  // modifiers: D28kB_Cytosol; isVersionOf GO:0030163
    D28kB_deg_D = 28 um2_s_1; D28kB_deg_r_n = 0.1 um; D28kB_deg_l_n = 0.66 um; D28kB_deg_r_D = 1 um; D28kB_deg_l_star = 27.9812 um; D28kB_F = 4.16951 uM; D28kB_deg_lc = 5.6265 um;
  D28k_deg: D28k_D_Cytosol -> ; (D28k_deg_D*D28k_deg_r_n^2*(0.00166113*D28k_D_Cytosol + (-(0.00166113*D28k_Cytosol)))*(1/D28k_deg_l_n)*(1/D28k_deg_r_D^2)*(1/D28k_deg_l_star) + D28k_deg_D*(0.00166113*D28k_D_Cytosol + (-D28k_F))*(1/D28k_deg_l_star)*(1/D28k_deg_lc))*Cytosol*1*(1/KMOLE);  // modifiers: D28k_Cytosol; isVersionOf GO:0030163
    D28k_deg_D = 28 um2_s_1; D28k_deg_r_n = 0.1 um; D28k_deg_l_n = 0.66 um; D28k_deg_r_D = 1 um; D28k_deg_l_star = 27.9812 um; D28k_F = 75.83049 uM; D28k_deg_lc = 5.6265 um;
  PA_MgD: $Mg_D_Cytosol + PA_D_Cytosol -> PABMg_D_Cytosol; (PA_MgD_Kf*0.00166113*Mg_D_Cytosol*0.00166113*PA_D_Cytosol + (-(PA_MgD_Kr*0.00166113*PABMg_D_Cytosol)))*Cytosol*1*(1/KMOLE);  // isVersionOf GO:0000287
    PA_MgD_Kf = 0.8 uM_1_s_1; PA_MgD_Kr = 25 s_1;
  PA_Ca: PA_Cytosol + Ca_Cytosol -> PABCa_Cytosol; (PA_Ca_Kf*0.00166113*PA_Cytosol*0.00166113*Ca_Cytosol + (-(PA_Ca_Kr*0.00166113*PABCa_Cytosol)))*Cytosol*1*(1/KMOLE);  // isVersionOf GO:0005509
    PA_Ca_Kf = 107 uM_1_s_1; PA_Ca_Kr = 0.95 s_1;
  PABMg_deg: PABMg_D_Cytosol -> ; (PABMg_deg_D*PABMg_deg_r_n^2*(0.00166113*PABMg_D_Cytosol + (-(0.00166113*PABMg_Cytosol)))*(1/PABMg_deg_l_n)*(1/PABMg_deg_r_d^2)*(1/PABMg_deg_l_star) + PABMg_deg_D*(0.00166113*PABMg_D_Cytosol + (-PABMg_F))*(1/PABMg_deg_l_star)*(1/PABMg_deg_lc))*Cytosol*1*(1/KMOLE);  // modifiers: PABMg_Cytosol; isVersionOf GO:0030163
    PABMg_deg_D = 43 um2_s_1; PABMg_deg_r_n = 0.1 um; PABMg_deg_l_n = 0.66 um; PABMg_deg_r_d = 1 um; PABMg_deg_l_star = 27.9812 um; PABMg_F = 60.47222 uM; PABMg_deg_lc = 5.6265 um;
  D28k_high_deg: D28k_high_D_Cytosol -> ; (D28k_high_deg_D*D28k_high_deg_r_n^2*(0.00166113*D28k_high_D_Cytosol + (-(0.00166113*D28k_high_Cytosol)))*(1/D28k_high_deg_l_n)*(1/D28k_high_deg_r_D^2)*(1/D28k_high_deg_l_star) + D28k_high_deg_D*(0.00166113*D28k_high_D_Cytosol + (-D28k_high_F))*(1/D28k_high_deg_l_star)*(1/D28k_high_deg_lc))*Cytosol*1*(1/KMOLE);  // modifiers: D28k_high_Cytosol; isVersionOf GO:0030163
    D28k_high_deg_D = 28 um2_s_1; D28k_high_deg_r_n = 0.1 um; D28k_high_deg_l_n = 0.66 um; D28k_high_deg_r_D = 1 um; D28k_high_deg_l_star = 27.9812 um; D28k_high_F = 73.01104 uM; D28k_high_deg_lc = 5.6265 um;
  Ca_d: Ca_Cytosol -> ; 0.75*Ca_d_D*(0.00166113*Ca_Cytosol + (-(0.00166113*Ca_D_Cytosol)))*Ca_d_r_neck^2*(1/Ca_d_l)*(1/Ca_d_r_spine^3)*Cytosol*1*(1/KMOLE);  // modifiers: Ca_D_Cytosol
    Ca_d_D = 223 um2_s_1; Ca_d_r_neck = 0.1 um; Ca_d_l = 0.66 um; Ca_d_r_spine = 0.288 um;
  D28kB_high_deg: D28kB_high_D_Cytosol -> ; (D28kB_high_deg_D*D28kB_high_deg_r_n^2*(0.00166113*D28kB_high_D_Cytosol + (-(0.00166113*D28kB_high_Cytosol)))*(1/D28kB_high_deg_l_n)*(1/D28kB_high_deg_r_D^2)*(1/D28kB_high_deg_l_star) + D28kB_high_deg_D*(0.00166113*D28kB_high_D_Cytosol + (-D28kB_high_F))*(1/D28kB_high_deg_l_star)*(1/D28kB_high_deg_lc))*Cytosol*1*(1/KMOLE);  // modifiers: D28kB_high_Cytosol; isVersionOf GO:0030163
    D28kB_high_deg_D = 28 um2_s_1; D28kB_high_deg_r_n = 0.1 um; D28kB_high_deg_l_n = 0.66 um; D28kB_high_deg_r_D = 1 um; D28kB_high_deg_l_star = 27.9812 um; D28kB_high_F = 6.98896 uM; D28kB_high_deg_lc = 5.6265 um;
  CG_d: CG_Cytosol -> ; 0.75*CG_d_D*(0.00166113*CG_Cytosol + (-(0.00166113*CG_D_Cytosol)))*CG_d_r_neck^2*(1/CG_d_l)*(1/CG_d_r_spine^3)*Cytosol*1*(1/KMOLE);  // modifiers: CG_D_Cytosol
    CG_d_D = 15 um2_s_1; CG_d_r_neck = 0.1 um; CG_d_l = 0.66 um; CG_d_r_spine = 0.288 um;
  D28kB_d: D28kB_Cytosol -> ; 0.75*D28kB_d_D*(0.00166113*D28kB_Cytosol + (-(0.00166113*D28kB_Cytosol)))*D28kB_d_r_neck^2*(1/D28kB_d_l)*(1/D28kB_d_r_spine^3)*Cytosol*1*(1/KMOLE);  // modifiers: D28kB_D_Cytosol; isVersionOf GO:0030163
    D28kB_d_D = 28 um2_s_1; D28kB_d_r_neck = 0.1 um; D28kB_d_l = 0.66 um; D28kB_d_r_spine = 0.288 um;
  reaction1: h_D_ERM -> ; -((reaction1_Kinh + (-((0.00166113*Ca_D_Cytosol + reaction1_Kinh)*h_D_ERM)))*reaction1_Kon)*ERM;  // modifiers: Ca_D_Cytosol
    reaction1_I = 0 pA_um_2; reaction1_Kinh = 0.2 uM; reaction1_Kon = 2.7 molecules_um_2_uM_1_s_1;
  CGbinding: Ca_Cytosol + CG_Cytosol -> CGB_Cytosol; (CGbinding_Kf*0.00166113*Ca_Cytosol*0.00166113*CG_Cytosol + (-(CGbinding_Kr*0.00166113*CGB_Cytosol)))*Cytosol*1*(1/KMOLE);  // isVersionOf GO:0005509
    CGbinding_Kf = 430 uM_1_s_1; CGbinding_Kr = 140 s_1;
  CaD28k_med: D28k_Cytosol + Ca_Cytosol -> D28kB_Cytosol; (CaD28k_med_Kf*0.00166113*D28k_Cytosol*0.00166113*Ca_Cytosol + (-(CaD28k_med_Kr*0.00166113*D28kB_Cytosol)))*Cytosol*1*(1/KMOLE);  // isVersionOf GO:0005509
    CaD28k_med_Kf = 43.5 uM_1_s_1; CaD28k_med_Kr = 35.8 s_1;
  PABCa_deg: PABCa_D_Cytosol -> ; (PABCa_deg_D*PABCa_deg_r_n^2*(0.00166113*PABCa_D_Cytosol + (-(0.00166113*PABCa_Cytosol)))*(1/PABCa_deg_l_n)*(1/PABCa_deg_r_d^2)*(1/PABCa_deg_l_star) + PABCa_deg_D*(0.00166113*PABCa_D_Cytosol + (-PABCa_F))*(1/PABCa_deg_l_star)*(1/PABCa_deg_lc))*Cytosol*1*(1/KMOLE);  // modifiers: PABCa_Cytosol; isVersionOf GO:0030163
    PABCa_deg_D = 43 um2_s_1; PABCa_deg_r_n = 0.1 um; PABCa_deg_l_n = 0.66 um; PABCa_deg_r_d = 1 um; PABCa_deg_l_star = 27.9812 um; PABCa_F = 16.32481 uM; PABCa_deg_lc = 5.6265 um;
  IP3_d: IP3_Cytosol -> ; 0.75*IP3_d_D*(0.00166113*IP3_Cytosol + (-(0.00166113*IP3_D_Cytosol)))*IP3_d_r_neck^2*(1/IP3_d_l)*(1/IP3_d_r_spine^3)*Cytosol*1*(1/KMOLE);  // modifiers: IP3_D_Cytosol
    IP3_d_D = 283 um2_s_1; IP3_d_r_neck = 0.1 um; IP3_d_l = 0.66 um; IP3_d_r_spine = 0.288 um;
  D28k_high_d: D28k_high_Cytosol -> ; 0.75*D28k_high_d_D*(0.00166113*D28k_high_Cytosol + (-(0.00166113*D28k_high_D_Cytosol)))*D28k_high_d_r_neck^2*(1/D28k_high_d_l)*(1/D28k_high_d_r_spine^3)*Cytosol*1*(1/KMOLE);  // modifiers: D28k_high_D_Cytosol; isVersionOf GO:0030163
    D28k_high_d_D = 28 um2_s_1; D28k_high_d_r_neck = 0.1 um; D28k_high_d_l = 0.66 um; D28k_high_d_r_spine = 0.288 um;
  reaction0: h_ERM -> ; -((reaction0_Kinh + (-((0.00166113*Ca_Cytosol + reaction0_Kinh)*h_ERM)))*reaction0_Kon)*ERM;  // modifiers: Ca_Cytosol
    reaction0_I = 0 pA_um_2; reaction0_Kinh = 0.2 uM; reaction0_Kon = 2.7 molecules_um_2_uM_1_s_1;
  PABMg_d: PABMg_Cytosol -> ; 0.75*PABMg_d_D*(0.00166113*PABMg_Cytosol + (-(0.00166113*PABMg_D_Cytosol)))*PABMg_d_r_neck^2*(1/PABMg_d_l)*(1/PABMg_d_r_spine^3)*Cytosol*1*(1/KMOLE);  // modifiers: PABMg_D_Cytosol; isVersionOf GO:0030163
    PABMg_d_D = 43 um2_s_1; PABMg_d_r_neck = 0.1 um; PABMg_d_l = 0.66 um; PABMg_d_r_spine = 0.288 um;
  CD28k_high: Ca_Cytosol + D28k_high_Cytosol -> D28kB_high_Cytosol; (CD28k_high_Kf*0.00166113*Ca_Cytosol*0.00166113*D28k_high_Cytosol + (-(CD28k_high_Kr*0.00166113*D28kB_high_Cytosol)))*Cytosol*1*(1/KMOLE);  // isVersionOf GO:0005509
    CD28k_high_Kf = 5.5 uM_1_s_1; CD28k_high_Kr = 2.6 s_1;
  D28kBDbinding: D28k_D_Cytosol + Ca_D_Cytosol -> D28kB_D_Cytosol; (D28kBDbinding_Kf*0.00166113*D28k_D_Cytosol*0.00166113*Ca_D_Cytosol + (-(D28kBDbinding_Kr*0.00166113*D28kB_D_Cytosol)))*Cytosol*1*(1/KMOLE);  // isVersionOf GO:0005509
    D28kBDbinding_Kf = 43.5 uM_1_s_1; D28kBDbinding_Kr = 35.8 s_1;
  PABCa_d: PABCa_Cytosol -> ; 0.75*PABCa_d_D*(0.00166113*PABCa_Cytosol + (-(0.00166113*PABCa_D_Cytosol)))*PABCa_d_r_neck^2*(1/PABCa_d_l)*(1/PABCa_d_r_spine^3)*Cytosol*1*(1/KMOLE);  // modifiers: PABCa_D_Cytosol; isVersionOf GO:0030163
    PABCa_d_D = 43 um2_s_1; PABCa_d_r_neck = 0.1 um; PABCa_d_l = 0.66 um; PABCa_d_r_spine = 0.288 um;
  PA_d: PA_Cytosol -> ; 0.75*PA_d_D*(0.00166113*PA_Cytosol + (-(0.00166113*PA_D_Cytosol)))*PA_d_r_neck^2*(1/PA_d_l)*(1/PA_d_r_spine^3)*Cytosol*1*(1/KMOLE);  // modifiers: PA_D_Cytosol; isVersionOf GO:0030163
    PA_d_D = 43 um2_s_1; PA_d_r_neck = 0.1 um; PA_d_l = 0.66 um; PA_d_r_spine = 0.288 um;
  CGB_deg: CGB_D_Cytosol -> ; (CGB_deg_D*CGB_deg_r_n^2*(0.00166113*CGB_D_Cytosol + (-(0.00166113*CGB_Cytosol)))*(1/CGB_deg_l_n)*(1/CGB_deg_r_d^2)*(1/CGB_deg_l_star) + CGB_deg_D*(0.00166113*CGB_D_Cytosol + (-CGB_F))*(1/CGB_deg_l_star)*(1/CGB_deg_lc))*Cytosol*1*(1/KMOLE);  // modifiers: CGB_Cytosol
    CGB_deg_D = 15 um2_s_1; CGB_deg_r_n = 0.1 um; CGB_deg_l_n = 0.66 um; CGB_deg_r_d = 1 um; CGB_deg_l_star = 27.9812 um; CGB_F = 19.5243 uM; CGB_deg_lc = 5.6265 um;
  PA_Mg: PA_Cytosol + $Mg_Cytosol -> PABMg_Cytosol; (PA_Mg_Kf*0.00166113*PA_Cytosol*0.00166113*Mg_Cytosol + (-(PA_Mg_Kr*0.00166113*PABMg_Cytosol)))*Cytosol*1*(1/KMOLE);  // isVersionOf GO:0000287
    PA_Mg_Kf = 0.8 uM_1_s_1; PA_Mg_Kr = 25 s_1;
  PA_deg: PA_D_Cytosol -> ; (PA_deg_D*PA_deg_r_n^2*(0.00166113*PA_D_Cytosol + (-(0.00166113*PA_Cytosol)))*(1/PA_deg_l_n)*(1/PA_deg_r_d^2)*(1/PA_deg_l_star) + PA_deg_D*(0.00166113*PA_D_Cytosol + (-PA_F))*(1/PA_deg_l_star)*(1/PA_deg_lc))*Cytosol*1*(1/KMOLE);  // modifiers: PA_Cytosol; isVersionOf GO:0030163
    PA_deg_D = 43 um2_s_1; PA_deg_r_n = 0.1 um; PA_deg_l_n = 0.66 um; PA_deg_r_d = 1 um; PA_deg_l_star = 27.9812 um; PA_F = 3.20298 uM; PA_deg_lc = 5.6265 um;
  IP3_degr: IP3_Cytosol -> ; IP3_degr_Kdegr*(0.00166113*IP3_Cytosol + (-IP3_CytosolS))*Cytosol*1*(1/KMOLE);
    IP3_degr_Kdegr = 0.14 s_1; IP3_CytosolS = 0.16 uM;
  D28kB_high_d: D28kB_high_Cytosol -> ; 0.75*D28kB_high_d_D*(0.00166113*D28kB_high_Cytosol + (-(0.00166113*D28kB_high_D_Cytosol)))*D28kB_high_d_r_neck^2*(1/D28kB_high_d_l)*(1/D28kB_high_d_r_spine^3)*Cytosol*1*(1/KMOLE);  // modifiers: D28kB_high_D_Cytosol; isVersionOf GO:0030163
    D28kB_high_d_D = 28 um2_s_1; D28kB_high_d_r_neck = 0.1 um; D28kB_high_d_l = 0.66 um; D28kB_high_d_r_spine = 0.288 um;
  D28k_d: D28k_Cytosol -> ; 0.75*D28k_d_D*(0.00166113*D28k_Cytosol + (-(0.00166113*D28k_D_Cytosol)))*D28k_d_r_neck^2*(1/D28k_d_l)*(1/D28k_d_r_spine^3)*Cytosol*1*(1/KMOLE);  // modifiers: D28k_D_Cytosol; isVersionOf GO:0030163
    D28k_d_D = 28 um2_s_1; D28k_d_r_neck = 0.1 um; D28k_d_l = 0.66 um; D28k_d_r_spine = 0.288 um;
  CGB_d: CGB_Cytosol -> ; 0.75*CGB_d_D*(0.00166113*CGB_Cytosol + (-(0.00166113*CGB_D_Cytosol)))*CGB_d_r_neck^2*(1/CGB_d_l)*(1/CGB_d_r_spine^3)*Cytosol*1*(1/KMOLE);  // modifiers: CGB_D_Cytosol
    CGB_d_D = 15 um2_s_1; CGB_d_r_neck = 0.1 um; CGB_d_l = 0.66 um; CGB_d_r_spine = 0.288 um;
  CG_Dbinding: Ca_D_Cytosol + CG_D_Cytosol -> CGB_D_Cytosol; (CG_Dbinding_Kf*0.00166113*Ca_D_Cytosol*0.00166113*CG_D_Cytosol + (-(CG_Dbinding_Kr*0.00166113*CGB_D_Cytosol)))*Cytosol*1*(1/KMOLE);  // isVersionOf GO:0005509
    CG_Dbinding_Kf = 430 uM_1_s_1; CG_Dbinding_Kr = 140 s_1;
  IP3_degr1: IP3_D_Cytosol -> ; IP3_degr1_Kdegr*(0.00166113*IP3_D_Cytosol + (-IP3_CytosolD))*Cytosol*1*(1/KMOLE);
    IP3_degr1_Kdegr = 0.14 s_1; IP3_CytosolD = 0.16 uM;
  Ca_deg: Ca_D_Cytosol -> ; (Ca_deg_D*Ca_deg_r_n^2*(0.00166113*Ca_D_Cytosol + (-(0.00166113*Ca_Cytosol)))*(1/Ca_deg_l_n)*(1/Ca_deg_r_D^2)*(1/Ca_deg_l_star) + Ca_deg_D*(0.00166113*Ca_D_Cytosol + (-Ca_F))*(1/Ca_deg_l_star)*(1/Ca_deg_lc))*Cytosol*1*(1/KMOLE);  // modifiers: Ca_Cytosol
    Ca_deg_D = 223 um2_s_1; Ca_deg_r_n = 0.1 um; Ca_deg_l_n = 0.66 um; Ca_deg_r_D = 1 um; Ca_deg_l_star = 27.9812 um; Ca_F = 0.045 uM; Ca_deg_lc = 5.6265 um;
  pulses: -> IP3_Cytosol; SVR*Js*pulses_ar*(1/Rs)*Cytosol*1*(1/KMOLE);
    SVR = 3 um_1; Js = 0 uM_um_s_1; Rs = 0.288 _one_;
  ER_leak_flux: Ca_Cytosol -> $Ca_ER; -(ERDensity_ERM*ER_leak_flux_vL*(1 + (-(0.00166113*Ca_Cytosol*(1/(0.00166113*Ca_ER))))))*ERM*1*(1/KMOLE);  // modifiers: ERDensity_ERM; isVersionOf GO:0051924
    ER_leak_flux_I = 0 pA_um_2; ER_leak_flux_vL = 0.12396 uM_um3_molecules_1_s_1;
  SERCA_fluxD: Ca_D_Cytosol -> $Ca_D_ER; ERDensity_D_ERM*SERCA_fluxD_vP*0.00166113*Ca_D_Cytosol*0.00166113*Ca_D_Cytosol*(1/(SERCA_fluxD_kP*SERCA_fluxD_kP + 0.00166113*Ca_D_Cytosol*0.00166113*Ca_D_Cytosol))*ERM*1*(1/KMOLE);  // modifiers: ERDensity_D_ERM; isVersionOf GO:0051924
    SERCA_fluxD_I = 0 pA_um_2; SERCA_fluxD_vP = 3.75 uM_um3_molecules_1_s_1; SERCA_fluxD_kP = 0.27;
  IP3R_fluxD: Ca_D_Cytosol -> $Ca_D_ER; -(ERDensity_D_ERM*IP3R_fluxD_Jmax2*(1 + (-(0.00166113*Ca_D_Cytosol*(1/(0.00166113*Ca_D_ER)))))*(h_D_ERM*0.00166113*IP3_D_Cytosol*0.00166113*Ca_D_Cytosol*(1/(0.00166113*IP3_D_Cytosol + IP3R_fluxD_dI))*(1/(0.00166113*Ca_D_Cytosol + IP3R_fluxD_Kact)))^3)*ERM*1*(1/KMOLE);  // modifiers: IP3_D_Cytosol, ERDensity_D_ERM, h_D_ERM; isVersionOf GO:0051924
    IP3R_fluxD_I = 0 pA_um_2; IP3R_fluxD_Jmax2 = 21000 _one__0E_57_item_4_m6_mol_s_1; IP3R_fluxD_dI = 20 uM; IP3R_fluxD_Kact = 0.3 uM;
  SERCA_flux: Ca_Cytosol -> $Ca_ER; ERDensity_ERM*SERCA_flux_vP*0.00166113*Ca_Cytosol*0.00166113*Ca_Cytosol*(1/(SERCA_flux_kP*SERCA_flux_kP + 0.00166113*Ca_Cytosol*0.00166113*Ca_Cytosol))*ERM*1*(1/KMOLE);  // modifiers: ERDensity_ERM; isVersionOf GO:0051924
    SERCA_flux_I = 0 pA_um_2; SERCA_flux_vP = 3.75 uM_um3_molecules_1_s_1; SERCA_flux_kP = 0.27;
  flux0: $Ca_Extracellular -> Ca_Cytosol; flux0_ar*PM*1*(1/KMOLE);  // isVersionOf GO:0051924
    flux0_I = 0 pA_um_2;
  IP3R_flux: Ca_Cytosol -> $Ca_ER; -(ERDensity_ERM*IP3R_flux_Jmax2*(1 + (-(0.00166113*Ca_Cytosol*(1/(0.00166113*Ca_ER)))))*(h_ERM*0.00166113*IP3_Cytosol*0.00166113*Ca_Cytosol*(1/(0.00166113*IP3_Cytosol + IP3R_flux_dI))*(1/(0.00166113*Ca_Cytosol + IP3R_flux_Kact)))^3)*ERM*1*(1/KMOLE);  // modifiers: IP3_Cytosol, h_ERM, ERDensity_ERM; isVersionOf GO:0051924
    IP3R_flux_I = 0 pA_um_2; IP3R_flux_Jmax2 = 21000 _one__0E_57_item_4_m6_mol_s_1; IP3R_flux_dI = 20 uM; IP3R_flux_Kact = 0.3 uM;
  flux1: $Ca_D_Extracellular -> Ca_D_Cytosol; flux1_ar*PM*1*(1/KMOLE);  // isVersionOf GO:0051924
    flux1_I = 0 pA_um_2;
  ER_leak_fluxD: Ca_D_Cytosol -> $Ca_D_ER; -(ERDensity_D_ERM*ER_leak_fluxD_vL*(1 + (-(0.00166113*Ca_D_Cytosol*(1/(0.00166113*Ca_D_ER))))))*ERM*1*(1/KMOLE);  // modifiers: ERDensity_D_ERM; isVersionOf GO:0051924
    ER_leak_fluxD_I = 0 pA_um_2; ER_leak_fluxD_vL = 0.12396 uM_um3_molecules_1_s_1;

  // Unit definitions:
  unit substance = item;
  unit volume = (1e-6 metre)^3;
  unit area = (1e-6 metre)^2;
  unit molecules = item;
  unit umol_um3_litre_1 = 1e-21 mole;
  unit um2 = (1e-6 metre)^2;
  unit uM_um3_molecules_1 = 1e-21 dimensionless * mole / item;
  unit uM_s_1 = 1e-3 dimensionless * mole / (metre^3 * second);
  unit uM_1_s_1 = 1000 dimensionless * metre^3 / (mole * second);
  unit s_1 = 1 / second;
  unit um2_s_1 = 1e-12 dimensionless * metre^2 / second;
  unit um = 1e-6 metre;
  unit uM = 1e-3 dimensionless * mole / metre^3;
  unit molecules_um_2_s_1 = 1e12 dimensionless * item / (metre^2 * second);
  unit pA_um_2 = dimensionless * ampere / metre^2;
  unit molecules_um_2_uM_1_s_1 = 1e15 dimensionless * item * metre / (mole * second);
  unit um_1 = 1 / (1e-6 metre);
  unit uM_um_s_1 = 1e-9 dimensionless * mole / (metre^2 * second);
  unit _one_ = dimensionless;
  unit s = second;
  unit uM_um3_molecules_1_s_1 = 1e-21 dimensionless * mole / (item * second);
  unit _one__0E_57_item_4_m6_mol_s_1 = 1e-57 dimensionless * metre^6 * mole / (item^4 * second);
  unit um_s_1 = 1e-6 metre / second;
end
