// SBML level 2 version 3

model Kim2007_CellularMemory_SymmetricModel()
  // This model is from the article:
  // Interlinked mutual inhibitory positive feedbacks induce robust cellular memory effects.
  // Kim TH, Jung SH, Cho KH FEBS Lett.2007 Oct; 581(25) 17892872,
  // Abstract:
  // Mutual inhibitory positive feedback (MIPF), or double-negative feedback, is a key regulatory motif of cellular memory with the capability of maintaining switched states for transient stimuli. Such MIPFs are found in various biological systems where they are interlinked in many cases despite a single MIPF can still realize such a memory effect. An intriguing question then arises about the advantage of interlinking MIPFs instead of exploiting an isolated single MIPF to realize the memory effect. We have investigated the advantages of interlinked MIPF systems through mathematical modeling and computer simulations. Our results revealed that interlinking MIPFs expands the parameter range of achieving the memory effect, or the memory region, thereby making the system more robust to parameter perturbations. Moreover, the minimal duration and amplitude of an external stimulus required for off-to-on state transition are increased and, as a result, external noises can more effectively be filtered out. Hence, interlinked MIPF systems can realize more robust cellular memories with respect to both parameter perturbations and external noises. Our study suggests that interlinked MIPF systems might be an evolutionary consequence acquired for a more reliable memory effect by enhancing robustness against noisy cellular environments.
  // Note: The model reproduces the simulation result for the symmetric model as depicted in Fig 3H of the paper. Model successfully tested on MathSBML
  // This model originates from BioModels Database: A Database of Annotated Published Models (http://www.ebi.ac.uk/biomodels/). It is copyright (c) 2005-2012 The BioModels.net Team.
  // For more information see the terms of use.
  // To cite BioModels Database, please use: Li C, Donizelli M, Rodriguez N, Dharuri H, Endler L, Chelliah V, Li L, He E, Henry A, Stefan MI, Snoep JL, Hucka M, Le Novère N, Laibe C (2010) BioModels Database: An enhanced, curated and annotated resource for published quantitative kinetic models. BMC Syst Biol., 4:92.
  // biomodels.db:MODEL8716097586
  // biomodels.db:BIOMD0000000180
  // isDescribedBy pubmed:17892872
  // hasTaxon taxonomy:131567
  // isVersionOf GO:0051270
  // hasProperty mamo:MAMO_0000046

  // Compartments:
  compartment compartment = 1;

  // Species:
  substanceOnly species R1 in compartment = 0.01;  // CHEBI:33699 kegg.compound:C00046
  substanceOnly species P1 in compartment = 0.1;  // isVersionOf CHEBI:36080 kegg.compound:C00017
  substanceOnly species P1_prime in compartment = 0.1;  // isVersionOf CHEBI:36080 kegg.compound:C00017
  substanceOnly species R2 in compartment = 0.1;  // CHEBI:33699 kegg.compound:C00046
  substanceOnly species P2 in compartment = 1;  // isVersionOf CHEBI:36080 kegg.compound:C00017
  substanceOnly species P2_prime in compartment = 1;  // isVersionOf CHEBI:36080 kegg.compound:C00017
  substanceOnly species P3_prime in compartment = 0.1;  // isVersionOf CHEBI:36080 kegg.compound:C00017
  substanceOnly species P4_prime in compartment = 0.1;  // isVersionOf CHEBI:36080 kegg.compound:C00017

  // Parameters:
  d_R1 = 0.23521;
  sP1R1 = 0.47305;
  d_P1 = 0.22367;
  sP1_prime_P1 = 0.28687;
  s1 = 0.4;
  n = 9;
  s3 = 0.2;
  d_P1_prime = 0.37048;
  d_R2 = 0.23521;
  sP2R2 = 0.47305;
  d_P2 = 0.22367;
  sP2_prime_P2 = 0.28687;
  s2 = 0.3;
  d_P2_prime = 0.37048;
  sP3_prime_P2_prime = 0.5;
  d_P3_prime = 0.37048;
  d_P4_prime = 0.37048;
  sP4_prime_P1_prime = 0.5;

  // Assignment rules:
  i2 := piecewise(1, (time >= 175) && (time <= 225), 0);
  i1 := piecewise(1, (time >= 50) && (time <= 100), 0);

  // Reactions:
  React1: => R1; i1;  // isVersionOf GO:0009299
  React2: R1 => ; d_R1*R1;  // isVersionOf GO:0006402
  React3: => P1; sP1R1*R1;  // modifiers: R1; GO:0006412
  React4: P1 => ; d_P1*P1;  // isVersionOf GO:0030163
  React5: => P1_prime; sP1_prime_P1*P1;  // modifiers: P1; isVersionOf GO:0006464
  React6: => P1_prime; s1/(1 + P2_prime^n);  // modifiers: P2_prime
  React7: => P1_prime; s3/(1 + P3_prime^n);  // modifiers: P3_prime
  React8: P1_prime => ; d_P1_prime*P1_prime;  // isVersionOf GO:0030163
  React9: => R2; i2;  // isVersionOf GO:0009299
  React10: R2 => ; d_R2*R2;  // isVersionOf GO:0006402
  React11: => P2; sP2R2*R2;  // modifiers: R2; GO:0006412
  React12: P2 => ; d_P2*P2;  // isVersionOf GO:0030163
  React13: => P2_prime; sP2_prime_P2*P2;  // modifiers: P2; isVersionOf GO:0006464
  React14: => P2_prime; s2/(1 + P1_prime^n);  // modifiers: P1_prime
  React15: P2_prime => ; d_P2_prime*P2_prime;  // isVersionOf GO:0030163
  React16: => P3_prime; sP3_prime_P2_prime*(P2_prime^n/(1 + P2_prime^n));  // modifiers: P2_prime
  React17: P3_prime => ; d_P3_prime*P3_prime;  // isVersionOf GO:0030163
  React18: -> P2_prime; s3/(1 + P4_prime^n);  // modifiers: P4_prime
  React19: -> P4_prime; sP4_prime_P1_prime*(P1_prime^n/(1 + P1_prime^n));  // modifiers: P1_prime
  React20: P4_prime -> ; d_P4_prime*P4_prime;  // isVersionOf GO:0030163

  // Unit definitions:
  unit substance = item; substance is "dimensionless";
end
