// SBML level 2 version 3

model MDCKII_Transport()
  // Bartholome2007_MDCKII
  // SBML model exported from PottersWheel on 2007-09-19 15:35:47.
  // The values for parameters and the inital concentrations of this model where directly provided by the main author:
  // Parameter values
  // parameter value unit
  // p1 0.0025 1/min
  // p2 0.0784 1/min
  // p3 0.0013 1/min
  // p4 0.0827 1/min
  // p5 0.0091 1/min
  // p6 0.000064 1/(nmole*min)
  // p7 0.0397 1/min
  // p8 1000 nmole
  // p9 0.0098 1/(nmole*min)
  // p10 1.6 1/min
  // p11 1000 nmole
  // p12 0.0003 ml/min
  // The basal chamber volume was taken as 1 ml, the apical as 1.5. As starting values x1 was set to 88 nmole, all other species to 0.
  // To the extent possible under law, all copyright and related or neighbouring rights to this encoded model have been dedicated to the public domain worldwide. Please refer to CC0 Public Domain Dedication for more information.
  // In summary, you are entitled to use this encoded model in absolutely any manner you deem suitable, verbatim, or with modification, alone or embedded it in a larger context, redistribute it, commercially or not, in a restricted way or not.
  // To cite BioModels Database, please use: Li C, Donizelli M, Rodriguez N, Dharuri H, Endler L, Chelliah V, Li L, He E, Henry A, Stefan MI, Snoep JL, Hucka M, Le Novère N, Laibe C (2010) BioModels Database: An enhanced, curated and annotated resource for published quantitative kinetic models. BMC Syst Biol., 4:92.
  // biomodels.db:MODEL0212154960
  // biomodels.db:BIOMD0000000197
  // isDescribedBy pubmed:17548463
  // hasTaxon taxonomy:40674
  // isVersionOf GO:0060341
  // hasProperty mamo:MAMO_0000046

  // Compartments:
  compartment basolat = 1; basolat is "basolateral extrocellular space";  // GO:0005615
  compartment cell = 1; cell is "intracellular";  // GO:0005623
  compartment apical = 1.5; apical is "apical extracellular space";  // GO:0005615

  // Species:
  substanceOnly species free_basolateral_BSP in basolat = 88;  // kegg.compound:C11363 CHEBI:63836
  substanceOnly species basolateral_bound_BSP in basolat = 0;  // kegg.compound:C11363 CHEBI:63836
  substanceOnly species free_intracellular_BSP in cell = 0;  // kegg.compound:C11363 CHEBI:63836
  substanceOnly species bound_intracellular_BSP in cell = 0;  // kegg.compound:C11363 CHEBI:63836
  substanceOnly species apical_BSP in apical = 0;  // kegg.compound:C11363 CHEBI:63836
  substanceOnly species $BSP_tot in apical; BSP_tot is "total BSP";  // kegg.compound:C11363 CHEBI:63836
  substanceOnly species $BSP_cell in cell; BSP_cell is "intracellular BSP";  // kegg.compound:C11363 CHEBI:63836

  // Parameters:
  p1 = 0.0025 permin;
  p2 = 0.0784 permin;
  p3 = 0.0013 permin;
  p4 = 0.0827 permin;
  p5 = 0.0091 permin;
  p6 = 6.4e-5 per_nmole_per_ml;
  p7 = 0.0397 permin;
  p8 = 1000 substance;
  p9 = 0.0098 per_nmole_per_ml;
  p10 = 1.6 permin;
  p11 = 1000 substance;
  p12 = 0.0003 ml_per_min;

  // Assignment rules:
  BSP_tot := free_basolateral_BSP + basolateral_bound_BSP + free_intracellular_BSP + bound_intracellular_BSP + apical_BSP;
  BSP_cell := free_intracellular_BSP + bound_intracellular_BSP;

  // Reactions:
  OATP1B3: free_basolateral_BSP => free_intracellular_BSP; p1*free_basolateral_BSP; OATP1B3 is "OATP1B3 mediated import";  // isVersionOf GO:0006810
  ABCC2: free_intracellular_BSP => apical_BSP; p2*free_intracellular_BSP; ABCC2 is "ABCC2 mediated export";  // isVersionOf kegg.pathway:hsa02010 GO:0015415
  endo_in_bl: free_basolateral_BSP => free_intracellular_BSP; p3*free_basolateral_BSP; endo_in_bl is "endogenous basolateral import";  // isVersionOf GO:0006810
  endo_ex_bl: free_intracellular_BSP => free_basolateral_BSP; p4*free_intracellular_BSP; endo_ex_bl is "endogenous basolateral export";  // isVersionOf GO:0006810
  endo_ex_ap: free_intracellular_BSP => apical_BSP; p5*free_intracellular_BSP; endo_ex_ap is "endogenous apical export";  // isVersionOf GO:0006810
  bl_BSP_binding: free_basolateral_BSP => basolateral_bound_BSP; p6*free_basolateral_BSP*(p8 - basolateral_bound_BSP); bl_BSP_binding is "basolateral BSP binding";  // isVersionOf GO:0005488
  bl_BSP_dissoc: basolateral_bound_BSP => free_basolateral_BSP; p7*basolateral_bound_BSP; bl_BSP_dissoc is "basolateral BSP dissoc";
  cellular_BSP_binding: free_intracellular_BSP => bound_intracellular_BSP; p9*free_intracellular_BSP*(p11 - bound_intracellular_BSP);  // isVersionOf GO:0005488
  cellular_BSP_dissoc: bound_intracellular_BSP => free_intracellular_BSP; p10*bound_intracellular_BSP;
  paracell_transp: free_basolateral_BSP -> apical_BSP; p12*(free_basolateral_BSP/basolat - apical_BSP/apical); paracell_transp is "paracellular transport";  // isVersionOf GO:0006810

  // Unit definitions:
  unit substance = 1e-9 mole; substance is "nmole";
  unit volume = 1e-3 litre; volume is "ml";
  unit time = 60 second; time is "min";
  unit permin = 1 / (60 second);
  unit ml_per_min = 1e-3 litre / (60 second);
  unit per_nmole_per_ml = 1 / (1e-9 mole * 60 second);
end
