// SBML level 2 version 3

model testid()
  // Stone1996 - activation of soluble guanylate cyclase by nitric oxide
  // This features the two step binding of NO to soluble Guanylyl Cyclase as proposed by Stone JR, Marletta MA. Biochemistry (1996) 35(4):1093-9 . There is a fast step binding scheme and a slow step binding scheme. The difference lies in the binding of a NO to a non-heme site on sGC, which may not necessarily be the same site of binding during the initial binding. The rates have been directly used models.
  // This model is described in the article:
  // Spectral and kinetic studies on the activation of soluble guanylate cyclase by nitric oxide.
  // Stone JR, Marletta MA.
  // Biochemistry 1996 Jan; 35(4): 1093-1099
  // Abstract:
  // The soluble form of guanylate cyclase (sGC) is the only definitive receptor for the signaling agent nitric oxide (.NO). The enzyme is a heterodimer of homologous subunits in which each subunit binds 1 equiv of 5-coordinate high-spin heme. .NO increases the Vmax of sGC up to 400-fold and has previously been shown to bind to the heme to form a 5-coordinate complex. Using stopped-flow spectrophotometry, it is demonstrated that the binding of .NO to the heme of sGC is a complex process. .NO first binds to the heme to form a 6-coordinate nitrosyl complex, which then converts to a 5-coordinate nitrosyl complex through one of two ways. For 28 +/- 4% of the heme, the 6-coordinate nitrosyl complex rapidly (approximately 20 s-1) converts to the 5-coordinate complex. For the remaining 72 +/- 4% of the heme, the conversion of the 6-coordinate nitrosyl complex to a 5-coordinate nitrosyl complex is slow (0.1-1.0 s-1) and is dependent upon the interaction of .NO with an unidentified non-heme site on the protein. The heme (200 nM) was completely converted to the 5-coordinate state with as little as 500 nM .NO, and the equilibrium dissociation constant of .NO for activating the enzyme was determined to be < or = 250 nM. Gel-filtration analysis indicates that the binding of .NO to the heme has no effect on the native molecular mass of the protein. Correlation of electronic absorption spectra with activity measurements indicates that the 5-coordinate nitrosyl form of the enzyme is activated relative to the resting 5-coordinate ferrous form of the enzyme.
  // This model is hosted on BioModels Database and identified by: BIOMD0000000198.
  // To cite BioModels Database, please use: BioModels Database: An enhanced, curated and annotated resource for published quantitative kinetic models.
  // To the extent possible under law, all copyright and related or neighbouring rights to this encoded model have been dedicated to the public domain worldwide. Please refer to CC0 Public Domain Dedication for more information.
  // biomodels.db:MODEL4779732381
  // biomodels.db:BIOMD0000000198
  // isDescribedBy pubmed:8573563
  // isVersionOf GO:0007263 GO:0031282
  // hasTaxon taxonomy:9913
  // hasProperty mamo:MAMO_0000046

  // Compartments:
  compartment cytosol = 1;  // GO:0005829

  // Species:
  species $NO in cytosol = 0.5;  // CHEBI:16480 kegg.compound:C00533
  species sGCfast in cytosol = 0.112;  // hasVersion uniprot:P19687 uniprot:P16068
  species NO_sGCfast in cytosol = 0;  // hasPart CHEBI:16480 uniprot:P19687 uniprot:P16068
  species NO_sGCfast_6coord in cytosol = 0;  // hasPart CHEBI:16480 uniprot:P19687 uniprot:P16068
  species NO_sGCfast_5coord in cytosol = 0;  // hasPart CHEBI:16480 uniprot:P19687 uniprot:P16068
  species sGCslow in cytosol = 0.288;  // hasPart uniprot:P19687 uniprot:P16068
  species NO_sGCslow in cytosol = 0;  // hasPart CHEBI:16480 uniprot:P19687 uniprot:P16068
  species NO_sGCslow_6coord in cytosol = 0;  // hasPart CHEBI:16480 uniprot:P19687 uniprot:P16068
  species NO_sGCslow_6coord_NO_int in cytosol = 0;  // hasPart CHEBI:16480 uniprot:P19687 uniprot:P16068
  species NO_sGCslow_5coord in cytosol = 0;  // hasPart CHEBI:16480 uniprot:P19687 uniprot:P16068
  species NO_sGC_5coord_tot in cytosol;  // hasPart CHEBI:16480 uniprot:P16068 uniprot:P19687
  species sGC_inact_tot in cytosol;  // hasPart CHEBI:16480 uniprot:P16068 uniprot:P19687

  // Parameters:
  k1 = 700 peruMpersec;
  k2 = 800 persec;
  k3 = 850 persec;
  k4 = 20 persec;
  k5 = 0.2 persec;
  k6 = 700 peruMpersec;
  k7 = 800 persec;
  k8 = 850 persec;
  k9 = 5 peruMpersec;
  k10 = 25 persec;
  k11 = 1.6 persec;
  k12 = 0.02 persec;
  // micromolar extinction coefficient of the 5-coordinate ferrous species at 431 nm
  e5c = 0.11 peruMpercm; e5c is "ext_5coord";
  // micromolar extinction coefficient of the 5-coordinate ferrous nitrosyl species at 431 nm
  e5c_NO = 0.025 peruMpercm; e5c_NO is "ext_5coord_NO";
  // micromolar extinction coefficient of the 6-coordinate ferrous nitrosyl species at 431 nm
  e6c_NO = 0.064 peruMpercm; e6c_NO is "ext_6coord_NO";
  // extinction at 431 nm
  ext has percm; ext is "extinction";

  // Assignment rules:
  NO_sGC_5coord_tot := NO_sGCfast_5coord + NO_sGCslow_5coord;
  sGC_inact_tot := sGCfast + NO_sGCfast + NO_sGCfast_6coord + sGCslow + NO_sGCslow + NO_sGCslow_6coord + NO_sGCslow_6coord_NO_int;
  ext := e5c*(sGCfast + NO_sGCfast + sGCslow + NO_sGCslow) + e5c_NO*(NO_sGCfast_5coord + NO_sGCslow_5coord) + e6c_NO*(NO_sGCfast_6coord + NO_sGCslow_6coord + NO_sGCslow_6coord_NO_int);

  // Reactions:
  r1fast: $NO + sGCfast -> NO_sGCfast; cytosol*(k1*NO*sGCfast - k2*NO_sGCfast);
  r2fast: NO_sGCfast => NO_sGCfast_6coord; k3*cytosol*NO_sGCfast;
  r3fast: NO_sGCfast_6coord -> NO_sGCfast_5coord; cytosol*(k4*NO_sGCfast_6coord - k5*NO_sGCfast_5coord);
  r1slow: $NO + sGCslow -> NO_sGCslow; cytosol*(k6*NO*sGCslow - k7*NO_sGCslow);
  r2slow: NO_sGCslow => NO_sGCslow_6coord; k8*cytosol*NO_sGCslow;
  r3slow: $NO + NO_sGCslow_6coord -> NO_sGCslow_6coord_NO_int; cytosol*(k9*NO*NO_sGCslow_6coord - k10*NO_sGCslow_6coord_NO_int);
  r4slow: NO_sGCslow_6coord_NO_int -> NO_sGCslow_5coord; cytosol*(k11*NO_sGCslow_6coord_NO_int - k12*NO_sGCslow_5coord);

  // Unit definitions:
  unit substance = 1e-6 mole; substance is "micromole";
  unit peruMpersec = litre / (1e-6 mole * second);
  unit uM = 1e-6 mole / litre;
  unit persec = 1 / second;
  unit peruMpercm = litre / (1e-6 mole * 0.01 metre);
  unit percm = 1 / (0.01 metre);
end
