// SBML level 2 version 4

model Romond1999_CellCycle()
  // The model reproduces Fig 3 of the paper. Model successfully reproduced using MathSBML and Jarnac.
  // To the extent possible under law, all copyright and related or neighbouring rights to this encoded model have been dedicated to the public domain worldwide. Please refer to CC0 Public Domain Dedication for more information.
  // In summary, you are entitled to use this encoded model in absolutely any manner you deem suitable, verbatim, or with modification, alone or embedded it in a larger context, redistribute it, commercially or not, in a restricted way or not.
  // To cite BioModels Database, please use: Li C, Donizelli M, Rodriguez N, Dharuri H, Endler L, Chelliah V, Li L, He E, Henry A, Stefan MI, Snoep JL, Hucka M, Le Novère N, Laibe C (2010) BioModels Database: An enhanced, curated and annotated resource for published quantitative kinetic models. BMC Syst Biol., 4:92.
  // biomodels.db:MODEL1111382868
  // biomodels.db:BIOMD0000000207
  // isDescribedBy pubmed:10415827
  // hasTaxon taxonomy:2759
  // isVersionOf kegg.pathway:hsa04110 GO:0000278
  // hasProperty mamo:MAMO_0000046

  // Compartments:
  compartment compartment = 1;

  // Species:
  species cyclinB in compartment = 2;  // substance in micromole; isVersionOf uniprot:Q8WWL7
  substanceOnly species M1 in compartment = 1; M1 is "cdk1";  // substance in dimensionless; isVersionOf uniprot:P06493
  substanceOnly species ubiquitin_ligase in compartment = 0;  // substance in dimensionless; isVersionOf uniprot:Q9UBT2
  species cyclinE in compartment = 0;  // substance in micromole; isVersionOf uniprot:P24864
  substanceOnly species M2 in compartment = 0; M2 is "cdk2";  // substance in dimensionless; isVersionOf uniprot:P24941
  substanceOnly species Ubiquitin_ligase_2 in compartment = 0;  // substance in dimensionless; isVersionOf uniprot:Q9UBT2

  // Parameters:
  V1 has min_1;
  Kc1 = 0.5 uM;
  V_M1 = 0.3 min_1;
  V3 has min_1;
  V_M3 = 0.1 min_1;
  U1 has min_1;
  Kc2 = 0.5 uM;
  U_M1 = 0.3 min_1;
  U3 has min_1;
  U_M3 = 0.1 min_1;
  vi1 = 0.05 uM_min_1;
  Kim1 = 0.03 dimensionless;
  vd1 = 0.025 uM_min_1;
  K_d1 = 0.02 uM;
  kd1 = 0.001 min_1;
  K1 = 0.01 dimensionless;
  V2 = 0.15 min_1;
  K2 = 0.01 dimensionless;
  K3 = 0.01 dimensionless;
  V4 = 0.05 min_1;
  K4 = 0.01 dimensionless;
  vi2 = 0.05 uM_min_1;
  Kim2 = 0.03 dimensionless;
  vd2 = 0.025 uM_min_1;
  K_d2 = 0.02 uM;
  kd2 = 0.001 min_1;
  H1 = 0.01 dimensionless;
  U2 = 0.15 min_1;
  H2 = 0.01 dimensionless;
  H3 = 0.01 dimensionless;
  U4 = 0.05 min_1;
  H4 = 0.01 dimensionless;

  // Assignment rules:
  V1 := cyclinB/(Kc1 + cyclinB)*V_M1;
  V3 := M1*V_M3;
  U1 := cyclinE/(Kc2 + cyclinE)*U_M1;
  U3 := M2*U_M3;

  // Rate rules:
  M1' = V1*(1 - M1)/(K1 + (1 - M1)) - V2*M1/(K2 + M1);
  ubiquitin_ligase' = V3*(1 - ubiquitin_ligase)/(K3 + (1 - ubiquitin_ligase)) - V4*ubiquitin_ligase/(K4 + ubiquitin_ligase);
  M2' = U1*(1 - M2)/(H1 + (1 - M2)) - U2*M2/(H2 + M2);
  Ubiquitin_ligase_2' = U3*(1 - Ubiquitin_ligase_2)/(H3 + (1 - Ubiquitin_ligase_2)) - U4*Ubiquitin_ligase_2/(H4 + Ubiquitin_ligase_2);

  // Reactions:
  cdk2_mediated_cyclinB_synthesis: => cyclinB; compartment*vi1*Kim1/(Kim1 + M2);  // modifiers: M2; isVersionOf GO:0004693
  R2: cyclinB => ; compartment*vd1*ubiquitin_ligase*cyclinB/(K_d1 + cyclinB); R2 is "Ubiquitin ligase mediated cyclinB degradation";  // modifiers: ubiquitin_ligase; isVersionOf GO:0008054
  cyclinB_degradation: cyclinB => ; compartment*kd1*cyclinB;  // isVersionOf GO:0008054
  cyclinE_synthesis: => cyclinE; compartment*vi2*Kim2/(Kim2 + M1);  // modifiers: M1
  R9: cyclinE => ; compartment*vd2*Ubiquitin_ligase_2*cyclinE/(K_d2 + cyclinE); R9 is "Ubiquitin ligase mediated cyclinE degradation";  // modifiers: Ubiquitin_ligase_2; isVersionOf GO:0008054
  cyclinE_degradation: cyclinE => ; compartment*kd2*cyclinE;  // isVersionOf GO:0008054

  // Unit definitions:
  unit time = 60 second; time is "minute";
  unit uM = 1e-6 mole / litre;
  unit micromole = 1e-6 mole;
  unit min_1 = 1 / (60 second);
  unit uM_min_1 = 1e-6 mole / (litre * 60 second);
end
