// SBML level 2 version 3

model Deineko2003_CellCycle()
  // The model reproduces Fig 3 of the paper corresponding to the transition to S phase. Units have not been defined for this model because the paper mentions the use of arbitrary units for the various species and parameters. Model reproduced using MathSBML.
  // To the extent possible under law, all copyright and related or neighbouring rights to this encoded model have been dedicated to the public domain worldwide. Please refer to CC0 Public Domain Dedication for more information.
  // In summary, you are entitled to use this encoded model in absolutely any manner you deem suitable, verbatim, or with modification, alone or embedded it in a larger context, redistribute it, commercially or not, in a restricted way or not.
  // To cite BioModels Database, please use: Li C, Donizelli M, Rodriguez N, Dharuri H, Endler L, Chelliah V, Li L, He E, Henry A, Stefan MI, Snoep JL, Hucka M, Le Novère N, Laibe C (2010) BioModels Database: An enhanced, curated and annotated resource for published quantitative kinetic models. BMC Syst Biol., 4:92.
  // biomodels.db:MODEL1475866846
  // biomodels.db:BIOMD0000000208
  // isDescribedBy pubmed:14582399
  // hasTaxon taxonomy:40674
  // isVersionOf kegg.pathway:hsa04110 GO:0000278
  // hasProperty mamo:MAMO_0000046

  // Compartments:
  compartment compartment = 1;

  // Species:
  species y1 in compartment = 0.014; y1 is "E2F";  // isVersionOf uniprot:Q01094
  species y2 in compartment = 0.006; y2 is "pRB";  // isVersionOf uniprot:P06400
  species y3 in compartment = 0; y3 is "Phosphorylated pRB";  // isVersionOf uniprot:P06400
  species y4 in compartment = 0; y4 is "inactive cycE_cdk2";  // hasPart uniprot:P24941 uniprot:P24864
  species y5 in compartment = 0.0001; y5 is "active cycE_cdk2";  // hasPart uniprot:P24941 uniprot:P24864
  species y6 in compartment = 0; y6 is "AP-1";  // isVersionOf uniprot:P05412

  // Parameters:
  emax = 2;
  k1 = 1;
  k1_prime = 1;
  k1_double_prime = 10;
  phi1 = 0.1;
  k2 = 1;
  k3 = 0.4;
  phi2 = 0.01;
  phi3 = 0.1;
  k4 = 0.09;
  k4_double_prime = 0.1;
  k4i = 1;
  k4a = 2;
  phi4i = 0.01;
  phi4a = 0.01;
  k6 = 0;
  phi6 = 0.1;

  // Assignment rules:
  F6 := piecewise(0.044, time <= 60, 0);

  // Reactions:
  R1: => y1; emax*k1*y1/(k1*y1 + (k1_prime + k1_double_prime*y1)*y2);  // modifiers: y2; isVersionOf GO:0006412
  R2: y1 => ; phi1*y1;  // isVersionOf GO:0019941
  R3: => y2; k2*y1;  // modifiers: y1; isVersionOf GO:0003700 GO:0045727
  R4: y2 => y3; k3*y2*y5;  // modifiers: y5; isVersionOf GO:0004693
  R5: y2 => ; phi2*y2;  // isVersionOf GO:0019941
  R6: y3 => ; phi3*y3;  // isVersionOf GO:0019941
  R7: => y4; k4*y1;  // modifiers: y1; isVersionOf GO:0003700 GO:0045727
  R8: => y4; k4_double_prime*y6;  // modifiers: y6; isVersionOf GO:0003700 GO:0045727
  R9: y4 => y5; k4i*y4*y5;  // isVersionOf GO:0000082
  R10: y5 => y4; k4a*y5;
  R11: y4 => ; phi4i*y4;
  R12: y5 => ; phi4a*y5;  // isVersionOf GO:0019941
  R13: => y6; k6*y1;  // modifiers: y1; isVersionOf GO:0045727 GO:0003700
  R14: => y6; F6;  // isVersionOf GO:0006412
  R15: y6 => ; phi6*y6;  // isVersionOf GO:0019941
end
