// SBML level 2 version 3

function function_1(Ag, K1, Ifn_Prot, K2, a2)
  a2*(Ag/(K1 + Ag))*(Ifn_Prot/(K2 + Ifn_Prot));
end
function_1 is "Rate Law for Tbet IFNg dependent transcription";

function function_3(a1)
  a1;
end
function_3 is "Rate Law for Tbet basal expression";

function function_2(a3, Rec_Prot)
  a3*Rec_Prot;
end
function_2 is "Rate Law for Rec dependent transcription of TBet";

function Translation_rate_law(b, mRNA)
  b*mRNA;
end

function Rate_Law_for_Rec_Transcription(a4, Tbet_Prot, K4, Ag)
  a4*Tbet_Prot*(K4/(K4 + Ag));
end

function Rate_Law_for_IFN_transcription(a5, Tbet_Prot, K5, Rec_Prot, K6, Ag, K7)
  a5*(Tbet_Prot/(K5 + Tbet_Prot))*(Rec_Prot/(K6 + Rec_Prot))*(Ag/(K7 + Ag));
end

model Schulz2009_Th1_differentiation()
  // This a model from the article:
  // Sequential polarization and imprinting of type 1 T helper lymphocytes by interferon-gamma and interleukin-12.
  // Schulz EG, Mariani L, Radbruch A, Höfer T. Immunity.2009;30(5):666-8. 19409816,
  // Abstract:
  // Differentiation of naive T lymphocytes into type I T helper (Th1) cells requires interferon-gamma and interleukin-12. It is puzzling that interferon-gamma induces the Th1 transcription factor T-bet, whereas interleukin-12 mediates Th1 cell lineage differentiation. We use mathematical modeling to analyze the expression kinetics of T-bet, interferon-gamma, and the IL-12 receptor beta2 chain (IL-12Rbeta2) during Th1 cell differentiation, in the presence or absence of interleukin-12 or interferon-gamma signaling. We show that interferon-gamma induced initial T-bet expression, whereas IL-12Rbeta2 was repressed by T cell receptor (TCR) signaling. The termination of TCR signaling permitted upregulation of IL-12Rbeta2 by T-bet and interleukin-12 signaling that maintained T-bet expression. This late expression of T-bet, accompanied by the upregulation of the transcription factors Runx3 and Hlx, was required to imprint the Th cell for interferon-gamma re-expression. Thus initial polarization and subsequent imprinting of Th1 cells are mediated by interlinked, sequentially acting positive feedback loops of TCR-interferon-gamma-Stat1-T-bet and interleukin-12-Stat4-T-bet signaling.
  // The original model was created by:
  // Edda G. Schulz
  // schulz@drfz.de
  // Theoretical Biophysics, Institute of Biology, Humboldt Universität, Invalidenstrasse 42, 10115 Berlin, Germany.
  // This model originates from BioModels Database: A Database of Annotated Published Models. It is copyright (c) 2005-2009 The BioModels Team.
  // For more information see the terms of use.
  // To cite BioModels Database, please use Le Novère N., Bornstein B., Broicher A., Courtot M., Donizelli M., Dharuri H., Li L., Sauro H., Schilstra M., Shapiro B., Snoep J.L., Hucka M. (2006) BioModels Database: A Free, Centralized Database of Curated, Published, Quantitative Kinetic Models of Biochemical and Cellular Systems Nucleic Acids Res., 34: D689-D691.
  // biomodels.db:MODEL9284712021
  // biomodels.db:BIOMD0000000215
  // isDescribedBy pubmed:19409816
  // hasTaxon taxonomy:10090
  // isVersionOf GO:0030217
  // hasProperty mamo:MAMO_0000046

  // Compartments:
  compartment compartment = 1;  // isVersionOf GO:0005623

  // Species:
  species Tbet_mRNA in compartment = 0.044;  // isVersionOf CHEBI:33699 kegg.compound:C00046; encodes uniprot:Q9JKD8
  species Ifn_mRNA in compartment = 0;  // isVersionOf CHEBI:33699 kegg.compound:C00046; encodes uniprot:P01580
  species $Ag in compartment;  // isVersionOf GO:0050862
  species Ifn_Prot in compartment = 0;  // isVersionOf uniprot:P01580
  species Rec_Prot in compartment = 0;  // isVersionOf uniprot:P97378
  species Tbet_Prot in compartment = 44;  // isVersionOf uniprot:Q9JKD8
  species Rec_mRNA in compartment = 0;  // encodes uniprot:P97378; isVersionOf CHEBI:33699 kegg.compound:C00046

  // Assignment rules:
  Ag := 1 - time^10/(34^10 + time^10);

  // Reactions:
  vtrnldeg: => Tbet_mRNA; compartment*function_1(Ag, K1, Ifn_Prot, K2, a2); vtrnldeg is "Tbet IFN dependend transcription";  // modifiers: Ag, Ifn_Prot; isVersionOf GO:0003700 GO:0009299
    K1 = 0.46; K2 = 2.1; a2 = 0.42;
  reaction_1: => Tbet_mRNA; compartment*function_2(a3, Rec_Prot); reaction_1 is "Tbet Receptor dependent transcription";  // modifiers: Rec_Prot; isVersionOf GO:0003700 GO:0009299
    a3 = 0.00051;
  Tbet_basal_expression: => Tbet_mRNA; compartment*function_3(a1);  // isVersionOf GO:0009299
    a1 = 0.044;
  Tbet_mRNA_degradation: Tbet_mRNA => ; compartment*gamma_Tbet*Tbet_mRNA;  // isVersionOf GO:0006402
    gamma_Tbet = 1;
  Tbet_protein_degradation: Tbet_Prot => ; compartment*delta_Tbet*Tbet_Prot;  // isVersionOf GO:0030163
    delta_Tbet = 0.1;
  Rec_mRNA_degradation: Rec_mRNA => ; compartment*gamma_Rec*Rec_mRNA;  // isVersionOf GO:0006402
    gamma_Rec = 1;
  Rec_Prot_degradation: Rec_Prot => ; compartment*delta_Rec*Rec_Prot;  // isVersionOf GO:0030163
    delta_Rec = 0.1;
  IFN_mRNA_degradation: Ifn_mRNA => ; compartment*gamma_IFN*Ifn_mRNA;  // isVersionOf GO:0006402
    gamma_IFN = 1;
  IFN_Prot_degradation: Ifn_Prot => ; compartment*delta_IFN*Ifn_Prot;  // isVersionOf GO:0030163
    delta_IFN = 1;
  Tbet_Translation: => Tbet_Prot; compartment*Translation_rate_law(Tbet_Translation_b, Tbet_mRNA);  // modifiers: Tbet_mRNA; isVersionOf GO:0006412
    Tbet_Translation_b = 100;
  IFN_tranlation: => Ifn_Prot; compartment*Translation_rate_law(IFN_tranlation_b, Ifn_mRNA);  // modifiers: Ifn_mRNA; isVersionOf GO:0006412
    IFN_tranlation_b = 100;
  Rec_translation: => Rec_Prot; compartment*Translation_rate_law(Rec_translation_b, Rec_mRNA);  // modifiers: Rec_mRNA; isVersionOf GO:0006412
    Rec_translation_b = 100;
  Rec_Transcription: => Rec_mRNA; compartment*Rate_Law_for_Rec_Transcription(a4, Tbet_Prot, K4, Ag);  // modifiers: Tbet_Prot, Ag; isVersionOf GO:0006351
    a4 = 0.0028; K4 = 0.013;
  IFN_transcription: => Ifn_mRNA; compartment*Rate_Law_for_IFN_transcription(a5, Tbet_Prot, K5, Rec_Prot, K6, Ag, K7);  // modifiers: Tbet_Prot, Rec_Prot, Ag; isVersionOf GO:0006351
    a5 = 3.7; K5 = 0.029; K6 = 66; K7 = 0.014;

  // Unit definitions:
  unit time = 3600 second;
end
