// SBML level 2 version 3

model Bruggeman2005_AmmoniumAssimilation()
  // This a model from the article:
  // The multifarious short-term regulation of ammonium assimilation of Escherichia coli: dissection using an in silico replica.
  // Bruggeman FJ, Boogerd FC, Westerhoff HV. FEBS J. 2005 Apr;272(8):1965-85. 15819889 ,
  // Abstract:
  // Ammonium assimilation in Escherichia coli is regulated through multiple mechanisms (metabolic, signal transduction leading to covalent modification, transcription, and translation), which (in-)directly affect the activities of its two ammonium-assimilating enzymes, i.e. glutamine synthetase (GS) and glutamate dehydrogenase (GDH). Much is known about the kinetic properties of the components of the regulatory network that these enzymes are part of, but the ways in which, and the extents to which the network leads to subtle and quasi-intelligent regulation are unappreciated. To determine whether our present knowledge of the interactions between and the kinetic properties of the components of this network is complete - to the extent that when integrated in a kinetic model it suffices to calculate observed physiological behaviour - we now construct a kinetic model of this network, based on all of the kinetic data on the components that is available in the literature. We use this model to analyse regulation of ammonium assimilation at various carbon statuses for cells that have adapted to low and high ammonium concentrations. We show how a sudden increase in ammonium availability brings about a rapid redirection of the ammonium assimilation flux from GS/glutamate synthase (GOGAT) to GDH. The extent of redistribution depends on the nitrogen and carbon status of the cell. We develop a method to quantify the relative importance of the various regulators in the network. We find the importance is shared among regulators. We confirm that the adenylylation state of GS is the major regulator but that a total of 40% of the regulation is mediated by ADP (22%), glutamate (10%), glutamine (7%) and ATP (1%). The total steady-state ammonium assimilation flux is remarkably robust against changes in the ammonium concentration, but the fluxes through GS and GDH are completely nonrobust. Gene expression of GOGAT above a threshold value makes expression of GS under ammonium-limited conditions, and of GDH under glucose-limited conditions, sufficient for ammonium assimilation.
  // This version of the model originates from JWS online . The original model can be retrieved here .
  // This model originates from BioModels Database: A Database of Annotated Published Models. It is copyright (c) 2005-2009 The BioModels Team.
  // To the extent possible under law, all copyright and related or neighbouring rights to this encoded model have been dedicated to the public domain worldwide. Please refer to CC0 Public Domain Dedication for more information.
  // In summary, you are entitled to use this encoded model in absolutely any manner you deem suitable, verbatim, or with modification, alone or embedded it in a larger context, redistribute it, commercially or not, in a restricted way or not..
  // To cite BioModels Database, please use Le Novère N., Bornstein B., Broicher A., Courtot M., Donizelli M., Dharuri H., Li L., Sauro H., Schilstra M., Shapiro B., Snoep J.L., Hucka M. (2006) BioModels Database: A Free, Centralized Database of Curated, Published, Quantitative Kinetic Models of Biochemical and Cellular Systems Nucleic Acids Res., 34: D689-D691.
  // biomodels.db:MODEL3579243073
  // biomodels.db:BIOMD0000000217
  // isDescribedBy pubmed:15819889
  // isVersionOf GO:0019676
  // hasTaxon taxonomy:562
  // hasProperty mamo:MAMO_0000046

  // Compartments:
  compartment compartment = 1;

  // Species:
  species PII in compartment = 0.003;  // isVersionOf uniprot:P0A9Z1
  species $UTP in compartment = 0.5;  // isVersionOf CHEBI:15713 kegg.compound:C00075
  species PIIUMP in compartment = 0;
  species $PPi in compartment = 0.05;  // isVersionOf CHEBI:18361 kegg.compound:C00013
  species GLN in compartment = 1;  // isVersionOf CHEBI:30011 kegg.compound:C00303
  species PIIUMP2 in compartment = 0;
  species PIIUMP3 in compartment = 0;
  species $UMP in compartment = 0.01;  // isVersionOf CHEBI:16695 kegg.compound:C00105
  species GS in compartment = 0.014;  // isVersionOf uniprot:P0A9C5
  species AMP in compartment = 0;  // isVersionOf CHEBI:16027 kegg.compound:C00020
  species $NH4 in compartment = 0.05;  // isVersionOf CHEBI:28938 kegg.compound:C01342
  species $KG in compartment = 0.2;  // isVersionOf uniprot:P0AEX3
  species $NADPH in compartment = 0.15;  // isVersionOf CHEBI:16474 kegg.compound:C00005
  species GLU in compartment = 1;  // isVersionOf CHEBI:16015 kegg.compound:C00025
  species $NADP in compartment = 0.05;  // isVersionOf CHEBI:18009 kegg.compound:C00006
  species AZGLU in compartment = 1;
  species ATP in compartment = 2.685;  // isVersionOf CHEBI:15422 kegg.compound:C00002
  species ADP in compartment = 2.685;  // isVersionOf CHEBI:16761 kegg.compound:C00008
  species $AZglu in compartment = 0.1;
  species AZGLN in compartment = 1;
  species $AZgln in compartment = 0.1;
  species $P_i in compartment = 10;  // isVersionOf CHEBI:43474

  // Parameters:
  UT = 0.0006;
  kcatut = 137;
  Kglnut = 0.07;
  Kutipii = 0.0018;
  Kutpii = 0.003;
  Kutpiiump = 0.0035;
  Kututp = 0.04;
  Kutippi = 0.1135;
  UR = 0.0006;
  kcatur = 5.5;
  Kurpiiump = 0.0023;
  Kurump = 8.4;
  Kglnur = 0.07;
  a1 = 1e-22;
  b1 = 0.5166;
  c1 = 0.5974;
  d1 = 0.0387;
  Vad = 0.5;
  Kadpiikg = 1.052e-5;
  Kadgln = 0.9714;
  Kadgs = 0.001703;
  e1 = 1e-22;
  f1 = 2.766;
  g1 = 3.323;
  h1 = 0.2148;
  i1 = 1e-22;
  j1 = 1e-22;
  k1 = 1e-22;
  l1 = 0.02316;
  m1 = 0.8821;
  n1 = 8.491;
  o1 = 0.8791;
  Vdead = 0.5;
  Kdeadpiikg = 2.274e-6;
  Kdeadgln = 0.04444;
  Kdeadpiiu = 1.805e-5;
  Kdeadgsa = 0.0002015;
  Vgdh = 360;
  Kgdhkg = 0.32;
  Kgdhnh = 1.1;
  Kgdhglu = 10;
  Kgdhnadph = 0.04;
  Kgdhnadp = 0.042;
  Keqgdh = 1290;
  Kgdhazglu = 2.5;
  Vgog = 85;
  Kgoggln = 0.175;
  Kgogkg = 0.007;
  Kgognadph = 0.0015;
  Kgogglu = 11;
  Kgognadp = 0.0037;
  Kgogaz = 0.65;
  Vgs = 600;
  aamp = 10;
  bamp = 2.3667;
  camp = 0.1012;
  damp = 10.8688;
  n1amp = 1.1456;
  n2amp = 19.2166;
  Kgseq = 460;
  Kgsatp = 0.35;
  Kgsglu = 4.1;
  Kgsnh = 0.1;
  Kgsadp = 0.0585;
  Kgspi = 3.7;
  Kgsgln = 5.65;
  Keq = 460 dimensionless;
  Vgludem = 120;
  Kgludemglu = 8;
  Kgludemeq = 1e10;
  Kgludemazglu = 0.5;
  Vglndem = 70;
  Kglndemgln = 2;
  Kglndemeq = 1e10;
  Kglndemazgln = 0.25;
  Vazglndem = 20;
  Kazglndemazgln = 1;
  Kazglndemeq = 1e10;
  Kazglndemazinter = 0.5;
  Vazgludem = 30;
  Kazgludemazglu = 0.3;
  Kazgludemeq = 1e10 dimensionless;
  Kazgludemazinter = 0.5 dimensionless;
  Vadp = 100;
  Kadp = 0.5;
  ATPtot = 5.37;
  GStot = 0.014;
  PIItot = 0.003;
  Kd1 = 0.005;
  Kd2 = 0.15;
  Kd3 = 0.15;
  Kd1piiump = 0.025;
  Kd2piiump = 0.15;
  Kd3piiump = 0.15;
  var vAPP_GS; vAPP_GS is "maxRateGS";
  var nAMP; nAMP is "AdenylationStateGS";

  // Assignment rules:
  vAPP_GS := aamp*camp/((1 + 12^n1amp*(AMP/(bamp*GStot))^n1amp)*(1 + 12^n2amp*(AMP/(damp*GStot))^n2amp))*Vgs;
  nAMP := 12*AMP/GStot;
  PIIKG1 := 3*PII*KG/Kd1/(1 + 3*KG/Kd1 + 3*KG^2/(Kd1*Kd2) + KG^3/(Kd1*Kd2*Kd3));
  PIIUMP3KG3 := PIIUMP3*KG^3/(Kd1piiump*Kd2piiump*Kd3piiump)/(1 + 3*KG/Kd1piiump + 3*KG^2/(Kd1piiump*Kd2piiump) + KG^3/(Kd1piiump*Kd2piiump*Kd3piiump));

  // Reactions:
  vut1: PII + $UTP -> PIIUMP + $PPi; compartment*(kcatut*UT*UTP*PII/(Kutipii*Kututp*(1 + GLN/Kglnut)*(1 + UTP/Kututp + (PII + PIIUMP + PIIUMP2)/Kutipii + UTP*(PII + PIIUMP + PIIUMP2)/(Kutipii*Kututp) + PPi*UTP*(PII + PIIUMP + PIIUMP2)/(Kutipii*Kutippi*Kututp) + Kutpii*(PIIUMP + PIIUMP2 + PIIUMP3)/(Kutipii*Kutpiiump))));  // modifiers: GLN, PIIUMP2, PIIUMP3; isVersionOf GO:0008773
  vur1: PIIUMP -> PII + $UMP; compartment*(kcatur*UR*PIIUMP/(Kurpiiump*(1 + Kglnur/GLN)*(1 + (1 + UMP/Kurump)*(PIIUMP + PIIUMP2 + PIIUMP3)/Kurpiiump)));  // modifiers: GLN, PIIUMP2, PIIUMP3; isVersionOf GO:0008773
  vut2: PIIUMP + $UTP -> PIIUMP2 + $PPi; compartment*(kcatut*UT*UTP*PIIUMP/(Kutipii*Kututp*(1 + GLN/Kglnut)*(1 + UTP/Kututp + (PII + PIIUMP + PIIUMP2)/Kutipii + UTP*(PII + PIIUMP + PIIUMP2)/(Kutipii*Kututp) + PPi*UTP*(PII + PIIUMP + PIIUMP2)/(Kutipii*Kutippi*Kututp) + Kutpii*(PIIUMP + PIIUMP2 + PIIUMP3)/(Kutipii*Kutpiiump))));  // modifiers: GLN, PII, PIIUMP3; isVersionOf GO:0008773
  vur2: PIIUMP2 -> PIIUMP + $UMP; compartment*(kcatur*UR*PIIUMP2/(Kurpiiump*(1 + Kglnur/GLN)*(1 + (1 + UMP/Kurump)*(PIIUMP + PIIUMP2 + PIIUMP3)/Kurpiiump)));  // modifiers: GLN, PIIUMP3; isVersionOf GO:0008773
  vut3: PIIUMP2 + $UTP -> PIIUMP3 + $PPi; compartment*(kcatut*UT*UTP*PIIUMP2/(Kutipii*Kututp*(1 + GLN/Kglnut)*(1 + UTP/Kututp + (PII + PIIUMP + PIIUMP2)/Kutipii + UTP*(PII + PIIUMP + PIIUMP2)/(Kutipii*Kututp) + PPi*UTP*(PII + PIIUMP + PIIUMP2)/(Kutipii*Kutippi*Kututp) + Kutpii*(PIIUMP + PIIUMP2 + PIIUMP3)/(Kutipii*Kutpiiump))));  // modifiers: GLN, PII, PIIUMP; isVersionOf GO:0008773
  vur3: PIIUMP3 -> PIIUMP2 + $UMP; compartment*(kcatur*UR*PIIUMP3/(Kurpiiump*(1 + Kglnur/GLN)*(1 + (1 + UMP/Kurump)*(PIIUMP + PIIUMP2 + PIIUMP3)/Kurpiiump)));  // modifiers: GLN, PIIUMP; isVersionOf GO:0008773
  vad: GS -> AMP; compartment*(Vad*GS*(b1*GLN/Kadgln + 3*a1*KG*PII/(Kadpiikg*Kd1*(1 + 3*KG/Kd1 + 3*KG^2/(Kd1*Kd2) + KG^3/(Kd1*Kd2*Kd3))) + 3*c1*KG*GLN*PII/(Kadgln*Kadpiikg*Kd1*(1 + 3*KG/Kd1 + 3*KG^2/(Kd1*Kd2) + KG^3/(Kd1*Kd2*Kd3))))/((Kadgs + GS)*(1 + GLN/Kadgln + 3*KG*PII/(Kadpiikg*Kd1*(1 + 3*KG/Kd1 + 3*KG^2/(Kd1*Kd2) + KG^3/(Kd1*Kd2*Kd3))) + 3*KG*GLN*PII/(d1*Kadgln*Kadpiikg*Kd1*(1 + 3*KG/Kd1 + 3*KG^2/(Kd1*Kd2) + KG^3/(Kd1*Kd2*Kd3))))));  // modifiers: GLN, PII, KG; isVersionOf GO:0018117
  vdead: AMP -> GS; compartment*(Vdead*AMP*(f1*GLN/Kdeadgln + 3*e1*KG*PII/(Kd1*Kdeadpiikg*(1 + 3*KG/Kd1 + 3*KG^2/(Kd1*Kd2) + KG^3/(Kd1*Kd2*Kd3))) + 3*h1*KG*GLN*PII/(Kd1*Kdeadgln*Kdeadpiikg*(1 + 3*KG/Kd1 + 3*KG^2/(Kd1*Kd2) + KG^3/(Kd1*Kd2*Kd3))) + g1*KG^3*PIIUMP3/(Kd1piiump*Kd2piiump*Kd3piiump*Kdeadpiiu*(1 + 3*KG/Kd1piiump + 3*KG^2/(Kd1piiump*Kd2piiump) + KG^3/(Kd1piiump*Kd2piiump*Kd3piiump))) + j1*KG^3*GLN*PIIUMP3/(Kd1piiump*Kd2piiump*Kd3piiump*Kdeadgln*Kdeadpiiu*(1 + 3*KG/Kd1piiump + 3*KG^2/(Kd1piiump*Kd2piiump) + KG^3/(Kd1piiump*Kd2piiump*Kd3piiump))) + 3*i1*KG^4*PII*PIIUMP3/(Kd1*Kd1piiump*Kd2piiump*Kd3piiump*Kdeadpiikg*Kdeadpiiu*(1 + 3*KG/Kd1 + 3*KG^2/(Kd1*Kd2) + KG^3/(Kd1*Kd2*Kd3))*(1 + 3*KG/Kd1piiump + 3*KG^2/(Kd1piiump*Kd2piiump) + KG^3/(Kd1piiump*Kd2piiump*Kd3piiump))) + 3*k1*KG^4*GLN*PII*PIIUMP3/(Kd1*Kd1piiump*Kd2piiump*Kd3piiump*Kdeadgln*Kdeadpiikg*Kdeadpiiu*(1 + 3*KG/Kd1 + 3*KG^2/(Kd1*Kd2) + KG^3/(Kd1*Kd2*Kd3))*(1 + 3*KG/Kd1piiump + 3*KG^2/(Kd1piiump*Kd2piiump) + KG^3/(Kd1piiump*Kd2piiump*Kd3piiump))))/((Kdeadgsa + AMP)*(1 + GLN/Kdeadgln + 3*KG*PII/(Kd1*Kdeadpiikg*(1 + 3*KG/Kd1 + 3*KG^2/(Kd1*Kd2) + KG^3/(Kd1*Kd2*Kd3))) + 3*KG*GLN*PII/(Kd1*Kdeadgln*Kdeadpiikg*(1 + 3*KG/Kd1 + 3*KG^2/(Kd1*Kd2) + KG^3/(Kd1*Kd2*Kd3))*l1) + KG^3*PIIUMP3/(Kd1piiump*Kd2piiump*Kd3piiump*Kdeadpiiu*(1 + 3*KG/Kd1piiump + 3*KG^2/(Kd1piiump*Kd2piiump) + KG^3/(Kd1piiump*Kd2piiump*Kd3piiump))) + KG^3*GLN*PIIUMP3/(Kd1piiump*Kd2piiump*Kd3piiump*Kdeadgln*Kdeadpiiu*(1 + 3*KG/Kd1piiump + 3*KG^2/(Kd1piiump*Kd2piiump) + KG^3/(Kd1piiump*Kd2piiump*Kd3piiump))*n1) + 3*KG^4*PII*PIIUMP3/(Kd1*Kd1piiump*Kd2piiump*Kd3piiump*Kdeadpiikg*Kdeadpiiu*(1 + 3*KG/Kd1 + 3*KG^2/(Kd1*Kd2) + KG^3/(Kd1*Kd2*Kd3))*(1 + 3*KG/Kd1piiump + 3*KG^2/(Kd1piiump*Kd2piiump) + KG^3/(Kd1piiump*Kd2piiump*Kd3piiump))*m1) + 3*KG^4*GLN*PII*PIIUMP3/(Kd1*Kd1piiump*Kd2piiump*Kd3piiump*Kdeadgln*Kdeadpiikg*Kdeadpiiu*(1 + 3*KG/Kd1 + 3*KG^2/(Kd1*Kd2) + KG^3/(Kd1*Kd2*Kd3))*(1 + 3*KG/Kd1piiump + 3*KG^2/(Kd1piiump*Kd2piiump) + KG^3/(Kd1piiump*Kd2piiump*Kd3piiump))*o1))));  // modifiers: GLN, PII, PIIUMP3, KG
  vgdh: $NH4 + $KG + $NADPH -> GLU + $NADP; compartment*(Vgdh*(KG*NADPH*NH4 - NADP*GLU/Keqgdh)/(Kgdhkg*Kgdhnadph*Kgdhnh*(1 + NADP/Kgdhnadp + NADPH/Kgdhnadph)*(1 + NH4/Kgdhnh)*(1 + KG/Kgdhkg + GLU/Kgdhglu)));
  vgog: GLN + $NADPH + $KG -> 2 GLU + $NADP; compartment*(KG*NADPH*Vgog*GLN/(Kgoggln*Kgogkg*Kgognadph*(1 + NADP/Kgognadp + NADPH/Kgognadph)*(1 + AZGLU/Kgogaz)*(1 + KG/Kgogkg + GLU/Kgogglu)*(1 + GLN/Kgoggln + GLU/Kgogglu)));  // modifiers: AZGLU
  vgs: GLU + ATP + $NH4 -> $P_i + GLN + ADP; compartment*(aamp*camp*Vgs*(-(P_i*ADP*GLN/Keq) + NH4*ATP*GLU)/(Kgsatp*Kgsglu*Kgsnh*(1 + P_i/Kgspi + ADP/Kgsadp + P_i*ADP/(Kgsadp*Kgspi) + ATP/Kgsatp)*(1 + NH4/Kgsnh + GLN/Kgsgln + NH4*GLN/(Kgsgln*Kgsnh) + GLU/Kgsglu + NH4*GLU/(Kgsglu*Kgsnh))*(1 + 12^n1amp*(AMP/(bamp*GStot))^n1amp)*(1 + 12^n2amp*(AMP/(damp*GStot))^n2amp)));  // modifiers: AMP
  vgludem: GLU -> AZGLU; compartment*(Vgludem*(-(AZGLU/Kgludemeq) + GLU)/(Kgludemglu*(1 + AZGLU/Kgludemazglu + GLU/Kgludemglu)));
  vazgludem: AZGLU -> $AZglu; compartment*(Vazgludem*(-(AZglu/Kazgludemeq) + AZGLU)/(Kazgludemazglu*(1 + AZglu/Kazgludemazinter + AZGLU/Kazgludemazglu)));
  vglndem: GLN -> AZGLN; compartment*(Vglndem*(-(AZGLN/Kglndemeq) + GLN)/(Kglndemgln*(1 + AZGLN/Kglndemazgln + GLN/Kglndemgln)));
  vazglndem: AZGLN -> $AZgln; compartment*(Vazglndem*(-(AZgln/Kazglndemeq) + AZGLN)/(Kazglndemazgln*(1 + AZgln/Kazglndemazinter + AZGLN/Kazglndemazgln)));
  vatpase: ADP -> ATP; compartment*(Vadp*ADP/(Kadp + ADP));

  // Unit definitions:
  unit time = 60 second; time is "mins";
  unit milliMolar = 1e-3 mole / litre; milliMolar is "mM";
end
