// SBML level 2 version 1

model untitled()
  // Albeck2008_extrinsic_apoptosis
  // This the model used in the article:
  // Quantitative analysis of pathways controlling extrinsic apoptosis in single cells.
  // Albeck JG, Burke JM, Aldridge BB, Zhang M, Lauffenburger DA, Sorger PK. Mol Cell. 2008 Apr 11;30(1):11-25. PMID: 18406323 , doi: 10.1016/j.molcel.2008.02.012
  // Abstract:
  // Apoptosis in response to TRAIL or TNF requires the activation of initiator caspases, which then activate the effector caspases that dismantle cells and cause death. However, little is known about the dynamics and regulatory logic linking initiators and effectors. Using a combination of live-cell reporters, flow cytometry, and immunoblotting, we find that initiator caspases are active during the long and variable delay that precedes mitochondrial outer membrane permeabilization (MOMP) and effector caspase activation. When combined with a mathematical model of core apoptosis pathways, experimental perturbation of regulatory links between initiator and effector caspases reveals that XIAP and proteasome-dependent degradation of effector caspases are important in restraining activity during the pre-MOMP delay. We identify conditions in which restraint is impaired, creating a physiologically indeterminate state of partial cell death with the potential to generate genomic instability. Together, these findings provide a quantitative picture of caspase regulatory networks and their failure modes.
  // The mitochondrial compartment is just added as a logical partition and its volume is not used in the mathematical formulas, to stick closer to the expressions used in the matlab files distributed with the original publication. There only the rate constants for bimolecular reactions are adapted by division by v , the ration of the volumes of the mitochondrial compartment and the total cell.
  // For BCL2 overexpression in figure 5, the initial BCL2 amount was increased by a factor 12 to 2.4*10 5 . For siRNA downregulation of XIAP its amount was multiplied by 0.13 to 1.3*10 4 .
  // To the extent possible under law, all copyright and related or neighbouring rights to this encoded model have been dedicated to the public domain worldwide. Please refer to CC0 Public Domain Dedication for more information.
  // In summary, you are entitled to use this encoded model in absolutely any manner you deem suitable, verbatim, or with modification, alone or embedded it in a larger context, redistribute it, commercially or not, in a restricted way or not.
  // To cite BioModels Database, please use: Li C, Donizelli M, Rodriguez N, Dharuri H, Endler L, Chelliah V, Li L, He E, Henry A, Stefan MI, Snoep JL, Hucka M, Le Novère N, Laibe C (2010) BioModels Database: An enhanced, curated and annotated resource for published quantitative kinetic models. BMC Syst Biol., 4:92.
  // biomodels.db:MODEL6964793701
  // biomodels.db:BIOMD0000000220
  // isDescribedBy pubmed:18406323
  // isVersionOf kegg.pathway:hsa04210 reactome:REACT_1059 GO:0008624
  // hasTaxon taxonomy:9606
  // hasProperty mamo:MAMO_0000046

  // Compartments:
  compartment cell = 1;  // GO:0005829
  compartment mitochondrion in cell = 1;  // GO:0005739

  // Species:
  // TRAIL : L = 3000 correspond to 50 ng/ml SuperKiller TRAIL
  // for experiments under saturating conditions use L = 60000
  species L in cell = 3000/cell;  // isVersionOf uniprot:P50591 reactome:REACT_3803
  // TRAIL receptor : for experiments without siRNA R = 200
  species R in cell = 200/cell;  // isVersionOf uniprot:O14763 reactome:REACT_2540
  species flip in cell = 100/cell;  // isVersionOf uniprot:O15519 reactome:REACT_2438; isDescribedBy mim:603599
  species pC8 in cell = 20000/cell; pC8 is "proC8";  // isVersionOf uniprot:Q14790 reactome:REACT_4998.1
  species casp8 in cell = 0;  // isVersionOf reactome:REACT_4185
  species casp6 in cell = 0;
  species BAR in cell = 1000/cell;
  species pC3 in cell = 10000/cell; pC3 is "proC3";  // isVersionOf uniprot:P42574
  species casp3 in cell = 0;
  species Bid in cell = 40000/cell;  // isVersionOf uniprot:P55957 reactome:REACT_3224; isDescribedBy mim:601997
  species tBid in cell = 0;  // isVersionOf uniprot:P55957 reactome:REACT_385
  species pC6 in cell = 10000/cell; pC6 is "proC6";  // isVersionOf uniprot:P55212
  species XIAP in cell = 100000/cell;  // isVersionOf uniprot:P98170 reactome:REACT_5246
  // ubiquitinylated caspase 3
  species C3_Ub in cell = 0; C3_Ub is "Ub C3";  // hasVersion uniprot:P42574 uniprot:P62988
  // EC substrate
  species PARP in cell = 1000000/cell;  // isVersionOf uniprot:P09874
  // cleaved PARP
  species CPARP in cell = 0; CPARP is "cPARP";  // isVersionOf uniprot:P09874
  species Smac in cell = 0;  // isVersionOf uniprot:Q9NR28 reactome:REACT_5375
  species Bcl2c in cell = 20000/cell; Bcl2c is "cytosolic Bcl-2";  // isVersionOf uniprot:P10415 reactome:REACT_3598
  species Bax in cell = 100000/cell;  // isVersionOf uniprot:Q07812
  // activated Bax
  species Bax_hash in cell = 0; Bax_hash is "Bax#";  // isVersionOf uniprot:Q07812
  // mitochondrial Bcl-2
  species Bcl2 in mitochondrion = 20000/mitochondrion; Bcl2 is "Bcl-2";  // isVersionOf uniprot:P10415
  // TRAIL-receptor complex
  species L_R in cell = 0; L_R is "L:R";  // isVersionOf reactome:REACT_5556; hasVersion uniprot:P50591 uniprot:O14763
  // activated receptor
  species R_hash in cell = 0; R_hash is "R#";  // isVersionOf uniprot:O14763
  species flip_R_hash in cell = 0; flip_R_hash is "flip:R#";
  species R_hash_pC8 in cell = 0; R_hash_pC8 is "R#:pC8";
  species C6_pC8 in cell = 0; C6_pC8 is "C6:pC8";
  species BAR_C8 in cell = 0; BAR_C8 is "BAR:C8";
  species C8_pC3 in cell = 0; C8_pC3 is "C8:pC3";
  species pC3_Apop in cell = 0; pC3_Apop is "pC3:Apop";
  // apoptosome
  species Apop in cell = 0;  // hasPart uniprot:P99999 uniprot:O14727 uniprot:P55211; isVersionOf reactome:REACT_5647 GO:0043293
  species C8_Bid in cell = 0; C8_Bid is "C8:Bid";
  species C3_pC6 in cell = 0; C3_pC6 is "C3:pC6";
  species XIAP_C3 in cell = 0; XIAP_C3 is "XIAP:C3";
  species PARP_C3 in cell = 0; PARP_C3 is "PARP:C3";
  species Apop_XIAP in cell = 0; Apop_XIAP is "Apop:XIAP";
  species Smac_XIAP in cell = 0; Smac_XIAP is "Smac:XIAP";
  species Bcl2c_tBid in cell = 0; Bcl2c_tBid is "Bcl2c:tBid";
  species Bax_tBid in cell = 0; Bax_tBid is "Bax:tBid";
  species Baxm_Bcl2 in mitochondrion = 0; Baxm_Bcl2 is "Baxm:Bcl2";  // hasPart uniprot:P10415 uniprot:Q07812
  // Bax tetramer
  species Bax4 in mitochondrion = 0;  // hasPart uniprot:Q07812
  species Bax2_Bcl2 in mitochondrion = 0; Bax2_Bcl2 is "Bax2:Bcl2";  // hasPart uniprot:Q07812 uniprot:P10415
  species Bax4_Bcl2 in mitochondrion = 0; Bax4_Bcl2 is "Bax4:Bcl2";  // hasPart uniprot:P10415 uniprot:Q07812
  // binding sites for activated Bax on the inner mitochondrial membrane
  species M in mitochondrion = 500000/mitochondrion;
  species Bax4_M in mitochondrion = 0; Bax4_M is "Bax4:M";  // hasPart uniprot:Q07812
  // opened inner mitochondrial membrane pore
  species M_hash in mitochondrion = 0; M_hash is "M#";
  species Smacm in mitochondrion = 100000/mitochondrion; Smacm is "Smac_m";  // isVersionOf uniprot:Q9NR28 reactome:REACT_5499
  species M_hash_Smacm in mitochondrion = 0; M_hash_Smacm is "M#:Smac_m";
  // Smac released into the mitochondrial intermembrane space
  species Smacr in mitochondrion = 0; Smacr is "Smac released";  // isVersionOf uniprot:Q9NR28 reactome:REACT_5375
  species CytoCm in mitochondrion = 500000/mitochondrion; CytoCm is "CytoC_m";  // isVersionOf uniprot:P99999 reactome:REACT_14114
  species M_hash_CytoCm in mitochondrion = 0; M_hash_CytoCm is "M#:CytoC_m";
  // cytochrom C released into the mitochondrial intermembrane space
  species CytoCr in mitochondrion = 0; CytoCr is "CytoC released";  // isVersionOf uniprot:P99999 reactome:REACT_3942
  species CytoC in cell = 0;  // isVersionOf uniprot:P99999
  species Apaf in cell = 100000/cell;  // isVersionOf uniprot:O14727
  species CytoC_Apaf in cell = 0; CytoC_Apaf is "CytoC:Apaf";
  species Apaf_hash in cell = 0; Apaf_hash is "Apaf#";
  species pC9 in cell = 100000/cell; pC9 is "proC9";  // isVersionOf uniprot:P55211
  species Baxm in mitochondrion = 0;  // isVersionOf uniprot:Q07812
  // dimeric Bax
  species Bax2 in mitochondrion = 0;  // hasPart uniprot:Q07812

  // Parameters:
  k1 = 4e-7;
  k_1 = 0.001;
  kc1 = 1e-5;
  k2 = 1e-6;
  k_2 = 0.001;
  k3 = 1e-6;
  k_3 = 0.001;
  kc3 = 1;
  k4 = 1e-6;
  k_4 = 0.001;
  k5 = 1e-7;
  k_5 = 0.001;
  kc5 = 1;
  k6 = 1e-6;
  k_6 = 0.001;
  kc6 = 1;
  k7 = 3e-8;
  k_7 = 0.001;
  k8 = 2e-6;
  k_8 = 0.001;
  kc8 = 0.1;
  k9 = 1e-6;
  k_9 = 0.01;
  kc9 = 1;
  k10 = 1e-7;
  k_10 = 0.001;
  kc10 = 1;
  k11 = 1e-6;
  k_11 = 0.001;
  k12 = 1e-7;
  k_12 = 0.001;
  kc12 = 1;
  k13 = 0.01;
  k_13 = 0.01;
  k14 = 1e-6;
  k_14 = 0.001;
  k15 = 1e-6;
  k_15 = 0.001;
  k16 = 1e-6;
  k_16 = 0.001;
  k17 = 1e-6;
  k_17 = 0.001;
  k18 = 1e-6;
  k_18 = 0.001;
  k19 = 1e-6;
  k_19 = 0.001;
  kc19 = 1;
  k20 = 2e-6;
  k_20 = 0.001;
  kc20 = 10;
  k21 = 2e-6;
  k_21 = 0.001;
  kc21 = 10;
  k22 = 0.01;
  k_22 = 0.01;
  k23 = 5e-7;
  k_23 = 0.001;
  kc23 = 1;
  k24 = 5e-8;
  k_24 = 0.001;
  k25 = 5e-9;
  k_25 = 0.001;
  kc25 = 1;
  k26 = 0.01;
  k_26 = 0.01;
  k27 = 2e-6;
  k_27 = 0.001;
  k28 = 7e-6;
  k_28 = 0.001;
  kc7 = 1;
  v = 0.07;
  var pC3_frac; pC3_frac is "pC3 fraction";
  var C3_frac; C3_frac is "C3 fraction";
  var C3_UB_frac; C3_UB_frac is "degraded C3 fraction";
  var cPARP_frac; cPARP_frac is "cPARP fraction";
  var C3_tot; C3_tot is "total Caspase 3";
  var fC3_fract; fC3_fract is "free C3 fraction";

  // Assignment rules:
  C3_tot := pC3 + C8_pC3 + pC3_Apop + casp3 + C3_pC6 + XIAP_C3 + PARP_C3 + C3_Ub;
  C3_frac := (casp3 + C3_pC6 + XIAP_C3 + PARP_C3)/C3_tot;
  C3_UB_frac := C3_Ub/C3_tot;
  pC3_frac := (pC3 + C8_pC3 + pC3_Apop)/C3_tot;
  fC3_fract := casp3/C3_tot;
  cPARP_frac := CPARP/(CPARP + PARP + PARP_C3);

  // Reactions:
  re1: L + R -> L_R; cell*(L*R*k1 - L_R*k_1);  // isVersionOf GO:0045569
  re2: L_R => R_hash; cell*L_R*kc1;
  re3: R_hash + flip -> flip_R_hash; cell*(R_hash*flip*k2 - flip_R_hash*k_2);
  re4: R_hash + pC8 -> R_hash_pC8; cell*(R_hash*pC8*k3 - R_hash_pC8*k_3);  // isPartOf reactome:REACT_961
  re5: R_hash_pC8 => casp8 + R_hash; cell*R_hash_pC8*kc3;  // isPartOf reactome:REACT_961
  re6: casp6 + pC8 -> C6_pC8; cell*(casp6*pC8*k7 - C6_pC8*k_7);
  re7: C6_pC8 => casp8 + casp6; cell*C6_pC8*kc7;
  re8: casp8 + BAR -> BAR_C8; cell*(casp8*BAR*k4 - BAR_C8*k_4);
  re9: pC3 + casp8 -> C8_pC3; cell*(pC3*casp8*k5 - C8_pC3*k_5);
  re10: C8_pC3 => casp8 + casp3; cell*C8_pC3*kc5;  // isVersionOf ec-code:3.4.22.61
  re11: casp8 + Bid -> C8_Bid; cell*(casp8*Bid*k10 - C8_Bid*k_10);
  re12: C8_Bid => tBid + casp8; cell*C8_Bid*kc10;  // isVersionOf ec-code:3.4.22.61
  re13: pC3 + Apop -> pC3_Apop; cell*(pC3*Apop*k25 - pC3_Apop*k_25);
  re14: pC3_Apop => casp3 + Apop; cell*pC3_Apop*kc25;
  re15: casp3 + pC6 -> C3_pC6; cell*(casp3*pC6*k6 - C3_pC6*k_6);
  re16: C3_pC6 => casp3 + casp6; cell*C3_pC6*kc6;
  re17: casp3 + XIAP -> XIAP_C3; cell*(casp3*XIAP*k8 - XIAP_C3*k_8);
  re18: XIAP_C3 => C3_Ub + XIAP; cell*XIAP_C3*kc8;
  re19: PARP + casp3 -> PARP_C3; cell*(PARP*casp3*k9 - PARP_C3*k_9);
  re20: PARP_C3 => CPARP + casp3; cell*PARP_C3*kc9;
  re21: XIAP + Apop -> Apop_XIAP; cell*(XIAP*Apop*k27 - Apop_XIAP*k_27);
  re22: XIAP + Smac -> Smac_XIAP; cell*(XIAP*Smac*k28 - Smac_XIAP*k_28);
  re23: tBid + Bcl2c -> Bcl2c_tBid; cell*(tBid*Bcl2c*k11 - Bcl2c_tBid*k_11);
  re24: tBid + Bax -> Bax_tBid; cell*(tBid*Bax*k12 - Bax_tBid*k_12);
  re25: Bax_tBid => tBid + Bax_hash; cell*Bax_tBid*kc12;
  re26: Bax_hash -> Baxm; cell*(Bax_hash*k13 - Baxm*k_13);
  re27: Baxm + Bcl2 -> Baxm_Bcl2; mitochondrion*(Baxm*Bcl2*k14/v - Baxm_Bcl2*k_14);
  re29: Baxm + Baxm -> Bax2; mitochondrion*(Baxm*Baxm*k15/v - Bax2*k_15);
  re30: Bax2 + Bax2 -> Bax4; mitochondrion*(Bax2*Bax2*k17/v - Bax4*k_17);
  re31: Bcl2 + Bax2 -> Bax2_Bcl2; mitochondrion*(Bcl2*Bax2*k16/v - Bax2_Bcl2*k_16);
  re32: Bcl2 + Bax4 -> Bax4_Bcl2; mitochondrion*(Bcl2*Bax4*k18/v - Bax4_Bcl2*k_18);
  re33: Bax4 + M -> Bax4_M; mitochondrion*(Bax4*M*k19/v - Bax4_M*k_19);
  re34: Bax4_M => M_hash; mitochondrion*Bax4_M*kc19;
  re35: M_hash + Smacm -> M_hash_Smacm; mitochondrion*(M_hash*Smacm*k21/v - M_hash_Smacm*k_21);
  re36: M_hash_Smacm => M_hash + Smacr; mitochondrion*M_hash_Smacm*kc21;
  re37: Smacr -> Smac; cell*(Smacr*k26 - Smac*k_26);
  re38: M_hash + CytoCm -> M_hash_CytoCm; mitochondrion*(M_hash*CytoCm*k20/v - M_hash_CytoCm*k_20);
  re39: M_hash_CytoCm => CytoCr + M_hash; mitochondrion*M_hash_CytoCm*kc20;
  re40: CytoCr -> CytoC; cell*(CytoCr*k22 - CytoC*k_22);
  re41: CytoC + Apaf -> CytoC_Apaf; cell*(CytoC*Apaf*k23 - CytoC_Apaf*k_23);
  re42: CytoC_Apaf => CytoC + Apaf_hash; cell*CytoC_Apaf*kc23;
  re43: Apaf_hash + pC9 -> Apop; cell*(Apaf_hash*pC9*k24 - Apop*k_24);
end
