// SBML level 2 version 4

model Lai2007_O2_Transport_Metabolism()
  // This file describes the SBML version of the mathematical model in the following journal article: Linking Pulmonary Oxygen Uptake, Muscle Oxygen Utilization and Cellular Metabolism during Exercise, Ann Biomed Eng. 2007 Jun;35(6):956-69. (Pubmed ID: 17380394). This mathematical model simulates oxygen transport and metabolism in skeletal muscle in response to a step change from a warm-up steady state to a higher work rate corresponding to exercise at different levels of intensity: moderate (M), heavy (H) and very heavy (VH). The model parameter values are listed in the tables of this article. The parameter values that are independent of the exercise level are reported in Table 2. The parameter values that depend on the exercise level are reported in Tables 1A, 3 and 4. The model simulations (Figures 2, 3, 4 and 5) were obtained for a representative subject with a set of parameter values different from those in Table 1A, 3 and 4. In the sbml model, these model parameters are used to simulate exercise at a very heavy (VH) intensity for the representative subject. Additionally, the parameter values needed to simulate exercise at moderate (M) and heavy (H) intensity are reported in the list of parameters of the file. The model simulates dynamics of (1) the concentrations of free (F) and total (T) oxygen concentration in blood (CFcap, CTcap) and tissue (CFtis, CTtis), Adenosine Triphosphate (ATP), Adenosine Diphosphate (ADP), Phosphocreatine (PCr) and Creatine (Cr); (2) the metabolic flux of oxidative phosphorylation, creatine kinase and ATPase; (3) the oxygen uptake in blood and oxygen transport rate from blood to tissue during exercise. The simulation also computes muscle oxygen saturation (StO2m) and relative muscle oxygen saturation (RStO2m) in order to compare simulated and experimental responses of human muscle oxygenation during exercise. The model was successfully tested with Roadrunner of the Systems Biology Workbench (SBW). The model simulations obtained with Roadrunner match those obtained with the mathematical model represented in Fortran and Matlab for relative and absolute tolerance smaller than 10-7.
  // To allow for simulations at varying levels of exercise, the parameter exercise_level was introduced. A value of 1 means medium, 2 heavy and 3 very heavy exercise. Setting this parameter assigns the parameters Vmax, KatpaseE, dQMm and tauQm with the relevant parameters. The warmup steady state is influenced by the parameter changes for this representative subject and the model has to be brought into steady state after each change of exercise level.
  // This model originates from BioModels Database: A Database of Annotated Published Models. It is copyright (c) 2005-2010 The BioModels Team.
  // For more information see the terms of use.
  // To cite BioModels Database, please use Le Nov��re N., Bornstein B., Broicher A., Courtot M., Donizelli M., Dharuri H., Li L., Sauro H., Schilstra M., Shapiro B., Snoep J.L., Hucka M. (2006) BioModels Database: A Free, Centralized Database of Curated, Published, Quantitative Kinetic Models of Biochemical and Cellular Systems Nucleic Acids Res., 34: D689-D691.
  // biomodels.db:MODEL1004170000
  // biomodels.db:BIOMD0000000248
  // isDescribedBy pubmed:17380394
  // isDerivedFrom pubmed:16636861 pubmed:10898733
  // isVersionOf GO:0015671 GO:0072592 GO:0071453
  // hasTaxon taxonomy:9606

  // Compartments:
  compartment Capillary = 2.0979 litre;  // isVersionOf FMA:63194
  compartment Tissue = 27.8721 litre;  // isVersionOf FMA:9641

  // Species:
  species ATP in Tissue = 8.198857;  // CHEBI:15422 kegg.compound:C00002
  species PCr in Tissue = 40.98942;  // CHEBI:17287 kegg.compound:C02305
  species ADP in Tissue = 0.001142;  // CHEBI:16761 kegg.compound:C00008
  species Cr in Tissue = 1.01056;  // CHEBI:16919 kegg.compound:C00300
  species Pi in Tissue = 0.5;  // isVersionOf CHEBI:18367 kegg.compound:C00009
  species CTcap in Capillary = 5.281527;  // hasVersion CHEBI:7861 CHEBI:15379 kegg.compound:C05781 kegg.compound:C00007
  species CTtis in Tissue = 0.4084824;  // hasVersion CHEBI:7044 CHEBI:15379 kegg.compound:C05782 kegg.compound:C00007
  species $CFcap in Capillary = 0.03969;  // isVersionOf CHEBI:15379 kegg.compound:C00007
  species $CFtis in Tissue = 0.0374;  // isVersionOf CHEBI:15379 kegg.compound:C00007

  // Parameters:
  StO2m has dimensionless;
  RStO2m has dimensionless;
  Katpase has perMin;
  KatpaseW = 0.3207601 perMin;
  Kadp = 0.058 mM;
  Kia = 0.135 mM;
  Kiq = 3.5 mM;
  Kib = 3.9 mM;
  Kp = 3.8 mM;
  Kb = 1.11 mM;
  Km = 0.0007 mM;
  VfCK = 6000 mMperMin;
  VrCK = 3008.658 mMperMin;
  QRm = 0.688 LperMin;
  QWm = 3.118 LperMin;
  Qm has LperMin;
  Qc = 8 LperMin;
  PSR = 134.2828 LperMin;
  PSE = 20000 LperMin;
  PSm has LperMin;
  nH = 2.7 dimensionless;
  Hct = 0.45 dimensionless;
  Wmc = 0.8064 dimensionless;
  CmcMb = 0.5 mM;
  CrbcHb = 5.18 mM;
  KMb = 308.642 permM;
  KHb = 7800.7 mM;
  tE = 3 time_min;
  CTart = 9.199981 mM;
  Vmax has mMperMin;
  VmaxM = 53.5150933 mMperMin;
  VmaxH = 34.68714 mMperMin;
  VmaxVH = 23.11702 mMperMin;
  KatpaseE has perMin;
  KatpaseM = 1.710804 perMin;
  KatpaseH = 2.2581564 perMin;
  KatpaseVH = 3.3423645 perMin;
  dQMm has LperMin;
  dQMmM = 7.9167374 LperMin;
  dQMmH = 9.42198 LperMin;
  dQMmVH = 12.74981 LperMin;
  tauQm has time_min;
  tauQmM = 0.32 time_min;
  tauQmH = 0.396 time_min;
  tauQmVH = 0.42 time_min;
  StO2mW = 81.17124 dimensionless;
  exercise_level = 3 dimensionless;
  ATPase_flux_mM has mMperMin;
  CK_flux_mM has mMperMin;
  oxygen_phosph has mMperMin; oxygen_phosph is "oxygen_phosphorilation_rate_mM";

  // Assignment rules:
  Katpase := piecewise(KatpaseW, time <= tE, KatpaseE);
  Qm := piecewise(QWm, time <= tE, QWm + dQMm*(1 - exp((tE - time)/tauQm)));
  PSm := PSR + (PSE - PSR)*(1 - exp((QRm - Qm)/Qc));
  StO2m := 100*(Hct*CrbcHb*KHb*CFcap^nH/(1 + KHb*CFcap^nH)*Capillary + Wmc*CmcMb*KMb*CFtis/(1 + KMb*CFtis)*Tissue)/(CrbcHb*Hct*Capillary + CmcMb*Wmc*Tissue);
  RStO2m := StO2m/StO2mW - 1;
  Vmax := piecewise(VmaxM, exercise_level == 1, piecewise(VmaxH, exercise_level == 2, VmaxVH));
  KatpaseE := piecewise(KatpaseM, exercise_level == 1, piecewise(KatpaseH, exercise_level == 2, KatpaseVH));
  dQMm := piecewise(dQMmM, exercise_level == 1, piecewise(dQMmH, exercise_level == 2, dQMmVH));
  tauQm := piecewise(tauQmM, exercise_level == 1, piecewise(tauQmH, exercise_level == 2, tauQmVH));
  ATPase_flux_mM := ATPase/Tissue;
  CK_flux_mM := 1*(CreatineKinase/Tissue);
  oxygen_phosph := OxidativePhosphorylation/Tissue*6;

  // Rate rules:
  CFcap' = (Qm*(CTart - CTcap) - PSm*(CFcap - CFtis))*(1/Capillary)/(1 + 4*Hct*CrbcHb*KHb*nH*CFcap^(nH - 1)/(1 + KHb*CFcap^nH)^2);
  CFtis' = (PSm*(CFcap - CFtis)/Tissue - Vmax*(CFtis/(Km + CFtis)*ADP/(Kadp + ADP)))/(1 + Wmc*CmcMb*KMb/(1 + KMb*CFtis)^2);

  // Reactions:
  ATPase: ATP -> ADP; Tissue*Katpase*ATP;  // isVersionOf ec-code:3.6.1.3 GO:0016887
  OxidativePhosphorylation: 6 ADP + CTtis -> 6 ATP; Tissue*Vmax*(CFtis/(Km + CFtis))*ADP/(Kadp + ADP);  // modifiers: Pi, CFtis; isVersionOf GO:0006119
  ConvectionTransport: -> CTcap; Qm*(CTart - CTcap);
  DiffusionTransport: CTcap -> CTtis; PSm*(CFcap - CFtis);  // modifiers: CFcap, CFtis
  CreatineKinase: ADP + PCr -> ATP + Cr; Tissue*(VfCK*ADP*PCr/(Kb*Kia) - VrCK*Cr*ATP/(Kiq*Kp))/((Kia + ADP)/Kia + ATP/Kiq + PCr/Kib + ADP*PCr/(Kb*Kia) + Cr*ATP/(Kiq*Kp));  // isVersionOf ec-code:2.7.3.2 kegg.reaction:R01881 GO:0004111

  // Unit definitions:
  unit substance = 1e-3 mole;
  unit perMin = 1 / (60 second);
  unit mMperMin = 1e-3 mole / (60 second * litre);
  unit mM = 1e-3 mole / litre;
  unit time_min = 1 / (60 second);
  unit LperMin = litre / (60 second);
  unit permM = litre / (1e-3 mole);
end
