// SBML level 2 version 4

model Piedrafita2010_MR_System()
  // This is the self maintaining metabolism model described in the article:
  // A Simple Self-Maintaining Metabolic System: Robustness, Autocatalysis, Bistability.
  // Piedrafita G, Montero F, Morán F, Cárdenas ML, Cornish-Bowden A, PLoS Computational Biology 2010, 6(8):e1000872. doi:10.1371/journal.pcbi.1000872
  // Abstract:
  // A living organism must not only organize itself from within; it must also maintain its organization in the face of changes in its environment and degradation of its components. We show here that a simple (M,R)-system consisting of three interlocking catalytic cycles, with every catalyst produced by the system itself, can both establish a non-trivial steady state and maintain this despite continuous loss of the catalysts by irreversible degradation. As long as at least one catalyst is present at a sufficient concentration in the initial state, the others can be produced and maintained. The system shows bistability, because if the amount of catalyst in the initial state is insufficient to reach the non-trivial steady state the system collapses to a trivial steady state in which all fluxes are zero. It is also robust, because if one catalyst is catastrophically lost when the system is in steady state it can recreate the same state. There are three elementary flux modes, but none of them is an enzyme-maintaining mode, the entire network being necessary to maintain the two catalysts
  // As this is a theoretical model and no units are given in the article, the standard units (mol, seconds and litre) are used for the parameters. k8 and k11 are set equal to k4.
  // Originally created by libAntimony v1.4 (using libSBML 3.4.1)
  // biomodels.db:MODEL1008090000
  // biomodels.db:BIOMD0000000257
  // isDescribedBy pubmed:20700491
  // isVersionOf GO:0050790
  // hasTaxon taxonomy:131567
  // hasProperty mamo:MAMO_0000046

  // Compartments:
  compartment env = 1; env is "environment";

  // Species:
  species $S in env = 4;
  species $U in env = 1;
  species $T in env = 2;
  species STU in env = 5;
  species STUS in env = 0;
  species STUST in env = 0;
  species STUSU in env = 0;
  species SU in env = 0;
  species ST in env = 0;
  species SUST in env = 0;
  species SUSTU in env = 0;

  // Parameters:
  k1 = 10 per_time_per_M;
  k1r = 10 per_time;
  k2 = 10 per_time_per_M;
  k2r = 10 per_time;
  k3 = 2 per_time;
  k3r = 1 per_time_per_M;
  k4 = 0.3 per_time;
  k5 = 1 per_time_per_M;
  k5r = 1 per_time;
  k6 = 1 per_time_per_M;
  k6r = 1 per_time;
  k7 = 0.1 per_time;
  k7r = 0.1 per_time_per_M;
  k8 has per_time;
  k9 = 0.1 per_time_per_M;
  k9r = 0.05 per_time;
  k10 = 0.05 per_time;
  k10r = 0.05 per_time_per_M;
  k11 has per_time;

  // Assignment rules:
  k8 := k4;
  k11 := k4;

  // Reactions:
  reaction1: $S + STU -> STUS; env*(k1*S*STU - k1r*STUS);
  reaction2: $T + STUS -> STUST; env*(k2*T*STUS - k2r*STUST);
  reaction3: STUST -> ST + STU; env*(k3*STUST - k3r*ST*STU);
  reaction4: STU => ; env*k4*STU;
  reaction5: SU + ST -> SUST; env*(k5*ST*SU - k5r*SUST);
  reaction6: $U + SUST -> SUSTU; env*(k6*U*SUST - k6r*SUSTU);
  reaction7: SUSTU -> STU + SU; env*(k7*SUSTU - k7r*STU*SU);
  reaction8: SU => ; env*k8*SU;
  reaction9: $U + STUS -> STUSU; env*(k9*U*STUS - k9r*STUSU);
  reaction10: STUSU -> STU + SU; env*(k10*STUSU - k10r*STU*SU);
  reaction11: ST => ; env*k11*ST;

  // Unit definitions:
  unit substance = mole; substance is "mole";
  unit time = second; time is "sec";
  unit volume = litre; volume is "litre";
  unit per_time = 1 / second;
  unit per_time_per_M = litre / (mole * second);
end
