// SBML level 2 version 4

function function_1(k3, k3a, X, Auxin)
  (k3 + k3a*X)*Auxin;
end
function_1 is "Rate law for v3: Auxin removal from the cell";

function function_2(k1a, X, k1)
  k1a/(1 + X/k1);
end
function_2 is "Rate law for v1: Auxin Transport to the cell";

function function_3(k2, k2a, ET, CK, k2b, PLSp, k2c)
  k2 + k2a*(ET/(1 + CK/k2b))*(PLSp/(k2c + PLSp));
end
function_3 is "Rate law for v2: Auxin biosynthesis in the cell";

function function_4(k4, Auxin, Ra)
  k4*Auxin*Ra;
end
function_4 is "Rate law for v4: Conversion of auxin receptor from the inactivated form to the activated form";

function function_6(k6, Ra_star, ET, k6a)
  k6*Ra_star/(1 + ET/k6a);
end
function_6 is "Rate law for v6: Transcription of POLARIS gene";

function function_7(k7, PLSm)
  k7*PLSm;
end
function_7 is "Rate law for v7: Decay of mRNA of POLARIS gene";

function function_8(k8, PLSm)
  k8*PLSm;
end
function_8 is "Rate law for v8: Translation of POLARIS gene";

function function_9(k9, PLSp)
  k9*PLSp;
end
function_9 is "Rate law for v9: Decay of protein of POLARIS gene";

function function_10(k10, PLSp, k10a, Re)
  (k10 + k10a*PLSp)*Re;
end
function_10 is "Rate law for v10: Conversion of the inactivated form of ethylene receptor to its activated form by PLSp";

function function_12(Re_star, ET, k11)
  k11*Re_star*ET;
end
function_12 is "Rate law for v11: Conversion of the activated form of ethylene receptor to its inactivated form";

function function_13(Auxin, CK, k12, k12a)
  k12 + k12a*Auxin*CK;
end
function_13 is "Rate law for v12: Ethylene biosynthesis";

function function_15(ET, k13)
  k13*ET;
end
function_15 is "Rate law for v13: Removal of ethylene";

function function_16(Re_star, k14, CTR1)
  k14*Re_star*CTR1;
end
function_16 is "Rate law for v14: Conversion of the inactivated form of CTR1 protein to its activated form by Re*";

function function_17(CTR1_star, k15)
  k15*CTR1_star;
end
function_17 is "Rate law for v15: Conversion of the activated form of CTR1 protein to its inactivated form";

function function_20(Auxin, k18a, k18)
  k18a/(1 + Auxin/k18);
end
function_20 is "Rate law for v18: Biosynthesis of cytokinin";

function function_18(CTR1_star, k16, k16a)
  k16 - k16a*CTR1_star;
end
function_18 is "Rate law for v16: Activation of the downstream of ethylene signalling response is inhibited by CTR1*";

function function_19(X, k17)
  k17*X;
end
function_19 is "Rate law for v17: Removal of the unknown molecule X";

function function_21(CK, k19)
  k19*CK;
end
function_21 is "Rate law for v19: removal of cytokinin";

model Model_1()
  // Liu2010_Hormonal_Crosstalk_Arabidopsis
  // This is the single cell model for analysis of hormonal crosstalk in Arabidopsis described in the article:
  // Modelling and experimental analysis of hormonal crosstalk in Arabidopsis.
  // Liu J, Mehdi S, Topping J, Tarkowski P and Lindsey K. Mol Syst Biol. 2010 Jun 8;6:373; PmID: 20531403 , DOI: 10.1038/msb.2010.26
  // Abstract:
  // An important question in plant biology is how genes influence the crosstalk between hormones to regulate growth. In this study, we model POLARIS (PLS) gene function and crosstalk between auxin, ethylene and cytokinin in Arabidopsis. Experimental evidence suggests that PLS acts on or close to the ethylene receptor ETR1, and a mathematical model describing possible PLS-ethylene pathway interactions is developed, and used to make quantitative predictions about PLS-hormone interactions. Modelling correctly predicts experimental results for the effect of the pls gene mutation on endogenous cytokinin concentration. Modelling also reveals a role for PLS in auxin biosynthesis in addition to a role in auxin transport. The model reproduces available mutants, and with new experimental data provides new insights into how PLS regulates auxin concentration, by controlling the relative contribution of auxin transport and biosynthesis and by integrating auxin, ethylene and cytokinin signalling. Modelling further reveals that a bell-shaped dose-response relationship between endogenous auxin and root length is established via PLS. This combined modelling and experimental analysis provides new insights into the integration of hormonal signals in plants.
  // This model was originally created using Copasi and taken from the supplementary materials of the MSB article. It uses equation 5 for the auxin biosynthesis and was altered to also contain the reactions for ACC, IAA and cytokinine import. Different from the supplementary material, the parameters for the auxin synthesis, v2, are set to k2c = 0.01 uM and k2=0.2 uM_per_sec and for the WT PLS transcription k6=0.3 . To obtain the model described in the first table of the supplementary materials, set k2c=k2=0 and k6=0.9 . For the pls and PLSox mutants, k6 should be set to 0 and 0.45, respectively.
  // This model originates from BioModels Database: A Database of Annotated Published Models. It is copyright (c) 2005-2010 The BioModels Team.
  // For more information see the terms of use .
  // To cite BioModels Database, please use Le Novère N., Bornstein B., Broicher A., Courtot M., Donizelli M., Dharuri H., Li L., Sauro H., Schilstra M., Shapiro B., Snoep J.L., Hucka M. (2006) BioModels Database: A Free, Centralized Database of Curated, Published, Quantitative Kinetic Models of Biochemical and Cellular Systems Nucleic Acids Res., 34: D689-D691.
  // biomodels.db:MODEL1008260000
  // biomodels.db:BIOMD0000000269
  // isDescribedBy pubmed:20531403
  // hasTaxon taxonomy:3702
  // isVersionOf GO:0009736 GO:0009734 GO:0009873
  // hasProperty mamo:MAMO_0000046

  // Compartments:
  compartment cell = 1;  // isVersionOf GO:0005623
  compartment extra = 1; extra is "extracellular";  // isVersionOf GO:0005615

  // Species:
  species Auxin in cell = 0.1;  // isVersionOf CHEBI:22676
  species X in cell = 0.1;
  species PLSp in cell = 0.1;  // isEncodedBy ncbigene:3770598; isVersionOf uniprot:Q8LLV8
  species $Ra in cell;  // hasProperty GO:0010011
  species Ra_star in cell = 1; Ra_star is "Ra*";  // hasProperty GO:0010011
  species $RaT in cell = 1; RaT is "Ra_total";  // hasProperty GO:0010011
  species CK in cell = 0.1;  // isVersionOf CHEBI:23530
  species ET in cell = 0.1;  // CHEBI:18153 kegg.compound:C06547
  species PLSm in cell = 0.1;  // isEncodedBy ncbigene:3770598
  species $Re in cell;  // isVersionOf uniprot:P49333 uniprot:Q0WPQ2
  species $ReT in cell = 0.3; ReT is "Re_total";  // isVersionOf uniprot:P49333
  species Re_star in cell = 0.3; Re_star is "Re*";  // isVersionOf uniprot:P49333
  species $CTR1 in cell;  // isVersionOf uniprot:Q05609
  species $CTR1T in cell = 0.3; CTR1T is "CTR1_total";  // isVersionOf uniprot:Q05609
  species CTR1_star in cell = 0.3; CTR1_star is "CTR1*";  // isVersionOf uniprot:Q05609
  species $IAA in extra = 0;  // CHEBI:16411 kegg.compound:C00954
  species $ACC in extra = 0;  // CHEBI:18053
  species $CK_ex in extra = 0; CK_ex is "Cytokinin_ext";  // isVersionOf CHEBI:23530

  // Parameters:
  k1a = 1 uM_per_s;
  k1 = 1 uM;
  k2 = 0.2 uM_per_s;
  k2a = 2.8 per_s;
  k2b = 1 uM;
  k2c = 0.01 uM;
  k3 = 2 per_s;
  k3a = 0.45 per_uM_per_s;
  k4 = 1 per_uM_per_s;
  k5 = 1 per_s;
  k6 = 0.3 per_s;
  k6a = 0.2 uM;
  k7 = 1 per_s;
  k8 = 1 per_s;
  k9 = 1 per_s;
  k10 = 0.0003 per_s;
  k10a = 0.5 per_uM_per_s;
  k11 = 5 per_uM_per_s;
  k12 = 0.1 uM_per_s;
  k12a = 0.1 per_uM_per_s;
  k13 = 1 per_s;
  k14 = 3 per_uM_per_s;
  k15 = 0.085 per_s;
  k16 = 0.3 uM_per_s;
  k16a = 1 per_s;
  k17 = 0.1 per_s;
  k18a = 1 uM_per_s;
  k18 = 0.1 uM;
  k19 = 1 per_s;
  k_ethylene = 0.5 per_s;
  k_auxin = 70 per_s;
  k_cytokinin = 10 per_s;

  // Assignment rules:
  Ra := RaT - Ra_star;
  Re := ReT - Re_star;
  CTR1 := CTR1T - CTR1_star;

  // Reactions:
  v1_Auxin_Transport_to_the_cell: => Auxin; cell*function_2(k1a, X, k1); v1_Auxin_Transport_to_the_cell is "v1: Auxin Transport to the cell";  // modifiers: X; isVersionOf GO:0060918
  reaction_2: => Auxin; cell*function_3(k2, k2a, ET, CK, k2b, PLSp, k2c); reaction_2 is "v2: Auxin biosynthesis in the cell";  // modifiers: ET, CK, PLSp; isVersionOf GO:0009851
  v3_Auxin_removal_from_the_cell: Auxin => ; cell*function_1(k3, k3a, X, Auxin); v3_Auxin_removal_from_the_cell is "v3: Auxin removal from the cell";  // modifiers: X; isVersionOf GO:0009852
  reaction_4: $Ra => Ra_star; cell*function_4(k4, Auxin, Ra); reaction_4 is "v4: Conversion of auxin receptor from the inactivated form to the activated form";  // modifiers: Auxin; isVersionOf GO:0010929
  reaction_5: Ra_star => $Ra; cell*k5*Ra_star; reaction_5 is "v5: Conversion of auxin receptor from the activated form to the inactivated form";  // isVersionOf GO:0010930
  v6_Transcription_of_POLARIS_gene: => PLSm; cell*function_6(k6, Ra_star, ET, k6a); v6_Transcription_of_POLARIS_gene is "v6: Transcription of POLARIS gene";  // modifiers: Ra_star, ET; isVersionOf GO:0009299
  v7_Decay_of_mRNA_of_POLARIS_gene: PLSm => ; cell*function_7(k7, PLSm); v7_Decay_of_mRNA_of_POLARIS_gene is "v7: Decay of mRNA of POLARIS gene";  // isVersionOf GO:0006402
  v8_Translation_of_POLARIS_gene: => PLSp; cell*function_8(k8, PLSm); v8_Translation_of_POLARIS_gene is "v8: Translation of POLARIS gene";  // modifiers: PLSm; GO:0006412
  reaction_9: PLSp => ; cell*function_9(k9, PLSp); reaction_9 is "v9: Decay of protein of POLARIS gene";  // isVersionOf GO:0030163
  reaction_10: $Re => Re_star; cell*function_10(k10, PLSp, k10a, Re); reaction_10 is "v10: Conversion of the inactivated form of ethylene receptor to its activated form by PLSp";  // modifiers: PLSp
  reaction_11: Re_star => $Re; cell*function_12(Re_star, ET, k11); reaction_11 is "v11: Conversion of the activated form of ethylene receptor to its inactivated form";  // modifiers: ET
  v12_Ethylene_biosynthesis: => ET; cell*function_13(Auxin, CK, k12, k12a); v12_Ethylene_biosynthesis is "v12: Ethylene biosynthesis";  // modifiers: Auxin, CK; isVersionOf GO:0009693
  v13_Removal_of_ethylene: ET => ; cell*function_15(ET, k13); v13_Removal_of_ethylene is "v13: Removal of ethylene";  // isVersionOf GO:0042457
  reaction_14: $CTR1 => CTR1_star; cell*function_16(Re_star, k14, CTR1); reaction_14 is "v14: Conversion of the inactivated form of CTR1 protein to its activated form by Re*";  // modifiers: Re_star
  reaction_15: CTR1_star => $CTR1; cell*function_17(CTR1_star, k15); reaction_15 is "v15: Conversion of the activated form of CTR1 protein to its inactivated form";
  reaction_16: => X; cell*function_18(CTR1_star, k16, k16a); reaction_16 is "v16: Activation of the downstream of ethylene signalling response is inhibited by CTR1*";  // modifiers: CTR1_star
  reaction_17: X => ; cell*function_19(X, k17); reaction_17 is "v17: Removal of the unknown molecule X";  // isVersionOf GO:0030163
  v18_Biosynthesis_of_cytokinin: => CK; cell*function_20(Auxin, k18a, k18); v18_Biosynthesis_of_cytokinin is "v18: Biosynthesis of cytokinin";  // modifiers: Auxin; isVersionOf GO:0009691
  v19_removal_of_cytokinin: CK => ; cell*function_21(CK, k19); v19_removal_of_cytokinin is "v19: removal of cytokinin";  // isVersionOf GO:0009823
  v_Ethylene: $ACC => ET; cell*k_ethylene*ACC; v_Ethylene is "vEthylene: Uptake rate of exogenous ACC (1-aminocyclopropane-1-carboxylic acid)";
  v_Auxin: $IAA => Auxin; cell*k_auxin*IAA; v_Auxin is "vAuxin: Uptake rate of exogenous auxin (indole-3-acetic acid, IAA)";  // isVersionOf GO:0060919
  v_Cytokinin: $CK_ex => CK; cell*k_cytokinin*CK_ex; v_Cytokinin is "vCytokinin: Uptake rate of exogenous cytokinin";  // isVersionOf GO:0010184

  // Unit definitions:
  unit substance = 1e-6 mole; substance is "umole";
  unit uM = 1e-6 mole / litre;
  unit time = second; time is "sec";
  unit per_s = 1 / second; per_s is "per_sec";
  unit per_uM_per_s = litre / (1e-6 mole * second); per_uM_per_s is "per_uM_per_sec";
  unit uM_per_s = 1e-6 mole / (litre * second); uM_per_s is "per_uM_per_sec";
end
