// SBML level 2 version 3

model hofmeyer()
  // Hofmeyer1986_SeqFb_Proc_AA_Synthesis
  // This model is the reaction sequence SEQFB, a model pathway of a branched system with sequential feedback interactions found in bacterial amino acid synthesis. Its steady state is presented in Fig 4.
  // The model is described in:
  // METAMOD: software for steady-state modelling and control analysis of metabolic pathways on the BBC microcomputer.
  // JHS Hofmeyr and KJ van der Merwe, Comput Appl Biosci 1986 2:243-9; PubmedID: 3450367
  // Abstract:
  // METAMOD, a BBC microcomputer-based software package for steady-state modelling and control analysis of model metabolic pathways, is described, The package consists of two programs. METADEF allows the user to define the pathway in terms of reactions, rate equations and initial concentrations of metabolites. METACAL uses one of two algorithms to calculate the steady-state concentrations and fluxes. One algorithm uses the current ratio of production and consumption rates of variable metabolites to adjust iteratively their concentrations in such a way that they converge towards the steady state. The other algorithm solves the roots of the system equations by means of a quasi-Newtonian procedure. Control analysis allows the calculation of elasticity, control and response coefficients, by means of finite difference approximation. METAMOD is interactive and easy to use, and suitable for teaching and research purposes.
  // To the extent possible under law, all copyright and related or neighbouring rights to this encoded model have been dedicated to the public domain worldwide. Please refer to CC0 Public Domain Dedication for more information.
  // In summary, you are entitled to use this encoded model in absolutely any manner you deem suitable, verbatim, or with modification, alone or embedded it in a larger context, redistribute it, commercially or not, in a restricted way or not.
  // To cite BioModels Database, please use: Li C, Donizelli M, Rodriguez N, Dharuri H, Endler L, Chelliah V, Li L, He E, Henry A, Stefan MI, Snoep JL, Hucka M, Le Novere N, Laibe C (2010) BioModels Database: An enhanced, curated and annotated resource for published quantitative kinetic models. BMC Syst Biol., 4:92.
  // biomodels.db:MODEL1010190003
  // biomodels.db:BIOMD0000000284
  // isDescribedBy pubmed:3450367
  // isVersionOf GO:0008652
  // hasTaxon taxonomy:2
  // hasProperty mamo:MAMO_0000046

  // Compartments:
  compartment cell = 1;  // GO:0005623

  // Species:
  species A in cell = 0;
  species B in cell = 0;
  species C in cell = 0;
  species D in cell = 0;
  species E in cell = 0;
  species F in cell = 0;
  species $X in cell = 10;
  species $Y in cell = 2;
  species $Z in cell = 1;

  // Reactions:
  R1: $X -> A; cell*((10*X - A)/(1 + X + A + B^2));  // modifiers: B
  R2: A -> B; cell*((2*A - B)/(1 + A + B));
  R3: B -> C; cell*((B - C)/(1 + B + C + D^2));  // modifiers: D
  R4: C -> D; cell*((5*C - D)/(1 + C + D));
  R5: D -> $Y; cell*((10*D - Y)/(1 + D + Y));
  R6: B -> E; cell*((B - E)/(1 + B + E + F^2));  // modifiers: F
  R7: E -> F; cell*((5*E - F)/(1 + E + F));
  R8: F -> $Z; cell*((10*F - Z)/(1 + F + Z));

  // Unit definitions:
  unit substance = dimensionless;
  unit time = dimensionless;
end
