// SBML level 3 version 2

model Kolomeisky2003_myosin()
  // Kolomeisky2003_MyosinV_Processivity
  // This is the 2 state model of Myosin V movement described in the article:
  // A simple kinetic model describes the processivity of myosin-v.
  // Kolomeisky AB , Fisher ME Biophys. J. 84(3):1642-50 (2003); PubmedID: 12609867
  // Abstract:
  // Myosin-V is a motor protein responsible for organelle and vesicle transport in cells. Recent single-molecule experiments have shown that it is an efficient processive motor that walks along actin filaments taking steps of mean size close to 36 nm. A theoretical study of myosin-V motility is presented following an approach used successfully to analyze the dynamics of conventional kinesin but also taking some account of step-size variations. Much of the present experimental data for myosin-V can be well described by a two-state chemical kinetic model with three load-dependent rates. In addition, the analysis predicts the variation of the mean velocity and of the randomness-a quantitative measure of the stochastic deviations from uniform, constant-speed motion-with ATP concentration under both resisting and assisting loads, and indicates a substep of size d(0) approximately 13-14 nm (from the ATP-binding state) that appears to accord with independent observations.
  // The model differs slightly from the published version. The ATP and ADP bound forms of myosin are called S0 and S1. The state transition and binding constants are called k_1, k_2, k_3 and k_4 instead of k0 0, u0 1, k' 0 and w0 1. Similarly the state loading factors are named th_1, th_2, th_3 and th_4 instead of θ+ 0, θ+ 1, θ- 0 and θ- 1. The species fwd_step1, fwd_step2, back_step1 and back_step2 count the number of state changes of each kind the myosine molecules have taken over time.
  // The model can be evaluated in a deterministic continuous or stochastic discreet fashion. The parameter V holds the (forward) speed at each time point, the V_avg the overall way divided by the simulation time and the amount of myosine molecules.
  // Originally created by libAntimony v1.4 (using libSBML 3.4.1)
  // This model originates from BioModels Database: A Database of Annotated Published Models (http://www.ebi.ac.uk/biomodels/). It is copyright (c) 2005-2011 The BioModels.net Team.
  // For more information see the terms of use.
  // To cite BioModels Database, please use: Li C, Donizelli M, Rodriguez N, Dharuri H, Endler L, Chelliah V, Li L, He E, Henry A, Stefan MI, Snoep JL, Hucka M, Le Novère N, Laibe C (2010) BioModels Database: An enhanced, curated and annotated resource for published quantitative kinetic models. BMC Syst Biol., 4:92.
  // biomodels.db:MODEL6623628741
  // biomodels.db:BIOMD0000000305
  // isDescribedBy pubmed:12609867
  // isVersionOf GO:0000146 GO:0030832
  // hasTaxon taxonomy:2759
  // hasProperty mamo:MAMO_0000046
  // model units - substance: substance, time: second, volume: volume, area: area, length: metre, extent: substance

  // Compartments:
  compartment compartment_ = 1e-15 volume;

  // Species:
  substanceOnly species S0 in compartment_ = 10;  // GO:0031475
  species $ATP in compartment_ = 20;  // substance in umole; CHEBI:15422; kegg.compound:C00002 pubchem.substance:3304
  substanceOnly species S1 in compartment_ = 0;  // hasPart CHEBI:16761; hasVersion GO:0031475
  species $Pi_ in compartment_ = 0;  // substance in umole; CHEBI:18367; kegg.compound:C00009
  species $ADP in compartment_ = 0;  // substance in umole; kegg.compound:C00008; CHEBI:16761 pubchem.substance:3310
  substanceOnly species fwd_step1 in compartment_ = 0;
  substanceOnly species fwd_step2 in compartment_ = 0;
  substanceOnly species back_step1 in compartment_ = 0;
  substanceOnly species back_step2 in compartment_ = 0;

  // Parameters:
  k_1 = 0.7;
  th_1 = -0.01;
  Force = 0;
  d = 36;
  kT = 4.1164;
  k_2 = 12;
  th_2 = 0.045;
  k_3 = 5e-6;
  th_3 = 0.58;
  k_4 = 6e-6;
  th_4 = 0.385;

  // Assignment rules:
  S_tot := S0 + S1;
  V := d*((Fw_1st_step + Fw_2nd_step)/2 - (Bw_1st_step + Bw_2nd_step)/2)/S_tot;
  V_ave := d*((fwd_step1 + fwd_step2)/2 - (back_step1 + back_step2)/2)/max(1e-15, S_tot*time);
  tau := (k_1*ATP*exp(-th_1*Force*d/kT) + k_2*exp(-th_2*Force*d/kT) + k_3*ATP*exp(th_3*Force*d/kT) + k_4*exp(th_4*Force*d/kT))/(k_1*ATP*exp(-th_1*Force*d/kT)*k_2*exp(-th_2*Force*d/kT) + k_3*ATP*exp(th_3*Force*d/kT)*k_4*exp(th_4*Force*d/kT));

  // Reactions:
  Fw_1st_step: S0 + $ATP => S1 + $Pi_ + fwd_step1; k_1*S0*ATP*exp(-th_1*Force*d/kT);  // hasPart ec-code:3.6.4.1
  Fw_2nd_step: S1 => S0 + $ADP + fwd_step2; k_2*S1*exp(-th_2*Force*d/kT);
  Bw_1st_step: S0 + $ATP => S1 + $Pi_ + back_step1; k_3*S0*ATP*exp(th_3*Force*d/kT);  // hasPart ec-code:3.6.4.1
  Bw_2nd_step: S1 => S0 + $ADP + back_step2; k_4*S1*exp(th_4*Force*d/kT);

  // Unit definitions:
  unit substance = item; substance is "molecules";
  unit umole = 1e-6 mole; umole is "micromole";
  unit uM = 1e-6 mole / litre;
  unit volume = litre; volume is "litre";
  unit area = metre^2;
end
