// SBML level 2 version 4

model Oligator()
  // Montagne2011_Oligator_optimised
  // This is the model of the in vitro DNA oscillator called oligator with the optmized set of parameters described in the article:
  // Programming an in vitro DNA oscillator using a molecular networking strategy.
  // Montagne K, Plasson R, Sakai Y, Fujii T, Rondelez Y. Mol Syst Biol. 2011 Feb 1;7:466. PubmedID:21283142, Doi:10.1038/msb.2010.120
  // Abstract:
  // Living organisms perform and control complex behaviours by using webs of chemical reactions organized in precise networks. This powerful system concept, which is at the very core of biology, has recently become a new foundation for bioengineering. Remarkably, however, it is still extremely difficult to rationally create such network architectures in artificial, non-living and well-controlled settings. We introduce here a method for such a purpose, on the basis of standard DNA biochemistry. This approach is demonstrated by assembling de novo an efficient chemical oscillator: we encode the wiring of the corresponding network in the sequence of small DNA templates and obtain the predicted dynamics. Our results show that the rational cascading of standard elements opens the possibility to implement complex behaviours in vitro. Because of the simple and well-controlled environment, the corresponding chemical network is easily amenable to quantitative mathematical analysis. These synthetic systems may thus accelerate our understanding of the underlying principles of biological dynamic modules.
  // The model reproduces the time courses in fig 2B. The parameter identifiers of the reaction constants are not the same as in the supplemental material, but are just called kXd and kXr for the forward and backwards constant of reaction X respectively.
  // This model originates from BioModels Database: A Database of Annotated Published Models (http://www.ebi.ac.uk/biomodels/). It is copyright (c) 2005-2011 The BioModels.net Team.
  // For more information see the terms of use.
  // To cite BioModels Database, please use: Li C, Donizelli M, Rodriguez N, Dharuri H, Endler L, Chelliah V, Li L, He E, Henry A, Stefan MI, Snoep JL, Hucka M, Le Novère N, Laibe C (2010) BioModels Database: An enhanced, curated and annotated resource for published quantitative kinetic models. BMC Syst Biol., 4:92.
  // biomodels.db:MODEL1010260000
  // biomodels.db:BIOMD0000000315
  // isDescribedBy pubmed:21283142
  // isVersionOf GO:0006259
  // hasTaxon taxonomy:131567
  // hasProperty mamo:MAMO_0000046

  // Compartments:
  compartment sample = 1;

  // Species:
  species T1 in sample = 38.5;  // isVersionOf CHEBI:16991 kegg.compound:C00039
  species alpha in sample = 10;  // isVersionOf CHEBI:16991 kegg.compound:C00039
  species alpha_T1 in sample = 0;  // hasVersion CHEBI:16991 kegg.compound:C00039
  species alpha_T1_alpha in sample = 0;  // hasVersion CHEBI:16991 kegg.compound:C00039
  species T1_alpha in sample = 0;  // hasVersion CHEBI:16991 kegg.compound:C00039
  species alpha_alpha_T1 in sample = 0;  // hasVersion CHEBI:16991 kegg.compound:C00039
  species T2 in sample = 3.89;  // isVersionOf CHEBI:16991 kegg.compound:C00039
  species alpha_T2 in sample = 0;  // hasVersion CHEBI:16991 kegg.compound:C00039
  species alpha_T2_beta in sample = 0;  // hasVersion CHEBI:16991 kegg.compound:C00039
  species beta in sample = 0;  // isVersionOf CHEBI:16991 kegg.compound:C00039
  species T2_beta in sample = 0;  // hasVersion CHEBI:16991 kegg.compound:C00039
  species alpha_beta_T2 in sample = 0;  // hasVersion CHEBI:16991 kegg.compound:C00039
  species T3 in sample = 38.5;  // isVersionOf CHEBI:16991 kegg.compound:C00039
  species beta_T3 in sample = 0;  // hasVersion CHEBI:16991 kegg.compound:C00039
  species beta_T3_Inh in sample = 0;  // hasVersion CHEBI:16991 kegg.compound:C00039
  species Inh in sample = 0;  // isVersionOf CHEBI:16991 kegg.compound:C00039
  species T3_Inh in sample = 0;  // hasVersion CHEBI:16991 kegg.compound:C00039
  species beta_Inh_T3 in sample = 0;  // hasVersion CHEBI:16991 kegg.compound:C00039
  species Inh_T1 in sample = 0;  // hasVersion CHEBI:16991 kegg.compound:C00039
  species $empty in sample = 0;

  // Parameters:
  k0d = 0.0294 per_nM_per_min;
  k0r = 3.434579 per_min;
  k1d = 3.434579 per_min;
  k1r = 0.0294 per_nM_per_min;
  k2d = 3.434579 per_min;
  k2r = 0.0294 per_nM_per_min;
  k3d = 3.434579 per_min;
  k3r = 0.0294 per_nM_per_min;
  k4d = 15.2 per_min;
  k5d = 11.8408 per_min;
  k6d = 3.34 per_min;
  k7d = 0.0294 per_nM_per_min;
  k7r = 3.434579 per_min;
  k8d = 0.6107143 per_min;
  k8r = 0.0171 per_nM_per_min;
  k9d = 0.6107143 per_min;
  k9r = 0.0171 per_nM_per_min;
  k10d = 3.434579 per_min;
  k10r = 0.0294 per_nM_per_min;
  k11d = 11.8408 per_min;
  k12d = 9.2239832 per_min;
  k13d = 2.60186 per_min;
  k14d = 0.0171 per_nM_per_min;
  k14r = 0.6107143 per_min;
  k15d = 0.001862968 per_min;
  k15r = 0.027 per_nM_per_min;
  k16d = 0.027 per_nM_per_min;
  k16r = 0.001862968 per_min;
  k17d = 0.0171 per_nM_per_min;
  k17r = 0.6107143 per_min;
  k18d = 17.024 per_min;
  k19d = 5.566848 per_min;
  k20d = 3.2064 per_min;
  k21d = 0.027 per_nM_per_min;
  k21r = 0.006081081 per_min;
  k22d = 0.021546 per_nM_per_min;
  k22r = 4.153914e-5 per_nM_per_min;
  k23d = 4.153914e-5 per_nM_per_min;
  k23r = 0.021546 per_nM_per_min;
  k24d = 0.411 per_min;
  k25d = 0.485802 per_min;
  k26d = 1.7262 per_min;
  Bp_concentration has nM;
  Inh_total has nM;
  beta_total has nM;
  alpha_total has nM;

  // Assignment rules:
  Bp_concentration := 11*(alpha_T1 + T1_alpha + alpha_T2 + T2_beta + beta_T3) + 16*(T3_Inh + Inh_T1) + 22*(alpha_T1_alpha + alpha_alpha_T1 + alpha_T2_beta + alpha_beta_T2) + 27*(beta_T3_Inh + beta_Inh_T3);
  fluorescence := -0.38 + 0.00093*(11*(alpha_T1 + T1_alpha + alpha_T2 + T2_beta + beta_T3) + 16*(T3_Inh + Inh_T1) + 22*(alpha_T1_alpha + alpha_alpha_T1 + alpha_T2_beta + alpha_beta_T2) + 27*(beta_T3_Inh + beta_Inh_T3));
  Inh_total := Inh + T3_Inh + beta_T3_Inh + Inh_T1;
  beta_total := beta + T2_beta + alpha_T2_beta + beta_T3 + beta_T3_Inh;
  alpha_total := alpha + alpha_T1 + T1_alpha + 2*alpha_T1_alpha + alpha_T2 + alpha_T2_beta + alpha_T2;

  // Reactions:
  ass_aa_l: T1 + alpha -> alpha_T1; sample*(k0d*T1*alpha - k0r*alpha_T1);  // isVersionOf GO:0003677
  m_ass_aa_lr: alpha_T1_alpha -> alpha + alpha_T1; sample*(k1d*alpha_T1_alpha - k1r*alpha*alpha_T1);  // isVersionOf GO:0003677
  m_ass_aa_r: T1_alpha -> T1 + alpha; sample*(k2d*T1_alpha - k2r*T1*alpha);  // isVersionOf GO:0003677
  m_ass_aa_rl: alpha_T1_alpha -> alpha + T1_alpha; sample*(k3d*alpha_T1_alpha - k3r*alpha*T1_alpha);  // isVersionOf GO:0003677
  pol_aa: alpha_T1 => alpha_alpha_T1; sample*k4d*alpha_T1;  // isVersionOf ec-code:2.7.7.7 GO:0003887
  dis_aa: alpha_T1_alpha => alpha + alpha_alpha_T1; sample*k5d*alpha_T1_alpha;  // isVersionOf ec-code:2.7.7.7 GO:0003887
  nick_aa: alpha_alpha_T1 => alpha_T1_alpha; sample*k6d*alpha_alpha_T1;  // isVersionOf GO:0004519
  ass_ab_l: alpha + T2 -> alpha_T2; sample*(k7d*alpha*T2 - k7r*alpha_T2);  // isVersionOf GO:0003677
  m_ass_ab_lr: alpha_T2_beta -> alpha_T2 + beta; sample*(k8d*alpha_T2_beta - k8r*alpha_T2*beta);  // isVersionOf GO:0003677
  m_ass_ab_r: T2_beta -> T2 + beta; sample*(k9d*T2_beta - k9r*T2*beta);  // isVersionOf GO:0003677
  m_ass_ab_rl: alpha_T2_beta -> alpha + T2_beta; sample*(k10d*alpha_T2_beta - k10r*alpha*T2_beta);  // isVersionOf GO:0003677
  pol_ab: alpha_T2 => alpha_beta_T2; sample*k11d*alpha_T2;  // isVersionOf ec-code:2.7.7.7 GO:0003887
  dis_ab: alpha_T2_beta => beta + alpha_beta_T2; sample*k12d*alpha_T2_beta;  // isVersionOf ec-code:2.7.7.7 GO:0003887
  nick_ab: alpha_beta_T2 => alpha_T2_beta; sample*k13d*alpha_beta_T2;  // isVersionOf GO:0004519
  ass_bc_l: beta + T3 -> beta_T3; sample*(k14d*beta*T3 - k14r*beta_T3);  // isVersionOf GO:0003677
  m_ass_bc_lr: beta_T3_Inh -> beta_T3 + Inh; sample*(k15d*beta_T3_Inh - k15r*beta_T3*Inh);  // isVersionOf GO:0003677
  ass_bc_r: T3 + Inh -> T3_Inh; sample*(k16d*T3*Inh - k16r*T3_Inh);  // isVersionOf GO:0003677
  ass_bc_rl: beta + T3_Inh -> beta_T3_Inh; sample*(k17d*beta*T3_Inh - k17r*beta_T3_Inh);  // isVersionOf GO:0003677
  pol_bc: beta_T3 => beta_Inh_T3; sample*k18d*beta_T3;  // isVersionOf GO:0003677
  dis_bc: beta_T3_Inh => Inh + beta_Inh_T3; sample*k19d*beta_T3_Inh;  // isVersionOf ec-code:2.7.7.7 GO:0003887
  nick_bc: beta_Inh_T3 => beta_T3_Inh; sample*k20d*beta_Inh_T3;  // isVersionOf GO:0004519
  inh_ac: T1 + Inh -> Inh_T1; sample*(k21d*T1*Inh - k21r*Inh_T1);  // isVersionOf GO:0003677
  inh_displ_ac: T1_alpha + Inh -> alpha + Inh_T1; sample*(k22d*T1_alpha*Inh - k22r*alpha*Inh_T1);  // isVersionOf GO:0003677
  m_inh_displ_ca: alpha + Inh_T1 -> alpha_T1 + Inh; sample*(k23d*alpha*Inh_T1 - k23r*alpha_T1*Inh);  // isVersionOf GO:0003677
  exo_a: alpha -> $empty; sample*k24d*alpha;  // isVersionOf GO:0004527
  exo_b: beta -> $empty; sample*k25d*beta;  // isVersionOf GO:0004527
  exo_c: Inh -> $empty; sample*k26d*Inh;  // isVersionOf GO:0004527

  // Unit definitions:
  unit time = 60 second; time is "min";
  unit substance = 1e-9 mole; substance is "nanomole";
  unit nM = 1e-9 mole / litre;
  unit per_nM_per_min = litre / (1e-9 mole * 60 second);
  unit per_min = 1 / (60 second);
end
