// SBML level 2 version 4

function function_4_VIIIa_IXa_degradation_2(I, VIIIa_IXa, compartment_1)
  (compartment_1*abs(I - VIIIa_IXa) + (I - VIIIa_IXa))/compartment_1;
end

model Model_1()
  // Jones1994_BloodCoagulation
  // This model is built based on the experimental findings described in Lawson et al., 1994 (PMID:8083241)
  // This model is described in the article:
  // A model for the tissue factor pathway to thrombin. II. A mathematical simulation.
  // Jones KC, Mann KG.
  // J. Biol. Chem. 1994 Sep; 269(37): 23367-23373
  // Abstract:
  // A mathematical simulation of the tissue factor pathway to the generation of thrombin has been developed using a combination of empirical, estimated, and deduced rate constants for reactions involving the activation of factor IX, X, V, and VIII, in the formation of thrombin, as well as rate constants for the assembly of the coagulation enzyme complexes which involve factor VIIIa-factor IXa (intrinsic tenase) and factor Va-Xa (prothrombinase) assembled on phospholipid membrane. Differential equations describing the fate of each species in the reaction were developed and solved using an interactive procedure based upon the Runge-Kutta technique. In addition to the theoretical considerations involving the reactions of the tissue factor pathway, a physical constraint associated with the stability of the factor VIIIa-factor IXa complex has been incorporated into the model based upon the empirical observations associated with the stability of this complex. The model system provides a realistic accounting of the fates of each of the proteins in the coagulation reaction through a range of initiator (factor VIIa-tissue factor) concentrations ranging from 5 pM to 5 nM. The model is responsive to alterations in the concentrations of factor VIII, factor V, and their respective activated species, factor VIIIa and factor Va, and overall provides a reasonable approximation of empirical data. The computer model permits the assessment of the reaction over a broad range of conditions and provides a useful tool for the development and management of reaction studies.
  // This model is hosted on BioModels Database and identified by: BIOMD0000000336.
  // To cite BioModels Database, please use: BioModels Database: An enhanced, curated and annotated resource for published quantitative kinetic models.
  // To the extent possible under law, all copyright and related or neighbouring rights to this encoded model have been dedicated to the public domain worldwide. Please refer to CC0 Public Domain Dedication for more information.
  // biomodels.db:MODEL1106060000
  // biomodels.db:BIOMD0000000336
  // isDescribedBy pubmed:8083242
  // isVersionOf GO:0007596
  // hasTaxon taxonomy:9606
  // hasProperty mamo:MAMO_0000046

  // Compartments:
  compartment compartment_1 = 1;

  // Species:
  species IX in compartment_1 = 9e-8;  // uniprot:P00740
  species IX_TF_VIIa in compartment_1 = 0;  // hasPart uniprot:P13726 uniprot:P00740
  species TF_VIIa in compartment_1 = 5e-9;  // hasPart uniprot:P13726
  species IXa in compartment_1 = 0;  // isVersionOf uniprot:P00740
  species X in compartment_1 = 1.7e-7;  // uniprot:P00742
  species X_TF_VIIa in compartment_1 = 0;  // hasPart uniprot:P13726 uniprot:P00742
  species Xa in compartment_1 = 0;  // isVersionOf uniprot:P00742
  species VIIIa_IXa in compartment_1 = 0;  // hasPart uniprot:P00740 uniprot:P00451
  species X_VIIIa_IXa in compartment_1 = 0;  // hasPart uniprot:P00742 uniprot:P00740 uniprot:P00451
  species V in compartment_1 = 2e-8;  // uniprot:P12259
  species Va in compartment_1 = 0;  // isVersionOf uniprot:P12259
  species VIII in compartment_1 = 7e-10;  // uniprot:P00451
  species VIIIa in compartment_1 = 0;  // isVersionOf uniprot:P00451
  species IIa in compartment_1 = 0;  // isVersionOf uniprot:P00734
  species II in compartment_1 = 1.4e-6;  // uniprot:P00734
  species II_Va_Xa in compartment_1 = 0;  // hasPart uniprot:P00734 uniprot:P12259 uniprot:P00742
  species Va_Xa in compartment_1 = 0;  // hasPart uniprot:P12259 uniprot:P00742
  species mIIa in compartment_1 = 0;  // isVersionOf uniprot:P00734

  // Parameters:
  k1 = 20000000;
  k2 = 20000000;
  k3 = 10000000;
  k4 = 20000000;
  k5 = 10000000;
  k6 = 100000000;
  k7 = 10000000;
  k8 = 400000000;
  k9 = 0.005;
  k10 = 0.4;
  k11 = 0.3;
  k12 = 1.15;
  k13 = 8.2;
  k14 = 32;
  k15 = 100000;
  k16 = 24;
  k17 = 44;
  k18 = 0.001;
  k19 = 70;
  k20 = 0.02;
  I = 0;
  var IIa_plus_1_2mIIa; IIa_plus_1_2mIIa is "IIa+1.2mIIa";

  // Assignment rules:
  IIa_plus_1_2mIIa := IIa + 1.2*mIIa;

  // Rate rules:
  I' = (-abs(I - VIIIa_IXa) + (I - VIIIa_IXa))*k20;

  // Reactions:
  R1: IX + TF_VIIa -> IX_TF_VIIa; compartment_1*(k6*IX*TF_VIIa - k16*IX_TF_VIIa);
  R1b: IX_TF_VIIa => TF_VIIa + IXa; compartment_1*k11*IX_TF_VIIa;
  R2: X + TF_VIIa -> X_TF_VIIa; compartment_1*(k6*X*TF_VIIa - k17*X_TF_VIIa);
  R2b: X_TF_VIIa => TF_VIIa + Xa; compartment_1*k12*X_TF_VIIa;
  R3: X + VIIIa_IXa -> X_VIIIa_IXa; compartment_1*(k6*X*VIIIa_IXa - k18*X_VIIIa_IXa);
  R3b: X_VIIIa_IXa => VIIIa_IXa + Xa; compartment_1*k13*X_VIIIa_IXa;
  R4: IX + Xa => Xa + IXa; compartment_1*k15*IX*Xa;
  R5: V + Xa => Xa + Va; compartment_1*k1*V*Xa;
  R6: VIII + Xa => Xa + VIIIa; compartment_1*k3*VIII*Xa;
  R7: V + IIa => IIa + Va; compartment_1*k2*V*IIa;
  R8: VIII + IIa => IIa + VIIIa; compartment_1*k4*VIII*IIa;
  R9: II + Va_Xa -> II_Va_Xa; compartment_1*(k6*II*Va_Xa - k19*II_Va_Xa);
  R9b: II_Va_Xa => Va_Xa + mIIa; compartment_1*k14*II_Va_Xa;
  R10: mIIa + Va_Xa => Va_Xa + IIa; compartment_1*k5*mIIa*Va_Xa;
  R11: VIIIa + IXa -> VIIIa_IXa; compartment_1*(k7*VIIIa*IXa - k9*VIIIa_IXa);
  R12: Va + Xa -> Va_Xa; compartment_1*(k6*Va*Xa - k10*Va_Xa);
  R7_atn: V + mIIa => mIIa + Va; compartment_1*k2*V*mIIa;
  R8_atn: VIII + mIIa => mIIa + VIIIa; compartment_1*k4*VIII*mIIa;
  R4_atn: IX + Va_Xa => Va_Xa + IXa; compartment_1*k15*IX*Va_Xa;
  VIIIa_IXa_degradation: VIIIa_IXa => ; compartment_1*function_4_VIIIa_IXa_degradation_2(I, VIIIa_IXa, compartment_1);
end
