// SBML level 2 version 4

function LD1212(tod)
  ceil(sin(pi*tod/12)/2);
end

function function_2(acc_rate, acc)
  acc_rate*acc;
end
function_2 is "Light accumulator decrease";

function light(tod)
  LD1212(tod);
end

function transcription(t)
  1 + 0*t;
end

function ox_toc1(t)
  0*t;
end

function copies_toc1(t)
  1 + 0*t;
end

function copies_cca1(t)
  1 + 0*t;
end

function ox_cca1(t)
  0*t;
end

function translation(t)
  1 + 0*t;
end

function proteasome(t)
  1 + 0*t;
end

function Translation(t, T, mrna)
  translation(t)*T*mrna;
end

function Light_dependent_protein_decay(t, D_l, D_d, level)
  proteasome(t)*(light(t)*D_l + (1 - light(t))*D_d)*level;
end
Light_dependent_protein_decay is "Light-dependent protein decay";

function Light_dependent_transport(t, Di_l, Di_d, level)
  (light(t)*Di_l + (1 - light(t))*Di_d)*level;
end
Light_dependent_transport is "Light-dependent transport";

function LUC_transcription_for_pTOC1(t, R_toc1_acc, acc, R_toc1_cca1, cca1_n, H_toc1_cca1, rep_pTOC1, L_toc1)
  rep_pTOC1*transcription(t)*(L_toc1 + R_toc1_acc*acc)/(1 + L_toc1 + R_toc1_acc*acc + (R_toc1_cca1*cca1_n)^H_toc1_cca1);
end

function function_8(t, R_toc1_acc, acc, R_toc1_cca1, cca1_n, H_toc1_cca1, rep_TOC1, L_toc1)
  rep_TOC1*transcription(t)*copies_toc1(t)*(L_toc1 + R_toc1_acc*acc)/(1 + L_toc1 + R_toc1_acc*acc + (R_toc1_cca1*cca1_n)^H_toc1_cca1);
end
function_8 is "TOC1-LUC transcription";

function LUC_transcription_for_pCCA1(t, toc1_2, R_cca1_toc1_2_l, R_cca1_toc1_2_d, H_cca1_toc1, rep_pCCA1)
  rep_pCCA1*transcription(t)*(toc1_2*(light(t)*R_cca1_toc1_2_l + (1 - light(t))*R_cca1_toc1_2_d))^H_cca1_toc1/((toc1_2*(light(t)*R_cca1_toc1_2_l + (1 - light(t))*R_cca1_toc1_2_d))^H_cca1_toc1 + 1);
end

function function_10(t, toc1_2, R_cca1_toc1_2_l, R_cca1_toc1_2_d, H_cca1_toc1, rep_CCA1)
  rep_CCA1*transcription(t)*copies_cca1(t)*(toc1_2*(light(t)*R_cca1_toc1_2_l + (1 - light(t))*R_cca1_toc1_2_d))^H_cca1_toc1/((toc1_2*(light(t)*R_cca1_toc1_2_l + (1 - light(t))*R_cca1_toc1_2_d))^H_cca1_toc1 + 1);
end
function_10 is "CCA1-LUC transcription";

function tf_output(reporter, effcopies, tf)
  (1 + reporter*(effcopies - 1))*tf;
end

function function_1(acc_rate, t)
  acc_rate*light(t);
end
function_1 is "Light accumulator increase";

function function_3(R_toc1_acc, acc, R_toc1_cca1, H_toc1_cca1, cca1_n, t, L_toc1, rep_CCA1, effcopies_cca1_LHY7)
  transcription(t)*(ox_toc1(t) + copies_toc1(t)*(L_toc1 + R_toc1_acc*acc)/(1 + L_toc1 + R_toc1_acc*acc + (R_toc1_cca1*tf_output(rep_CCA1, effcopies_cca1_LHY7, cca1_n))^H_toc1_cca1));
end
function_3 is "TOC1 transcription";

function function_6(t, toc1_2, R_cca1_toc1_2_l, R_cca1_toc1_2_d, H_cca1_toc1, rep_TOC1, effcopies_toc1_TOC8)
  transcription(t)*(ox_cca1(t) + copies_cca1(t)*(tf_output(rep_TOC1, effcopies_toc1_TOC8, toc1_2)*(light(t)*R_cca1_toc1_2_l + (1 - light(t))*R_cca1_toc1_2_d))^H_cca1_toc1/((tf_output(rep_TOC1, effcopies_toc1_TOC8, toc1_2)*(light(t)*R_cca1_toc1_2_l + (1 - light(t))*R_cca1_toc1_2_d))^H_cca1_toc1 + 1));
end
function_6 is "CCA1 transcription";

model Model_1()
  // Troein2011_ClockCircuit_OstreococcusTauri
  // This model is from the article:
  // Multiple light inputs to a simple clock circuit allow complex biological rhythms
  // Troein C, Corellou F, Dixon LE, van Ooijen G, O'Neill JS, Bouget FY, Millar AJ. Plant J.2011 Apr;66(2):375-85. 21219507,
  // Abstract:
  // Circadian clocks are biological timekeepers that allow living cells to time their activity in anticipation of predictable environmental changes. Detailed understanding of the circadian network of higher plants, such as Arabidopsis thaliana, is hampered by the high number of partially redundant genes. However, the picoeukaryotic alga Ostreococcus tauri, which was recently shown to possess a small number of non-redundant clock genes, presents an attractive alternative target for detailed modelling of circadian clocks in the green lineage. Based on extensive time-series data from in vivo reporter gene assays, we developed a model of the Ostreococcus clock as a feedback loop between the genes TOC1 and CCA1. The model reproduces the dynamics of the transcriptional and translational reporters over a range of photoperiods. Surprisingly, the model is also able to predict the transient behaviour of the clock when the light conditions are altered. Despite the apparent simplicity of the clock circuit, it displays considerable complexity in its response to changing light conditions. Systematic screening of the effects of altered day length revealed a complex relationship between phase and photoperiod, which is also captured by the model. The complex light response is shown to stem from circadian gating of light-dependent mechanisms. This study provides insights into the contributions of light inputs to the Ostreococcus clock. The model suggests that a high number of light-dependent reactions are important for flexible timing in a circadian clock with only one feedback loop.
  // Note: Two-gene model of the Ostreococcus circadian clock
  // This is a model of the circadian clock of Ostreococcus tauri, with a negative feedback loop between TOC1 and CCA1 (a.k.a. LHY) and multiple light inputs. It was used and described in Troein et al., Plant Journal (2011).
  // The model incorporates luciferase reporters, and in this SBML model the four different versions of the model for transcriptional and translational reporter lines (pTOC1::LUC, pCCA1::LUC, TOC1-LUC and CCA1-LUC) are all accessible by setting one of the rep_X parameters to 1 and the others to 0. You can also set all four to 0 to only simulate the non-reporter core of the system.
  // Input to the system should be provided by modifying the "light" function. An implementation of LD 12:12 is provided as an example, but the model was also used with more complicated light regimes that vary between data sets and are not convenient to express directly in SBML.
  // The functions "ox_cca1" and "ox_toc1" can be altered to add overexpression of CCA1 and TOC1. Setting either to x gives additional, constitutive transcription at x times the maximal (and typically not realizable) transcription rate of the native gene. The overexpression mutant fits in Figure 7 of Troein et al. (2011) used ox_cca1 = 0.115 and oc_toc1 = 0.0584, respectively.
  // The functions "copies_toc1" and "copies_cca1" are normally 1 but can be lowered to simulate knockdown experiments. The functions "transcription", "translation" and "proteasome" can be modified to simulate the effects of altering the overall rate of transcription, translation and protein degradation.
  // The parameters were fitted specifically to data from transgenic reporter lines TOC8, pTOC3, LHY7 and pLHY7 (Corellou et al., Plant Cell 2009). Parameters that begin with "effcopies" describe the effective number of copies of CCA1 or TOC1 in the respective translational fusion lines, with anything above 1 due to the fusion proteins.
  // For the model fitting, the initial values were fitted to the data in the various time courses. The initial values given here correspond to the limit cycle of the system in LD 12:12. The system converges to the limit cycle in just a few days under most light conditions, so these initial values are biologically meaningful.
  // The species cca1luc_c and cca1luc_n have been merged into cca1luc (which corresponds to the observable luminescence signal), because Copasi refused to run the system otherwise. For TOC1-LUC, the predicted output signal is the sum of toc1luc_1 and toc1luc_2.
  // This model originates from BioModels Database: A Database of Annotated Published Models (http://www.ebi.ac.uk/biomodels/). It is copyright (c) 2005-2011 The BioModels.net Team.
  // For more information see the terms of use.
  // To cite BioModels Database, please use: Li C, Donizelli M, Rodriguez N, Dharuri H, Endler L, Chelliah V, Li L, He E, Henry A, Stefan MI, Snoep JL, Hucka M, Le Novère N, Laibe C (2010) BioModels Database: An enhanced, curated and annotated resource for published quantitative kinetic models. BMC Syst Biol., 4:92.
  // biomodels.db:MODEL1107230000
  // biomodels.db:BIOMD0000000350
  // isDescribedBy pubmed:21219507
  // isVersionOf kegg.pathway:map04710 GO:0042752
  // hasTaxon taxonomy:70448
  // hasProperty mamo:MAMO_0000046

  // Compartments:
  compartment compartment = 1;  // GO:0005623

  // Species:
  species acc in compartment = 0.2720674;
  species toc1_mrna in compartment = 0.03856653;  // isHomologTo CHEBI:33699
  species toc1_1 in compartment = 0.2065213;  // isVersionOf uniprot:Q9LKL2
  species toc1_2 in compartment = 0.3127119;  // isVersionOf uniprot:Q9LKL2
  species cca1_mrna in compartment = 0.1045556;  // isVersionOf CHEBI:33699
  species cca1_c in compartment = 0.05131543;  // isHomologTo uniprot:P92973
  species cca1_n in compartment = 3.072838;  // isHomologTo uniprot:P92973
  species toc1luc_mrna in compartment = 0;  // isVersionOf CHEBI:33699
  species toc1luc_1 in compartment = 0;  // hasPart uniprot:Q9LKL2
  species toc1luc_2 in compartment = 0;  // isVersionOf uniprot:Q9LKL2
  species cca1luc_mrna in compartment = 0;  // isVersionOf CHEBI:33699
  species cca1luc in compartment = 0;  // isVersionOf uniprot:P92973
  species luc_mrna in compartment = 0;  // isVersionOf CHEBI:33699
  species luc in compartment = 0;  // isVersionOf CHEBI:25078

  // Parameters:
  D_luc = 0.1828812;
  D_mrna_luc = 1;
  acc_rate = 0.08201323;
  R_toc1_cca1 = 1.087061;
  H_toc1_cca1 = 2.078077;
  L_toc1 = 0.0001;
  R_toc1_acc = 0.231107;
  D_mrna_toc1 = 0.2921305;
  T_toc1 = 0.7699702;
  Di_toc1_12_l = 0.1364906;
  Di_toc1_12_d = 0.3266195;
  D_toc1_2_l = 0.4615506;
  D_toc1_2_d = 0.3566139;
  H_cca1_toc1 = 2.500706;
  R_cca1_toc1_2_l = 3.275203;
  R_cca1_toc1_2_d = 1.385639;
  D_mrna_cca1 = 1.330821;
  T_cca1 = 4.904866;
  Di_cca1_cn = 10;
  D_cca1_l = 0.4241779;
  D_cca1_d = 0.2693802;
  effcopies_cca1_LHY7 = 1.139658;
  effcopies_toc1_TOC8 = 1;
  T_luc = 1;
  rep_TOC1 = 0;
  rep_pTOC1 = 0;
  rep_CCA1 = 0;
  rep_pCCA1 = 0;

  // Assignment rules:
  toc1luc := toc1luc_1 + toc1luc_2;

  // Reactions:
  reaction_1: => acc; compartment*function_1(acc_rate, time); reaction_1 is "Light accumulator increase";  // isVersionOf GO:0009058
  reaction_2: acc => ; compartment*function_2(acc_rate, acc); reaction_2 is "Light accumulator decrease";  // isVersionOf GO:0009056
  reaction_3: => toc1_mrna; compartment*function_3(R_toc1_acc, acc, R_toc1_cca1, H_toc1_cca1, cca1_n, time, L_toc1, rep_CCA1, effcopies_cca1_LHY7); reaction_3 is "TOC1 transcription";  // modifiers: acc, cca1_n; isVersionOf GO:0006351
  TOC1_degradation: toc1_2 => ; compartment*Light_dependent_protein_decay(time, D_toc1_2_l, D_toc1_2_d, toc1_2);  // isVersionOf GO:0009056
  TOC1_translation: => toc1_1; compartment*Translation(time, T_toc1, toc1_mrna);  // modifiers: toc1_mrna; isVersionOf GO:0006412
  TOC1_conversion: toc1_1 => toc1_2; compartment*Light_dependent_transport(time, Di_toc1_12_l, Di_toc1_12_d, toc1_1);  // isVersionOf MOD:00000
  TOC1_mRNA_degradation: toc1_mrna => ; compartment*D_mrna_toc1*toc1_mrna;  // isVersionOf GO:0009056
  reaction_8: => cca1_mrna; compartment*function_6(time, toc1_2, R_cca1_toc1_2_l, R_cca1_toc1_2_d, H_cca1_toc1, rep_TOC1, effcopies_toc1_TOC8); reaction_8 is "CCA1 transcription";  // modifiers: toc1_2; isVersionOf GO:0006351
  CCA1_mRNA_degradation: cca1_mrna => ; compartment*D_mrna_cca1*cca1_mrna;  // isVersionOf GO:0009056
  CCA1_translation: => cca1_c; compartment*Translation(time, T_cca1, cca1_mrna);  // modifiers: cca1_mrna; isVersionOf GO:0006412
  CCA1_nuclear_transport: cca1_c => cca1_n; compartment*Di_cca1_cn*cca1_c;  // isVersionOf GO:0051169
  CCA1_degradation_cytosol: cca1_c => ; compartment*Light_dependent_protein_decay(time, D_cca1_l, D_cca1_d, cca1_c); CCA1_degradation_cytosol is "CCA1 degradation, cytosol";  // isVersionOf GO:0009056
  CCA1_degradation_nucleus: cca1_n => ; compartment*Light_dependent_protein_decay(time, D_cca1_l, D_cca1_d, cca1_n); CCA1_degradation_nucleus is "CCA1 degradation, nucleus";  // isVersionOf GO:0009056
  LUC_transcription_pTOC1: => luc_mrna; compartment*LUC_transcription_for_pTOC1(time, R_toc1_acc, acc, R_toc1_cca1, cca1_n, H_toc1_cca1, rep_pTOC1, L_toc1); LUC_transcription_pTOC1 is "LUC transcription, pTOC1";  // modifiers: acc, cca1_n; isVersionOf GO:0006351
  LUC_mRNA_degradation: luc_mrna => ; compartment*D_mrna_luc*luc_mrna;  // isVersionOf GO:0009056
  LUC_translation: => luc; compartment*Translation(time, T_luc, luc_mrna);  // modifiers: luc_mrna; isVersionOf GO:0006412
  LUC_decay: luc => ; compartment*D_luc*luc;  // isVersionOf GO:0030163
  reaction_18: => toc1luc_mrna; compartment*function_8(time, R_toc1_acc, acc, R_toc1_cca1, cca1_n, H_toc1_cca1, rep_TOC1, L_toc1); reaction_18 is "TOC1-LUC transcription";  // modifiers: acc, cca1_n; isVersionOf GO:0006351
  TOC1_LUC_mRNA_degradation: toc1luc_mrna => ; compartment*D_mrna_toc1*toc1luc_mrna; TOC1_LUC_mRNA_degradation is "TOC1-LUC mRNA degradation";  // isVersionOf GO:0009056
  TOC1_LUC_translation: => toc1luc_1; compartment*Translation(time, T_toc1, toc1luc_mrna); TOC1_LUC_translation is "TOC1-LUC translation";  // modifiers: toc1luc_mrna; isVersionOf GO:0006412
  TOC1_LUC_conversion: toc1luc_1 => toc1luc_2; compartment*Light_dependent_transport(time, Di_toc1_12_l, Di_toc1_12_d, toc1luc_1); TOC1_LUC_conversion is "TOC1-LUC conversion";  // isVersionOf MOD:00000
  TOC1_LUC_degradation: toc1luc_2 => ; compartment*Light_dependent_protein_decay(time, D_toc1_2_l, D_toc1_2_d, toc1luc_2); TOC1_LUC_degradation is "TOC1-LUC degradation";  // isVersionOf GO:0009056
  TOC1_LUC_1_deactivation: toc1luc_1 => ; compartment*D_luc*toc1luc_1; TOC1_LUC_1_deactivation is "TOC1-LUC(1) deactivation";  // isVersionOf GO:0030163
  TOC1_LUC_2_deactivation: toc1luc_2 => ; compartment*D_luc*toc1luc_2; TOC1_LUC_2_deactivation is "TOC1-LUC(2) deactivation";  // hasVersion GO:0030163
  LUC_transcription_pCCA1: => luc_mrna; compartment*LUC_transcription_for_pCCA1(time, toc1_2, R_cca1_toc1_2_l, R_cca1_toc1_2_d, H_cca1_toc1, rep_pCCA1); LUC_transcription_pCCA1 is "LUC transcription, pCCA1";  // modifiers: toc1_2; isVersionOf GO:0006351
  reaction_26: => cca1luc_mrna; compartment*function_10(time, toc1_2, R_cca1_toc1_2_l, R_cca1_toc1_2_d, H_cca1_toc1, rep_CCA1); reaction_26 is "CCA1-LUC transcription";  // modifiers: toc1_2; isVersionOf GO:0006351
  CCA1_LUC_mRNA_degradation: cca1luc_mrna => ; compartment*D_mrna_cca1*cca1luc_mrna; CCA1_LUC_mRNA_degradation is "CCA1-LUC mRNA degradation";  // isVersionOf GO:0009056
  CCA1_LUC_translation: => cca1luc; compartment*Translation(time, T_cca1, cca1luc_mrna); CCA1_LUC_translation is "CCA1-LUC translation";  // modifiers: cca1luc_mrna; isVersionOf GO:0006412
  CCA1_LUC_degradation: cca1luc => ; compartment*Light_dependent_protein_decay(time, D_cca1_l, D_cca1_d, cca1luc); CCA1_LUC_degradation is "CCA1-LUC degradation";  // isVersionOf GO:0009056
  CCA1_LUC_deactivation: cca1luc => ; compartment*D_luc*cca1luc; CCA1_LUC_deactivation is "CCA1-LUC deactivation";  // isVersionOf GO:0030163

  // Unit definitions:
  unit time = 3600 second;
  unit substance = 1e-9 mole;
end
