// SBML level 2 version 4

model Vernoux2011_AuxinSignalling_AuxinFluctuating()
  // Vernoux2011_AuxinSignaling_AuxinFluctuating
  // This model is from the article:
  // The auxin signalling network translates dynamic input into robust patterning at the shoot apex.
  // Vernoux T, Brunoud G, Farcot E, Morin V, Van den Daele H, Legrand J, Oliva M, Das P, Larrieu A, Wells D, Guédon Y, Armitage L, Picard F, Guyomarc'h S, Cellier C, Parry G, Koumproglou R, Doonan JH, Estelle M, Godin C, Kepinski S, Bennett M, De Veylder L, Traas J. Mol Syst Biol. 2011 Jul 5;7:508. 21734647 ,
  // Abstract:
  // The plant hormone auxin is thought to provide positional information for patterning during development. It is still unclear, however, precisely how auxin is distributed across tissues and how the hormone is sensed in space and time. The control of gene expression in response to auxin involves a complex network of over 50 potentially interacting transcriptional activators and repressors, the auxin response factors (ARFs) and Aux/IAAs. Here, we perform a large-scale analysis of the Aux/IAA-ARF pathway in the shoot apex of Arabidopsis, where dynamic auxin-based patterning controls organogenesis. A comprehensive expression map and full interactome uncovered an unexpectedly simple distribution and structure of this pathway in the shoot apex. A mathematical model of the Aux/IAA-ARF network predicted a strong buffering capacity along with spatial differences in auxin sensitivity. We then tested and confirmed these predictions using a novel auxin signalling sensor that reports input into the signalling pathway, in conjunction with the published DR5 transcriptional output reporter. Our results provide evidence that the auxin signalling network is essential to create robust patterns at the shoot apex.
  // Figure 4 of the supplementary material of the reference article has been reproduced here. In this model, the fluctuations of auxin level is represented using sinux function. Time evolution of the variables AUX/IAA (I) and mRNA (R) are plotted, under the influence of fluctuations of auxin level. pi_A is varied between 0 and 2 by steps of 0.1.
  // This model originates from BioModels Database: A Database of Annotated Published Models (http://www.ebi.ac.uk/biomodels/). It is copyright (c) 2005-2011 The BioModels.net Team.
  // For more information see the terms of use .
  // To cite BioModels Database, please use: Li C, Donizelli M, Rodriguez N, Dharuri H, Endler L, Chelliah V, Li L, He E, Henry A, Stefan MI, Snoep JL, Hucka M, Le Novère N, Laibe C (2010) BioModels Database: An enhanced, curated and annotated resource for published quantitative kinetic models. BMC Syst Biol., 4:92.
  // biomodels.db:MODEL1108110000
  // biomodels.db:BIOMD0000000352
  // isDescribedBy pubmed:21734647
  // hasTaxon taxonomy:3701
  // isVersionOf GO:0009734
  // hasProperty mamo:MAMO_0000046

  // Compartments:
  compartment c_1 = 1;  // isVersionOf GO:0005623

  // Species:
  species I in c_1 = 10; I is "Aux/IAA";  // isVersionOf uniprot:P49677
  species A in c_1 = 10; A is "ARF";  // isVersionOf uniprot:Q94JM3
  species D_II in c_1 = 10; D_II is "Aux/IAA:Aux/IAA";  // hasPart uniprot:P49677
  species D_IA in c_1 = 10; D_IA is "Aux/IAA:ARF";  // hasPart uniprot:P49677 uniprot:Q94JM3
  species R in c_1 = 1; R is "mRNA";  // isVersionOf CHEBI:33699
  species aux in c_1; aux is "auxin";  // isVersionOf uniprot:Q96247

  // Parameters:
  pi_I = 1;
  // Auxin target gene mRNA degradation rate. Computed from the mean half life of Aux/IAA mRNA in Narsai et al. The Plant Cell 2007.
  d_r = 0.007;
  // ARF degradation rate, based on the value for ARF1, cf. Salmon et al. The Plant Journal (2008)
  d_A = 0.003;
  d_II = 0.003;
  d_IA = 0.003;
  k_II = 1;
  k_IA = 1;
  B_d = 100;
  f_A = 10;
  gamma_I = 10;
  K_aux = 1;
  K_II = 10;
  K_IA = 10;
  f_c = 10;
  w_A = 10;
  w_I = 10;
  w_D = 10;
  // Aux/IAA basal degradation rate (without auxin), based on half-lifes measured in Dreher et al. The Plant Cell 2006.
  d_I = 0.05;
  pi_A = 1;
  k_Am = 10;

  // Assignment rules:
  aux := 1.11*sin(2*3.1416/800*(time - 200)) + 1.11;
  kprime_IA := K_IA*k_IA;
  kprime_II := K_II*k_II;
  aux_basal := 1/(K_aux*(gamma_I - 1));

  // Reactions:
  reac_DIA: A + I -> D_IA; k_IA*I*A - kprime_IA*D_IA;  // isVersionOf GO:0006461
  reac_DII: I + I -> D_II; k_II*I*I - kprime_II*D_II;  // isVersionOf GO:0006461
  reac_degrI: I => ; gamma_I*d_I*K_aux*aux/(K_aux*aux + 1)*I;  // modifiers: aux; isVersionOf GO:0009056
  reac_degrA: A => ; d_A*A;  // isVersionOf GO:0009056
  reac_degrDIA: D_IA => ; d_IA*D_IA;  // isVersionOf GO:0009056
  reac_degrDII: D_II => ; d_II*D_II;  // isVersionOf GO:0009056
  reac_DIAxA: D_IA => A; gamma_I*d_I*K_aux*aux/(K_aux*aux + 1)*D_IA;  // modifiers: aux; isVersionOf GO:0043241
  reac_DIIxI: D_II => I; gamma_I*d_I*K_aux*aux/(K_aux*aux + 1)*D_II;  // modifiers: aux; isVersionOf GO:0043241
  reac_degrR: R => ; d_r*R;  // isVersionOf GO:0009056
  reac_prodI: => I; pi_I*R;  // modifiers: R; isVersionOf GO:0009058
  reac_prodA: => A; pi_A;  // isVersionOf GO:0009058
  reac_prodR: => R; (1 + f_c/B_d*A*(1 + w_A*f_A*A/B_d))/(1 + A/B_d*(1 + w_A*A/B_d) + w_I*A*I/(K_IA*B_d) + w_D*D_IA/B_d + k_Am);  // modifiers: A, D_IA, I; isVersionOf GO:0009299
end
