// SBML level 2 version 4

function HenriMichaelisMenten_irreversible_kcat(kcat, enzyme, substrate, Km)
  kcat*enzyme*substrate/(Km + substrate);
end
HenriMichaelisMenten_irreversible_kcat is "Henri-Michaelis-Menten (irreversible) kcat";

model BIOMD0000000358()
  // Stortelder1997 - Thrombin Generation Amidolytic Activity
  // Mathematical modelling of a part of the blood coagulation mechanism.
  // This model is described in the article:
  // Mathematical modelling in blood coagulation : simulation and parameter estimation.
  // Stortelder W.J.H., Hemker P.W., Hemker, H.C.
  // CWI. Modelling, Analysis and Simulation, No. R 9720, p.1-11.
  // Abstract:
  // This paper describes the mathematical modelling of a part of the blood coagulation mechanism. The model includes the activation of factor X by a purified enzyme from Russel's Viper Venom (RVV), factor V and prothrombin, and also comprises the inactivation of the products formed. In this study we assume that in principle the mechanism of the process is known. However, the exact structure of the mechanism is unknown, and the process still can be described by different mathematical models. These models are put to test by measuring their capacity to explain the course of thrombin generation as observed in plasma after recalcification in presence of RVV. The mechanism studied is mathematically modelled as a system of differential-algebraic equations (DAEs). Each candidate model contains some freedom, which is expressed in the model equations by the presence of unknown parameters. For example, reaction constants or initial concentrations are unknown. The goal of parameter estimation is to determine these unknown parameters in such a way that the theoretical (i.e., computed) results fit the experimental data within measurement accuracy and to judge which modifications of the chemical reaction scheme allow the best fit. We present results on model discrimination and estimation of reaction constants, which are hard to obtain in another way.
  // This model is hosted on BioModels Database and identified by: BIOMD0000000358 .
  // To cite BioModels Database, please use: BioModels Database: An enhanced, curated and annotated resource for published quantitative kinetic models .
  // To the extent possible under law, all copyright and related or neighbouring rights to this encoded model have been dedicated to the public domain worldwide. Please refer to CC0 Public Domain Dedication for more information.
  // biomodels.db:MODEL1108260009
  // biomodels.db:BIOMD0000000358
  // isDescribedBy oai:cwi.nl:4725
  // GO:0007596
  // hasTaxon taxonomy:2759
  // hasProperty mamo:MAMO_0000046

  // Compartments:
  compartment compartment_1 = 1;

  // Species:
  species X in compartment_1 = 81.24998;  // uniprot:P00742
  species Xa in compartment_1 = 0;  // uniprot:P00742
  species Xa_ATIII in compartment_1 = 0;  // hasPart uniprot:P01008 uniprot:P00742
  species PL in compartment_1 = 9.999997;
  species PT in compartment_1 = 0;
  species Va in compartment_1 = 0;  // uniprot:P12259
  species IIa in compartment_1 = 0;  // uniprot:P00734
  species V in compartment_1 = 6.711998;  // uniprot:P12259
  species II in compartment_1 = 509.2998;  // uniprot:P00734
  species IIa_alpha2M in compartment_1 = 0;  // hasPart uniprot:P01023 uniprot:P00734
  species IIa_ATIII in compartment_1 = 0;  // hasPart uniprot:P00734 uniprot:P01008
  species RVV in compartment_1 = 0.3349999;

  // Parameters:
  kcat_X = 239.1;
  km_X = 23.65;
  ki_Xa = 4.531;
  k_PT = 122.9;
  k_PL = 801.4;
  kcat_V = 7.844;
  km_V = 149.7;
  kcat_II = 43.87;
  km_II = 62.25;
  kcat_2 = 12.4;
  km_2 = 0.06148;
  ki_IIaAlpha2M = 0.1762;
  ki_IIaATIII = 0.7859;

  // Assignment rules:
  AmAct := IIa + 0.556*IIa_alpha2M;

  // Reactions:
  R1: X => Xa; compartment_1*HenriMichaelisMenten_irreversible_kcat(kcat_X, RVV, X, km_X);  // modifiers: RVV
  R2: Xa => Xa_ATIII; compartment_1*ki_Xa*Xa;
  R3: Va + Xa + PL -> PT; compartment_1*(k_PT*Va*Xa*PL - k_PL*PT);
  R4: V => Va; compartment_1*HenriMichaelisMenten_irreversible_kcat(kcat_V, IIa, V, km_V);  // modifiers: IIa
  R5: II => IIa; compartment_1*HenriMichaelisMenten_irreversible_kcat(kcat_II, PT, II, km_II);  // modifiers: PT
  R6: II => IIa; compartment_1*HenriMichaelisMenten_irreversible_kcat(kcat_2, Xa, II, km_2);  // modifiers: Xa
  R7: IIa => IIa_alpha2M; compartment_1*ki_IIaAlpha2M*IIa;
  R8: IIa => IIa_ATIII; compartment_1*ki_IIaATIII*IIa;

  // Unit definitions:
  unit time = 60 second;
  unit substance = 1e-9 mole;
end
