// SBML level 2 version 4

function carboxylation(kc, S2, K, R, KI, E, S1)
  (kc*S2/(S2 + K*(1 + R/KI))*E + kc*S2/(S2 + K*(1 + R/KI))*S1 - abs(kc*S2/(S2 + K*(1 + R/KI))*E - kc*S2/(S2 + K*(1 + R/KI))*S1))/2;
end
carboxylation is "Carboxylation";

function PGA_consumption(S1, Rp, Nt, kc, E, R)
  S1/Rp*(R/Nt)*kc*E;
end
PGA_consumption is "PGA consumption - Farquhar";

function NADPH_production(j, S1, Nt)
  j/2*(S1/Nt);
end

function oxygenation(phi, kc, S2, K, R, KI, E, S1)
  phi*(kc*S2/(S2 + K*(1 + R/KI))*E + kc*S2/(S2 + K*(1 + R/KI))*S1 - abs(kc*S2/(S2 + K*(1 + R/KI))*E - kc*S2/(S2 + K*(1 + R/KI))*S1))/2;
end
oxygenation is "Oxygenation";

model Model_1()
  // Arnold2011_Farquhar1980_RuBisCO-CalvinCycle
  // This model is from the article:
  // A quantitative comparison of Calvin–Benson cycle models
  // Anne Arnold, Zoran Nikoloski Trends in Plant Science 2011 Oct 14. 22001849 ,
  // Abstract:
  // The Calvin-Benson cycle (CBC) provides the precursors for biomass synthesis necessary for plant growth. The dynamic behavior and yield of the CBC depend on the environmental conditions and regulation of the cellular state. Accurate quantitative models hold the promise of identifying the key determinants of the tightly regulated CBC function and their effects on the responses in future climates. We provide an integrative analysis of the largest compendium of existing models for photosynthetic processes. Based on the proposed ranking, our framework facilitates the discovery of best-performing models with regard to metabolomics data and of candidates for metabolic engineering.
  // Note: Model of the Calvin cycle with focus on the RuBisCO reaction by Farquhar et al. (1980, DOI:10.1007/BF00386231 ).
  // The initial metabolite values are chosen from the data set of Zhu et al. (2007, DOI:10.1104/pp.107.103713 ). A detailed description of all modifications is given in the model described by Arnold and Nikoloski (2011, PMID:22001849 .
  // biomodels.db:MODEL1109210000
  // biomodels.db:BIOMD0000000383
  // isDescribedBy pubmed:22001849
  // encodes GO:0019253
  // hasTaxon taxonomy:33090
  // hasProperty mamo:MAMO_0000046

  // Compartments:
  compartment chloroplast = 1;

  // Species:
  species $RuBP in chloroplast = 2;  // isVersionOf CHEBI:16710
  species PGA in chloroplast = 2.4;  // isVersionOf CHEBI:17050
  species NADPH in chloroplast = 0.21;  // isVersionOf CHEBI:16474
  // [µbar]
  species $CO2 in chloroplast = 230;  // isVersionOf CHEBI:16526
  // [mbar]
  species $O2 in chloroplast = 210;  // isVersionOf CHEBI:15379
  species $NADP in chloroplast;  // isVersionOf CHEBI:25523

  // Parameters:
  // converted into [mM] using Winter et al. (1994) subcellular stroma volume
  E = 1.338462;
  // Equation (19)
  Rp = 3.2;
  Nt = 0.5;
  f = 0.23;
  I = 1000;
  kc = 2.5;
  Kc = 460;
  Ko = 330;

  // Assignment rules:
  jp := 1/2*(1 - f)*I;
  NADP := Nt - NADPH;
  phi := 0.21*(O2/Ko)/(CO2/Kc);
  j := (abs(jp + 467) - abs(jp - 467))/2/65;

  // Reactions:
  PGA_prod_Vc: $RuBP + $CO2 + 2 NADPH => 2 PGA; chloroplast*carboxylation(kc, CO2, Kc, O2, Ko, E, RuBP); PGA_prod_Vc is "PGA production - v_c";  // modifiers: O2
  PGA_prod_Vo: $RuBP + $CO2 + 2 NADPH => 1.5 PGA; chloroplast*oxygenation(phi, kc, CO2, Kc, O2, Ko, E, RuBP); PGA_prod_Vo is "PGA production - v_o";  // modifiers: O2
  PGA_cons: PGA => $RuBP; chloroplast*PGA_consumption(PGA, Rp, Nt, kc, E, NADPH); PGA_cons is "PGA consumption";  // modifiers: NADPH
  NADPH_prod: $NADP => NADPH; chloroplast*NADPH_production(j, NADP, Nt); NADPH_prod is "NADPH production";

  // Unit definitions:
  unit substance = 1e-3 mole;
end
