// SBML level 2 version 4

function PGA_consumption(S1, Rp, R, Nt, Vc)
  S1/Rp*(R/Nt)*Vc;
end

function NADPH_production(j, S1, Nt)
  j/2*(S1/Nt);
end

function carboxylation(Vc, Vj)
  (Vc + Vj - abs(Vc - Vj))/2;
end
carboxylation is "Carboxylation";

function oxygenation(phi, Vc, Vj)
  phi*(Vc + Vj - abs(Vc - Vj))/2;
end
oxygenation is "Oxygenation";

model Arnold2011_Medlyn2002_RuBisCO_CalvinCycle()
  // This model is from the article:
  // A quantitative comparison of Calvin–Benson cycle models
  // Anne Arnold, Zoran Nikoloski Trends in Plant Science 2011 Oct 14. 22001849 ,
  // Abstract:
  // The Calvin-Benson cycle (CBC) provides the precursors for biomass synthesis necessary for plant growth. The dynamic behavior and yield of the CBC depend on the environmental conditions and regulation of the cellular state. Accurate quantitative models hold the promise of identifying the key determinants of the tightly regulated CBC function and their effects on the responses in future climates. We provide an integrative analysis of the largest compendium of existing models for photosynthetic processes. Based on the proposed ranking, our framework facilitates the discovery of best-performing models with regard to metabolomics data and of candidates for metabolic engineering.
  // Note: Model of the Calvin cycle with focus on the RuBisCO reaction by Medlyn et al. (2002, DOI:10.1046/j.1365-3040.2002.00891.x ).
  // The parameter values are widely taken from Farquhar et al. (1980, DOI:10.1007/BF00386231 ). The initial metabolite values are chosen from the data set of Zhu et al. (2007, DOI:10.1104/pp.107.103713) . A detailed description of all modifications is given in the model described by Arnold and Nikoloski (2011, PMID:22001849 .
  // biomodels.db:MODEL1109270000
  // biomodels.db:BIOMD0000000384
  // isDescribedBy pubmed:22001849
  // encodes GO:0019253
  // hasTaxon taxonomy:33090
  // hasProperty mamo:MAMO_0000046

  // Compartments:
  compartment chloroplast = 1;

  // Species:
  species $RuBP in chloroplast = 2;  // isVersionOf CHEBI:16710
  species PGA in chloroplast = 2.4;  // isVersionOf CHEBI:17050
  species NADPH in chloroplast = 0.21;  // isVersionOf CHEBI:16474
  // 0.7* 350 [µbar] (p. 1172)
  species $CO2 in chloroplast = 245;  // isVersionOf CHEBI:16526
  // [mbar]
  species $O2 in chloroplast = 210;  // isVersionOf CHEBI:15379
  species $NADP in chloroplast;  // isVersionOf CHEBI:25523

  // Parameters:
  Rp = 3.2;
  Nt = 0.5;
  // (p. 1170)
  alpha = 0.3;
  Q = 1000;
  // Bernacchi et al. (2001) Equation (8), Table 1
  Gamma = 42.89266;
  // (p. 1170)
  teta = 0.9;
  // average of corresponding values of Table 2; converted into [mM] using Winter et al. (1994) subcellular stroma volume, BioNumbers (ID: 105594)
  Vcmax = 2.532323;
  // Bernacchi et al. (2001) Equation (8), Table 1
  Kc = 406.0661;
  // Bernacchi et al. (2001) Equation (8), Table 1
  Ko = 276.9001;

  // Assignment rules:
  J := alpha*Q/(10 - 9*teta)/(65*0.5);
  Vj := J/4*CO2/(CO2 + 2*Gamma);
  Vc := Vcmax*CO2/((1 + O2/Ko)*Kc + CO2);
  NADP := Nt - NADPH;
  Vomax := 0.21*Vcmax;
  phi := 0.21*(O2/Ko)/(CO2/Kc);

  // Reactions:
  PGA_prod_Vc: $RuBP + $CO2 + 2 NADPH => 2 PGA; chloroplast*carboxylation(Vc, Vj); PGA_prod_Vc is "PGA production - v_c";
  PGA_prod_Vo: $RuBP + $O2 + 2 NADPH => 1.5 PGA; chloroplast*oxygenation(phi, Vc, Vj); PGA_prod_Vo is "PGA production - v_o";
  PGA_cons: PGA => $RuBP; chloroplast*PGA_consumption(PGA, Rp, NADPH, Nt, Vcmax); PGA_cons is "PGA consumption";  // modifiers: NADPH
  NADPH_prod: $NADP => NADPH; chloroplast*NADPH_production(J, NADP, Nt); NADPH_prod is "NADPH production";

  // Unit definitions:
  unit substance = 1e-3 mole;
end
