// SBML level 2 version 4

function NADPH_production(j, S1, Nt)
  j/2*(S1/Nt);
end

function carboxylation(Vc, Vj, Vp)
  ((Vc + Vj - abs(Vc - Vj))/2 + Vp - abs((Vc + Vj - abs(Vc - Vj))/2 - Vp))/2;
end
carboxylation is "Carboxylation";

function PGA_consumption(S1, Rp, R, Nt, Vc)
  S1/Rp*(R/Nt)*Vc;
end

function oxygenation(phi, Vc, Vj, Vp)
  phi*((Vc + Vj - abs(Vc - Vj))/2 + Vp - abs((Vc + Vj - abs(Vc - Vj))/2 - Vp))/2;
end
oxygenation is "Oxygenation";

model Arnold2011_Schultz2003_RuBisCO_CalvinCycle()
  // This model is from the article:
  // A quantitative comparison of Calvin–Benson cycle models
  // Anne Arnold, Zoran Nikoloski Trends in Plant Science 2011 Oct 14. 22001849 ,
  // Abstract:
  // The Calvin-Benson cycle (CBC) provides the precursors for biomass synthesis necessary for plant growth. The dynamic behavior and yield of the CBC depend on the environmental conditions and regulation of the cellular state. Accurate quantitative models hold the promise of identifying the key determinants of the tightly regulated CBC function and their effects on the responses in future climates. We provide an integrative analysis of the largest compendium of existing models for photosynthetic processes. Based on the proposed ranking, our framework facilitates the discovery of best-performing models with regard to metabolomics data and of candidates for metabolic engineering.
  // Note: Model of the Calvin cycle with focus on the RuBisCO reaction by Schultz (2003, DOI:10.1071/FP02146 ).
  // The parameter values are partly taken from Farquhar et al. (1980, DOI:10.1007/BF00386231 ) and Medlyn et al. (2002, DOI:10.1046/j.1365-3040.2002.00891.x ). The initial metabolite values are chosen from the data set of Zhu et al. (2007, DOI:10.1104/pp.107.103713 ). A detailed description of all modifications is given in the model described by Arnold and Nikoloski (2011, PMID:22001849 .
  // biomodels.db:MODEL1109270001
  // biomodels.db:BIOMD0000000385
  // isDescribedBy pubmed:22001849
  // GO:0019253
  // hasTaxon taxonomy:33090
  // hasProperty mamo:MAMO_0000046

  // Compartments:
  compartment chloroplast = 1;

  // Species:
  species $RuBP in chloroplast = 2;  // isVersionOf CHEBI:16710
  species PGA in chloroplast = 2.4;  // isVersionOf CHEBI:17050
  species NADPH in chloroplast = 0.21;  // isVersionOf CHEBI:16474
  // [Pa]
  species $CO2 in chloroplast = 35;  // isVersionOf CHEBI:16526
  // [kPa]
  species $O2 in chloroplast = 21;  // isVersionOf CHEBI:15379
  species $NADP in chloroplast;  // isVersionOf CHEBI:25523

  // Parameters:
  Rp = 3.2;
  Nt = 0.5;
  // Table 1, sunleaves (20-30°C)
  alpha = 0.19;
  Jmax = 112.9896;
  // LPI = 15 (mature leaves LPI 10-20, p. 667); additionally legend of Figure 1
  Gamma = 3.81695;
  PPFD = 1000;
  // converted into [mM] using Winter et al. (1994) subcellular stroma volume, BioNumbers (ID: 105594)
  Vcmax = 1.474946;
  Kc = 27.85358;
  Ko = 41.94697;
  // converted into [mM] using Winter et al. (1994) subcellular stroma volume, BioNumbers (ID: 105594)
  TPU = 0.2277126;
  // converted into [mM] using Winter et al. (1994) subcellular stroma volume, BioNumbers (ID: 105594)
  g0 = 0.4686154;
  // "relative humidity >50%" (p. 675)
  h = 0.6;
  k = 118.69;
  // LPI = 15 (mature leaves LPI 10-20, p. 667); additionally legend of Figure 1; converted into [mM] using Winter et al. (1994) subcellular stroma volume, BioNumbers (ID: 105594)
  Rd = 0.006242272;

  // Assignment rules:
  J := alpha*PPFD/sqrt(1 + (alpha*PPFD/Jmax)^2)/(65*0.5);
  NADP := Nt - NADPH;
  Vj := J/4*((CO2 - 1.6*(1/2*((1.6*(J/4 - Rd) + (k*h/CO2*Rd + g0)*(CO2 + 2*Gamma) + k*h/CO2*J/4*(Gamma - CO2))/(1.6 - k*h/CO2*(CO2 + 2*Gamma)) + sqrt(((1.6*(J/4 - Rd) + (k*h/CO2*Rd + g0)*(CO2 + 2*Gamma) + k*h/CO2*J/4*(Gamma - CO2))/(1.6 - k*h/CO2*(CO2 + 2*Gamma)))^2 + 4*g0*((Rd*(CO2 + 2*Gamma) + J/4*(Gamma - CO2))/(1.6 - k*h/CO2*(CO2 + 2*Gamma)))))/(g0 + k*h/CO2*(1/2)*((1.6*(J/4 - Rd) + (k*h/CO2*Rd + g0)*(CO2 + 2*Gamma) + k*h/CO2*J/4*(Gamma - CO2))/(1.6 - k*h/CO2*(CO2 + 2*Gamma)) + sqrt(((1.6*(J/4 - Rd) + (k*h/CO2*Rd + g0)*(CO2 + 2*Gamma) + k*h/CO2*J/4*(Gamma - CO2))/(1.6 - k*h/CO2*(CO2 + 2*Gamma)))^2 + 4*g0*((Rd*(CO2 + 2*Gamma) + J/4*(Gamma - CO2))/(1.6 - k*h/CO2*(CO2 + 2*Gamma))))))))/(CO2 - 1.6*(1/2*((1.6*(J/4 - Rd) + (k*h/CO2*Rd + g0)*(CO2 + 2*Gamma) + k*h/CO2*J/4*(Gamma - CO2))/(1.6 - k*h/CO2*(CO2 + 2*Gamma)) + sqrt(((1.6*(J/4 - Rd) + (k*h/CO2*Rd + g0)*(CO2 + 2*Gamma) + k*h/CO2*J/4*(Gamma - CO2))/(1.6 - k*h/CO2*(CO2 + 2*Gamma)))^2 + 4*g0*((Rd*(CO2 + 2*Gamma) + J/4*(Gamma - CO2))/(1.6 - k*h/CO2*(CO2 + 2*Gamma)))))/(g0 + k*h/CO2*(1/2)*((1.6*(J/4 - Rd) + (k*h/CO2*Rd + g0)*(CO2 + 2*Gamma) + k*h/CO2*J/4*(Gamma - CO2))/(1.6 - k*h/CO2*(CO2 + 2*Gamma)) + sqrt(((1.6*(J/4 - Rd) + (k*h/CO2*Rd + g0)*(CO2 + 2*Gamma) + k*h/CO2*J/4*(Gamma - CO2))/(1.6 - k*h/CO2*(CO2 + 2*Gamma)))^2 + 4*g0*((Rd*(CO2 + 2*Gamma) + J/4*(Gamma - CO2))/(1.6 - k*h/CO2*(CO2 + 2*Gamma))))))) + 2*Gamma));
  Vc := Vcmax*((CO2 - 1.6*(1/2*((1.6*(Vcmax - Rd) + (k*h/CO2*Rd + g0)*(CO2 + Kc*(1 + O2/Ko)) + k*h/CO2*Vcmax*(Gamma - CO2))/(1.6 - k*h/CO2*(CO2 + Kc*(1 + O2/Ko))) + sqrt(((1.6*(Vcmax - Rd) + (k*h/CO2*Rd + g0)*(CO2 + Kc*(1 + O2/Ko)) + k*h/CO2*Vcmax*(Gamma - CO2))/(1.6 - k*h/CO2*(CO2 + Kc*(1 + O2/Ko))))^2 + 4*g0*((Rd*(CO2 + Kc*(1 + O2/Ko)) + Vcmax*(Gamma - CO2))/(1.6 - k*h/CO2*(CO2 + Kc*(1 + O2/Ko))))))/(g0 + k*h/CO2*(1/2)*((1.6*(Vcmax - Rd) + (k*h/CO2*Rd + g0)*(CO2 + Kc*(1 + O2/Ko)) + k*h/CO2*Vcmax*(Gamma - CO2))/(1.6 - k*h/CO2*(CO2 + Kc*(1 + O2/Ko))) + sqrt(((1.6*(Vcmax - Rd) + (k*h/CO2*Rd + g0)*(CO2 + Kc*(1 + O2/Ko)) + k*h/CO2*Vcmax*(Gamma - CO2))/(1.6 - k*h/CO2*(CO2 + Kc*(1 + O2/Ko))))^2 + 4*g0*((Rd*(CO2 + Kc*(1 + O2/Ko)) + Vcmax*(Gamma - CO2))/(1.6 - k*h/CO2*(CO2 + Kc*(1 + O2/Ko)))))))))/(CO2 - 1.6*(1/2*((1.6*(Vcmax - Rd) + (k*h/CO2*Rd + g0)*(CO2 + Kc*(1 + O2/Ko)) + k*h/CO2*Vcmax*(Gamma - CO2))/(1.6 - k*h/CO2*(CO2 + Kc*(1 + O2/Ko))) + sqrt(((1.6*(Vcmax - Rd) + (k*h/CO2*Rd + g0)*(CO2 + Kc*(1 + O2/Ko)) + k*h/CO2*Vcmax*(Gamma - CO2))/(1.6 - k*h/CO2*(CO2 + Kc*(1 + O2/Ko))))^2 + 4*g0*((Rd*(CO2 + Kc*(1 + O2/Ko)) + Vcmax*(Gamma - CO2))/(1.6 - k*h/CO2*(CO2 + Kc*(1 + O2/Ko))))))/(g0 + k*h/CO2*(1/2)*((1.6*(Vcmax - Rd) + (k*h/CO2*Rd + g0)*(CO2 + Kc*(1 + O2/Ko)) + k*h/CO2*Vcmax*(Gamma - CO2))/(1.6 - k*h/CO2*(CO2 + Kc*(1 + O2/Ko))) + sqrt(((1.6*(Vcmax - Rd) + (k*h/CO2*Rd + g0)*(CO2 + Kc*(1 + O2/Ko)) + k*h/CO2*Vcmax*(Gamma - CO2))/(1.6 - k*h/CO2*(CO2 + Kc*(1 + O2/Ko))))^2 + 4*g0*((Rd*(CO2 + Kc*(1 + O2/Ko)) + Vcmax*(Gamma - CO2))/(1.6 - k*h/CO2*(CO2 + Kc*(1 + O2/Ko)))))))) + Kc*(1 + O2/Ko)));
  Vp := 3*TPU*((CO2 - 1.6*(1/2*((1.6*(3*TPU - Rd) + (k*h/CO2*Rd + g0)*(CO2 - Gamma) - k*h*3*TPU)/(1.6 - k*h/CO2*(CO2 - Gamma)) + sqrt(((1.6*(3*TPU - Rd) + (k*h/CO2*Rd + g0)*(CO2 - Gamma) - k*h*3*TPU)/(1.6 - k*h/CO2*(CO2 - Gamma)))^2 + 4*g0*((Rd*(CO2 - Gamma) - 3*TPU*CO2)/(1.6 - k*h/CO2*(CO2 - Gamma)))))/(g0 + k*h/CO2*(1/2)*((1.6*(3*TPU - Rd) + (k*h/CO2*Rd + g0)*(CO2 - Gamma) - k*h*3*TPU)/(1.6 - k*h/CO2*(CO2 - Gamma)) + sqrt(((1.6*(3*TPU - Rd) + (k*h/CO2*Rd + g0)*(CO2 - Gamma) - k*h*3*TPU)/(1.6 - k*h/CO2*(CO2 - Gamma)))^2 + 4*g0*((Rd*(CO2 - Gamma) - 3*TPU*CO2)/(1.6 - k*h/CO2*(CO2 - Gamma))))))))/(CO2 - 1.6*(1/2*((1.6*(3*TPU - Rd) + (k*h/CO2*Rd + g0)*(CO2 - Gamma) - k*h*3*TPU)/(1.6 - k*h/CO2*(CO2 - Gamma)) + sqrt(((1.6*(3*TPU - Rd) + (k*h/CO2*Rd + g0)*(CO2 - Gamma) - k*h*3*TPU)/(1.6 - k*h/CO2*(CO2 - Gamma)))^2 + 4*g0*((Rd*(CO2 - Gamma) - 3*TPU*CO2)/(1.6 - k*h/CO2*(CO2 - Gamma)))))/(g0 + k*h/CO2*(1/2)*((1.6*(3*TPU - Rd) + (k*h/CO2*Rd + g0)*(CO2 - Gamma) - k*h*3*TPU)/(1.6 - k*h/CO2*(CO2 - Gamma)) + sqrt(((1.6*(3*TPU - Rd) + (k*h/CO2*Rd + g0)*(CO2 - Gamma) - k*h*3*TPU)/(1.6 - k*h/CO2*(CO2 - Gamma)))^2 + 4*g0*((Rd*(CO2 - Gamma) - 3*TPU*CO2)/(1.6 - k*h/CO2*(CO2 - Gamma))))))) - Gamma));
  v_c := (abs((abs(Vc + Vj) - abs(Vc - Vj))/2 + Vp) - abs((abs(Vc + Vj) - abs(Vc - Vj))/2 - Vp))/2;
  phi := 0.21*((g0 + h*k/CO2*(v_c - Rd))*O2/Ko)/((g0 + (h*k - 1.6)*(v_c - Rd))/Kc);

  // Reactions:
  PGA_prod_Vc: $RuBP + $CO2 + 2 NADPH => 2 PGA; chloroplast*carboxylation(Vc, Vj, Vp); PGA_prod_Vc is "PGA production - v_c";  // modifiers: O2
  PGA_prod_Vo: $RuBP + $O2 + 2 NADPH => 1.5 PGA; chloroplast*oxygenation(phi, Vc, Vj, Vp); PGA_prod_Vo is "PGA production - v_o";  // modifiers: CO2
  PGA_cons: PGA => $RuBP; chloroplast*PGA_consumption(PGA, Rp, NADPH, Nt, Vcmax); PGA_cons is "PGA consumption";  // modifiers: NADPH
  NADPH_prod: $NADP => NADPH; chloroplast*NADPH_production(J, NADP, Nt); NADPH_prod is "NADPH production";

  // Unit definitions:
  unit substance = 1e-3 mole;
end
