// SBML level 2 version 4

function oxygenation(phi, Vc, Vj, Vp)
  phi*((Vc + Vj - abs(Vc - Vj))/2 + Vp - abs((Vc + Vj - abs(Vc - Vj))/2 - Vp))/2;
end
oxygenation is "Oxygenation";

function PGA_consumption(S1, Rp, R, Nt, Vc)
  S1/Rp*(R/Nt)*Vc;
end

function NADPH_production(j, S1, Nt)
  j/2*(S1/Nt);
end

function carboxylation(Vc, Vj, Vp)
  ((Vc + Vj - abs(Vc - Vj))/2 + Vp - abs((Vc + Vj - abs(Vc - Vj))/2 - Vp))/2;
end
carboxylation is "Carboxylation";

model Arnold2011_Sharkey2007_RuBisCO_CalvinCycle()
  // This model is from the article:
  // A quantitative comparison of Calvin–Benson cycle models
  // Anne Arnold, Zoran Nikoloski Trends in Plant Science 2011 Oct 14. 22001849 ,
  // Abstract:
  // The Calvin-Benson cycle (CBC) provides the precursors for biomass synthesis necessary for plant growth. The dynamic behavior and yield of the CBC depend on the environmental conditions and regulation of the cellular state. Accurate quantitative models hold the promise of identifying the key determinants of the tightly regulated CBC function and their effects on the responses in future climates. We provide an integrative analysis of the largest compendium of existing models for photosynthetic processes. Based on the proposed ranking, our framework facilitates the discovery of best-performing models with regard to metabolomics data and of candidates for metabolic engineering.
  // Note: Model of the Calvin cycle with focus on the RuBisCO reaction by Sharkey et al. (2007, DOI:10.1111/j.1365-3040.2007.01710.x ).
  // The parameter values are partly taken from Farquhar et al. (1980, DOI:10.1007/BF00386231 ) and Medlyn et al. (2002, DOI:10.1046/j.1365-3040.2002.00891.x ). The initial metabolite values are chosen from the data set of Zhu et al. (2007, DOI:10.1104/pp.107.103713 ). A detailed description of all modifications is given in the model described by Arnold and Nikoloski (2011, PMID:22001849 .
  // biomodels.db:MODEL1109270002
  // biomodels.db:BIOMD0000000386
  // isDescribedBy pubmed:22001849
  // GO:0019253
  // hasTaxon taxonomy:33090
  // hasProperty mamo:MAMO_0000046

  // Compartments:
  compartment chloroplast = 1;

  // Species:
  species $RuBP in chloroplast = 2;  // isVersionOf CHEBI:16710
  species PGA in chloroplast = 2.4;  // isVersionOf CHEBI:17050
  species NADPH in chloroplast = 0.21;  // isVersionOf CHEBI:16474
  // [Pa]
  species $CO2 in chloroplast = 24.5;  // isVersionOf CHEBI:16526
  // [kPa]
  species $O2 in chloroplast = 21;  // isVersionOf CHEBI:15379
  species $NADP in chloroplast;  // isVersionOf CHEBI:25523

  // Parameters:
  Rp = 3.2;
  Nt = 0.5;
  // converted into [mM] using Winter et al. (1994) subcellular stroma volume, BioNumbers (ID: 105594)
  Rd = 0.03076749;
  // converted into [mM] using Winter et al. (1994) subcellular stroma volume, BioNumbers (ID: 105594)
  J = 0.03076782;
  // converted into [mM] using Winter et al. (1994) subcellular stroma volume, BioNumbers (ID: 105594)
  gm = 0.03077408;
  Gamma = 3.741169;
  // converted into [mM] using Winter et al. (1994) subcellular stroma volume, BioNumbers (ID: 105594)
  Vcmax = 0.03076026;
  Kc = 27.23721;
  Ko = 16.57884;
  // converted into [mM] using Winter et al. (1994) subcellular stroma volume, BioNumbers (ID: 105594)
  TPU = 0.03075851;

  // Assignment rules:
  Vj := J/4*(CO2 - 1/2*(CO2 + 2*Gamma + (J - 4*Rd)/(4*gm) - sqrt((CO2 + 2*Gamma + (J - 4*Rd)/(4*gm))^2 + 4/gm*(Rd*(CO2 + 2*Gamma) + J/4*(Gamma - CO2)))))/(CO2 - 1/2*(CO2 + 2*Gamma + (J - 4*Rd)/(4*gm) - sqrt((CO2 + 2*Gamma + (J - 4*Rd)/(4*gm))^2 + 4/gm*(Rd*(CO2 + 2*Gamma) + J/4*(Gamma - CO2)))) + 2*Gamma);
  NADP := Nt - NADPH;
  Vp := 3*TPU*((CO2 - (3*TPU - Rd)/gm)/(CO2 - (3*TPU - Rd)/gm - Gamma));
  Vc := Vcmax*(CO2 - 1/2*(CO2 + Kc*(1 + O2/Ko) + (Vcmax - Rd)/gm - sqrt((CO2 + Kc*(1 + O2/Ko) + (Vcmax - Rd)/gm)^2 + 4/gm*(Rd*(CO2 + Kc*(1 + O2/Ko)) + Vcmax*(Gamma - CO2)))))/(CO2 - 1/2*(CO2 + Kc*(1 + O2/Ko) + (Vcmax - Rd)/gm - sqrt((CO2 + Kc*(1 + O2/Ko) + (Vcmax - Rd)/gm)^2 + 4/gm*(Rd*(CO2 + Kc*(1 + O2/Ko)) + Vcmax*(Gamma - CO2)))) + Kc*(1 + O2/Ko));
  v_c := (abs((abs(Vc + Vj) - abs(Vc - Vj))/2 + Vp) - abs((abs(Vc + Vj) - abs(Vc - Vj))/2 - Vp))/2;
  phi := 0.21*(gm*O2/Ko)/((gm*CO2 - v_c + Rd)/Kc);

  // Reactions:
  PGA_prod_Vc: $RuBP + $CO2 + 2 NADPH => 2 PGA; chloroplast*carboxylation(Vc, Vj, Vp); PGA_prod_Vc is "PGA production - v_c";  // modifiers: O2
  PGA_prod_Vo: $RuBP + $O2 + 2 NADPH => 1.5 PGA; chloroplast*oxygenation(phi, Vc, Vj, Vp); PGA_prod_Vo is "PGA production - v_o";  // modifiers: CO2
  PGA_cons: PGA => $RuBP; chloroplast*PGA_consumption(PGA, Rp, NADPH, Nt, Vcmax); PGA_cons is "PGA consumption";  // modifiers: NADPH
  NADPH_prod: $NADP => NADPH; chloroplast*NADPH_production(J, NADP, Nt); NADPH_prod is "NADPH production";

  // Unit definitions:
  unit substance = 1e-3 mole;
end
