// SBML level 2 version 4

function oxygenation(phi, Vc, Vj, Vp)
  phi*((Vc + Vj - abs(Vc - Vj))/2 + Vp - abs((Vc + Vj - abs(Vc - Vj))/2 - Vp))/2;
end
oxygenation is "Oxygenation";

function carboxylation(Vc, Vj, Vp)
  ((Vc + Vj - abs(Vc - Vj))/2 + Vp - abs((Vc + Vj - abs(Vc - Vj))/2 - Vp))/2;
end
carboxylation is "Carboxylation";

function NADPH_production(j, S1, Nt)
  j/2*(S1/Nt);
end

function PGA_consumption(S1, Rp, R, Nt, Vc)
  S1/Rp*(R/Nt)*Vc;
end

model Arnold2011_Damour2007_RuBisCO_CalvinCycle()
  // This model is from the article:
  // A quantitative comparison of Calvin–Benson cycle models
  // Anne Arnold, Zoran Nikoloski Trends in Plant Science 2011 Oct 14. 22001849 ,
  // Abstract:
  // The Calvin-Benson cycle (CBC) provides the precursors for biomass synthesis necessary for plant growth. The dynamic behavior and yield of the CBC depend on the environmental conditions and regulation of the cellular state. Accurate quantitative models hold the promise of identifying the key determinants of the tightly regulated CBC function and their effects on the responses in future climates. We provide an integrative analysis of the largest compendium of existing models for photosynthetic processes. Based on the proposed ranking, our framework facilitates the discovery of best-performing models with regard to metabolomics data and of candidates for metabolic engineering.
  // Note: Model of the Calvin cycle with focus on the RuBisCO reaction by Damour and Urban (2007, [for PDF click here] ).
  // The parameter values are partly taken from Farquhar et al. (1980, DOI:10.1007/BF00386231 ) and Urban et al. (2003, DOI:10.1093/treephys/23.5.289 ). The initial metabolite values are chosen from the data set of Zhu et al. (2007, DOI:10.1104/pp.107.103713 ). A detailed description of all modifications is given in the model described by Arnold and Nikoloski (2011, PMID:22001849 .
  // biomodels.db:MODEL1109270003
  // biomodels.db:BIOMD0000000387
  // isDescribedBy pubmed:22001849
  // encodes GO:0019253
  // hasTaxon taxonomy:33090
  // hasProperty mamo:MAMO_0000046

  // Compartments:
  compartment chloroplast = 1;

  // Species:
  species $RuBP in chloroplast = 2;  // isVersionOf CHEBI:16710
  species PGA in chloroplast = 2.4;  // isVersionOf CHEBI:17050
  species NADPH in chloroplast = 0.21;  // isVersionOf CHEBI:16474
  // [Pa]
  species $CO2 in chloroplast = 24.5;  // isVersionOf CHEBI:16526
  // [Pa]
  species $O2 in chloroplast = 21000;  // isVersionOf CHEBI:15379
  species $NADP in chloroplast;  // isVersionOf CHEBI:25523
  // [g/m²]
  species $starch in chloroplast = 0.5;  // isVersionOf CHEBI:28017

  // Parameters:
  Rp = 3.2;
  Nt = 0.5;
  // Urban et al. (2003) Table 1
  alpha = 0.24;
  // Harley et al. (1992) Equation (9), Table 1
  Jmax = 142.047;
  Q = 1000;
  // Harley et al. (1992) Equation (9), Table 1; converted into [mM] using Winter et al. (1994) subcellular stroma volume, BioNumbers (ID: 105594)
  Vcmax = 1.911413;
  // Bernacchi et al. (2001) Equation (8), Table 1
  Kc = 26.71253;
  // Bernacchi et al. (2001) Equation (8), Table 1
  Ko = 187891;
  // Harley et al. (1992) Equation (9), Table 1; converted into [mM] using Winter et al. (1994) subcellular stroma volume, BioNumbers (ID: 105594)
  TPU = 0.2590278;
  // Urban et al. (2007) (p. 348)
  a = 0.0434;

  // Assignment rules:
  Gamma := O2/(2*exp(-7.458 + 37830/(8.3143*298.15)));
  Cst := exp(-0.0398*starch*a);
  phi := 0.21*(O2/Ko)/(CO2/Kc);
  Vc := Vcmax*CO2/((1 + O2/Ko)*(CO2 + Kc));
  Vp := 3*TPU/(1 - Gamma/CO2);
  NADP := Nt - NADPH;
  J := Cst*alpha*0.9*Q/sqrt(1 + (alpha*0.9*Q/Jmax)^2)/(65*0.5);
  Vj := J/4*CO2/(CO2 + 2*Gamma);

  // Reactions:
  PGA_prod_Vc: $RuBP + $CO2 + 2 NADPH => 2 PGA; chloroplast*carboxylation(Vc, Vj, Vp); PGA_prod_Vc is "PGA production - v_c";  // modifiers: O2
  PGA_prod_Vo: $RuBP + $O2 + 2 NADPH => 1.5 PGA; chloroplast*oxygenation(phi, Vc, Vj, Vp); PGA_prod_Vo is "PGA production - v_o";  // modifiers: CO2
  PGA_cons: PGA => $RuBP; chloroplast*PGA_consumption(PGA, Rp, NADPH, Nt, Vcmax); PGA_cons is "PGA consumption";  // modifiers: NADPH
  NADPH_prod: $NADP => NADPH; chloroplast*NADPH_production(J, NADP, Nt); NADPH_prod is "NADPH production";

  // Unit definitions:
  unit substance = 1e-3 mole;
end
