// SBML level 2 version 4

function function_1(substrate, Km, V)
  V*substrate/(Km + substrate);
end
function_1 is "Henri-Michaelis-Menten (irreversible)";

function MM_s2_reg(Vm, s1, s2, K1, K2)
  Vm*s1*s2/((s1 + K1)*(s2 + K2));
end
MM_s2_reg is "MM s2 - reg";

model Arnold2011_Zhu2009_CalvinCycle()
  // This model is from the article:
  // A quantitative comparison of Calvin–Benson cycle models
  // Anne Arnold, Zoran Nikoloski Trends in Plant Science 2011 Oct 14. 22001849 ,
  // Abstract:
  // The Calvin-Benson cycle (CBC) provides the precursors for biomass synthesis necessary for plant growth. The dynamic behavior and yield of the CBC depend on the environmental conditions and regulation of the cellular state. Accurate quantitative models hold the promise of identifying the key determinants of the tightly regulated CBC function and their effects on the responses in future climates. We provide an integrative analysis of the largest compendium of existing models for photosynthetic processes. Based on the proposed ranking, our framework facilitates the discovery of best-performing models with regard to metabolomics data and of candidates for metabolic engineering.
  // Note: Model of the Calvin cycle by Zhu et al. (2009, DOI:10.1016/j.nonrwa.2008.01.021 ).
  // The initial metabolite values are chosen from the data set of Zhu et al. (2007, DOI:10.1104/pp.107.103713 ).A detailed description of all modifications is given in the model described by Arnold and Nikoloski (2011, PMID:22001849 .
  // biomodels.db:MODEL1109270004
  // biomodels.db:BIOMD0000000388
  // isDescribedBy pubmed:22001849
  // kegg.pathway:ko00710 GO:0019253
  // hasTaxon taxonomy:33090
  // hasProperty mamo:MAMO_0000046

  // Compartments:
  compartment chloroplast = 1;

  // Species:
  species RuBP in chloroplast = 2;  // isVersionOf CHEBI:16710
  species PGA in chloroplast = 2.4;  // isVersionOf CHEBI:17050
  species DPGA in chloroplast = 0.0011;  // isVersionOf CHEBI:22902
  species GAP in chloroplast = 0.02;  // isVersionOf CHEBI:17138
  species Ru5P in chloroplast = 0.0501;  // isVersionOf CHEBI:17363
  species $ADP in chloroplast = 0.82;  // isVersionOf CHEBI:16761
  species $ATP in chloroplast = 0.68;  // isVersionOf CHEBI:15422
  species $Pi in chloroplast;  // isVersionOf CHEBI:43474

  // Assignment rules:
  Pi := 15 - 2*(RuBP + DPGA + ATP) - (PGA + GAP + Ru5P + ADP);

  // Reactions:
  RuBisCO: RuBP => 2 PGA; chloroplast*function_1(RuBP, RuBisCO_Km, RuBisCO_V);
    RuBisCO_Km = 1; RuBisCO_V = 3.78;
  PGA_K: PGA + $ATP => $ADP + DPGA; chloroplast*MM_s2_reg(PGA_K_Vm, PGA, ATP, PGA_K_K1, PGA_K_K2); PGA_K is "PGA kinase";
    PGA_K_Vm = 11.75; PGA_K_K1 = 0.24; PGA_K_K2 = 0.39;
  GAP_DH: DPGA => GAP + $Pi; chloroplast*function_1(DPGA, GAP_DH_Km, GAP_DH_V); GAP_DH is "GAP dehydrogenase";
    GAP_DH_Km = 0.5; GAP_DH_V = 5.04;
  GAP2Ru5P: GAP => 0.6 Ru5P; chloroplast*function_1(GAP, GAP2Ru5P_Km, GAP2Ru5P_V); GAP2Ru5P is "GAP to Ru5P";
    GAP2Ru5P_Km = 0.84; GAP2Ru5P_V = 3.05;
  Ru5P_K: Ru5P + $ATP => RuBP + $ADP; chloroplast*MM_s2_reg(Ru5P_K_Vm, Ru5P, ATP, Ru5P_K_K1, Ru5P_K_K2); Ru5P_K is "Ru5P kinase";
    Ru5P_K_Vm = 8; Ru5P_K_K1 = 0.15; Ru5P_K_K2 = 0.059;
  // changed velocity in accordance with the authors (Lei et al. (2011))
  PGA2sink: PGA => ; chloroplast*function_1(PGA, PGA2sink_Km, PGA2sink_V); PGA2sink is "PGA to sink";
    PGA2sink_Km = 0.75; PGA2sink_V = 3;
  GAP2sink: GAP => ; chloroplast*function_1(GAP, GAP2sink_Km, GAP2sink_V); GAP2sink is "GAP to sink";
    GAP2sink_Km = 5; GAP2sink_V = 0.1;

  // Unit definitions:
  unit volume = litre;
  unit substance = 1e-3 mole;
end
