// SBML level 2 version 4

function function_1(v)
  v;
end
function_1 is "irreversilbe Constant flux (Suc synth)";

model Arnold2011_Hahn1986_CalvinCycle_Starch_Sucrose()
  // This model is from the article:
  // A quantitative comparison of Calvin–Benson cycle models
  // Anne Arnold, Zoran Nikoloski Trends in Plant Science 2011 Oct 14. 22001849 ,
  // Abstract:
  // The Calvin-Benson cycle (CBC) provides the precursors for biomass synthesis necessary for plant growth. The dynamic behavior and yield of the CBC depend on the environmental conditions and regulation of the cellular state. Accurate quantitative models hold the promise of identifying the key determinants of the tightly regulated CBC function and their effects on the responses in future climates. We provide an integrative analysis of the largest compendium of existing models for photosynthetic processes. Based on the proposed ranking, our framework facilitates the discovery of best-performing models with regard to metabolomics data and of candidates for metabolic engineering.
  // Note: Model of the Calvin cycle and the related end-product pathways to starch and sucrose synthesis by Hahn (1986, [click here for abstract] ).
  // The parameter values are taken from Hahn (1984, [click here for abstract] ). The initial metabolite values are chosen from the data set of Zhu et al. (2007, DOI:10.1104/pp.107.103713 ). A detailed description of all modifications is given in the model described by Arnold and Nikoloski (2011, PMID:22001849 .
  // biomodels.db:MODEL1109270006
  // biomodels.db:BIOMD0000000389
  // isDescribedBy pubmed:22001849
  // encodes GO:0019253
  // hasTaxon taxonomy:33090
  // hasProperty mamo:MAMO_0000046

  // Compartments:
  compartment chloroplast = 1;
  compartment cytosol = 1;
  compartment vacuole = 1;
  compartment phloem = 1;

  // Species:
  species RuBP in chloroplast = 2;  // isVersionOf CHEBI:16710
  species PGA in chloroplast = 2.4;  // isVersionOf CHEBI:17050
  species TP in chloroplast = 0.5;  // isVersionOf interpro:IPR000652
  species HeP in chloroplast = 2.2;  // isVersionOf CHEBI:15965
  // TPGA = R5P + X5P
  species TPGA in chloroplast = 0.2;  // hasPart pubchem.compound:15938963 pubchem.compound:756
  species E4P in chloroplast = 0.05;  // isVersionOf pubchem.compound:122357
  species S7P in chloroplast = 2;  // isVersionOf pubchem.compound:165007
  species Ru5P in chloroplast = 0.05;  // isVersionOf CHEBI:17363
  // Hahn et al. (1984) Table 1
  species GG in chloroplast = 100;
  // Hahn et al. (1984) Table 1
  species ATP in chloroplast = 3.875;
  // Hahn et al. (1984) Table 1
  species ADP in chloroplast = 0.53;
  // Hahn et al. (1984) Table 1
  species UTP in chloroplast = 3.871;  // isVersionOf CHEBI:15713
  // Hahn et al. (1984) Table 1
  species UDP in chloroplast = 1.613;  // isVersionOf CHEBI:17659
  // Hahn et al. (1984) Table 1
  species Pi in chloroplast = 2.5;  // isVersionOf CHEBI:43474
  // [Pa] Hahn et al. (1984) Table 2
  species $CO2 in chloroplast = 31;  // isVersionOf CHEBI:16526
  // Hahn et al. (1984) Table 1
  species TPc in cytosol = 0.114;  // isVersionOf pubchem.compound:24794350
  // Hahn et al. (1984) Table 1
  species HePc in cytosol = 0.1;  // isVersionOf CHEBI:15965
  // Hahn et al. (1984) Table 1
  species Suc in cytosol = 77.31;  // isVersionOf CHEBI:17992
  // Hahn et al. (1984) Table 1
  species Pic in cytosol = 0.8;  // isVersionOf CHEBI:43474
  // Hahn et al. (1984) Table 1
  species SucV in vacuole = 77.31;  // isVersionOf CHEBI:17992
  // Hahn et al. (1984) Table 2
  species $E in phloem = 0.5;
  species $Resp in chloroplast = 1;

  // Parameters:
  r = 3e-5;
  D = 0.0001;
  phi = 0.0001;
  var v_15; v_15 is "v(15)";

  // Assignment rules:
  v_15 := 0.0258*HePc*UTP;

  // Reactions:
  RuBisCO: RuBP + $CO2 => 2 PGA; chloroplast*RuBisCO_k1*RuBP*CO2;
    RuBisCO_k1 = 0.006;
  PGA_red: PGA + ATP => TP + ADP + Pi; chloroplast*PGA_red_k1*PGA*ATP; PGA_red is "PGA reduction";
    PGA_red_k1 = 0.0207;
  FBP_A_ase: 2 TP -> HeP + Pi; chloroplast*(FBP_A_ase_k1*TP^2 - k2*HeP*Pi); FBP_A_ase is "FBP ald + ase";
    FBP_A_ase_k1 = 4; k2 = 0;
  F6P_TK1: HeP => TPGA + E4P; chloroplast*F6P_TK1_k1*HeP; F6P_TK1 is "F6P trans I";
    F6P_TK1_k1 = 0.031;
  SBP_A_ase: E4P + TP => S7P + Pi; chloroplast*SBP_A_ase_k1*E4P*TP; SBP_A_ase is "SBP ald + ase";
    SBP_A_ase_k1 = 3.1;
  S7P_TK1_R5P_I: S7P => TPGA + Ru5P; chloroplast*S7P_TK1_R5P_I_k1*S7P; S7P_TK1_R5P_I is "S7P trans I + R5P iso";
    S7P_TK1_R5P_I_k1 = 0.31;
  TK2_Ru5P_E: TPGA + TP => Ru5P; chloroplast*TK2_Ru5P_E_k1*TPGA*TP; TK2_Ru5P_E is "trans II + Ru5P epi";
    TK2_Ru5P_E_k1 = 6.2;
  Ru5P_K: Ru5P + ATP => RuBP + ADP; chloroplast*Ru5P_K_k1*Ru5P*ATP; Ru5P_K is "Ru5P kinase";
    Ru5P_K_k1 = 0.031;
  ATP_S: ADP + Pi => ATP; chloroplast*ATP_S_k1*ADP*Pi; ATP_S is "ATP synthase";
    ATP_S_k1 = 0.279;
  Starch_S: ATP + HeP => GG + ADP + 2 Pi; chloroplast*Starch_S_k1*ATP*HeP; Starch_S is "starch synthetase";
    Starch_S_k1 = 0.002;
  Starch_P: GG + Pi => HeP; chloroplast*Starch_P_k1*GG*Pi; Starch_P is "starch phosphorylase";
    Starch_P_k1 = 4e-5;
  TPT: TP + Pic => TPc + Pi; TPT_k1*TP*Pic; TPT is "TP translocator";
    TPT_k1 = 0.5;
  FBPc_A_ase: 2 TPc => HePc + Pic; cytosol*FBPc_A_ase_k1*TPc^2; FBPc_A_ase is "FBPc ald + ase";
    FBPc_A_ase_k1 = 1.55;
  Suc_S: 2 HePc + UTP => Suc + UDP + 3 Pic; function_1(v_15); Suc_S is "sucrose synthetase";
  UTP_S: UDP + Pic => UTP; UTP_S_k1*UDP*Pic; UTP_S is "UTP synthase";
    UTP_S_k1 = 0.00755;
  Respi: Suc => $Resp; r*Suc; Respi is "respiration rate";
  Diffu: Suc -> SucV; D*Suc - D*SucV; Diffu is "diffusion rate";
  Transl: Suc -> $E; phi*Suc - phi*E; Transl is "translocation rate";

  // Unit definitions:
  unit volume = 1e-3 litre;
  unit substance = 1e-3 mole;
end
