// SBML level 2 version 4

function MM_s1_reg_2_c_FBPase(Vm, S, K, R1, KR1, R2, KR2)
  Vm*S/(S + K*(1 + R1/KR1 + R2/KR2));
end
MM_s1_reg_2_c_FBPase is "MM s1 + reg 2*c (FBPase)";

function MM_s1_reg_A_3_c_TPT(Vm, S, KA, A, K, R1, KR1, R2, KR2, R3, KR3)
  Vm*S/(S*(1 + KA/A) + K*(1 + (1 + KA/A)*(R1/KR1 + R2/KR2 + R3/KR3)));
end
MM_s1_reg_A_3_c_TPT is "MM s1 + reg A,3*c (TPT)";

function function_4(Vm, S1, S2, K1, R1, KR1, R2, KR2, R3, KR3, R4, KR41, K2, KR42)
  Vm*S1*S2/((S1 + K1*(1 + R1/KR1 + R2/KR2 + R3/KR3))*(S2*(1 + R4/KR41) + K2*(1 + R4/KR42)));
end
function_4 is "MM s2 + reg 3*c-s1,1*m-s2 (Ru5P kinase)";

function MM_s2_reg_ATP_synth(Vm, s1, s2, K1, K2)
  Vm*s1*s2/((s1 + K1)*(s2 + K2));
end
MM_s2_reg_ATP_synth is "MM s2 - reg (ATP synth)";

function MM_s1_reg_5_c_RuBisCO(Vm, S, K, R1, KR1, R2, KR2, R3, KR3, R4, KR4, R5, KR5)
  Vm*S/(S + K*(1 + R1/KR1 + R2/KR2 + R3/KR3 + R4/KR4 + R5/KR5));
end
MM_s1_reg_5_c_RuBisCO is "MM s1 + reg 5*c (RuBisCO)";

function MM_s1_reg_1_c_SBPase_starch_phos(Vm, S, K, R1, KR1)
  Vm*S/(S + K*(1 + R1/KR1));
end
MM_s1_reg_1_c_SBPase_starch_phos is "MM s1 + reg 1*c (SBPase, starch phos)";

function starch_synthase(Vm, S1, S2, K1, K2, R1, KR1, R2, KA1, A1, KA2, A2, KA3, A3)
  Vm*S1*S2/((S1 + K1)*(1 + R1/KR1)*(S2 + K2*(1 + K2*R2/(KA1*A1 + KA2*A2 + KA3*A3))));
end

model Arnold2011_Poolman2000_CalvinCycle_Starch()
  // This model is from the article:
  // A quantitative comparison of Calvin–Benson cycle models
  // Anne Arnold, Zoran Nikoloski Trends in Plant Science2011 Oct 14. 22001849,
  // Abstract:
  // The Calvin-Benson cycle (CBC) provides the precursors for biomass synthesis necessary for plant growth. The dynamic behavior and yield of the CBC depend on the environmental conditions and regulation of the cellular state. Accurate quantitative models hold the promise of identifying the key determinants of the tightly regulated CBC function and their effects on the responses in future climates. We provide an integrative analysis of the largest compendium of existing models for photosynthetic processes. Based on the proposed ranking, our framework facilitates the discovery of best-performing models with regard to metabolomics data and of candidates for metabolic engineering.
  // Note: Model of the Calvin cycle and the related end-product pathway to starch synthesis by Poolman et al. (2000, DOI:10.1093/jexbot/51.suppl_1.319).
  // The parameter values are widely taken from Pettersson and Ryde-Pettersson (1988, DOI:10.1111/j.1432-1033.1988.tb14242.x) and Poolman (1999, [click here for PDF]). The initial metabolite values are chosen from the data set of Zhu et al. (2007, DOI:10.1104/pp.107.103713). A detailed description of all modifications is given in the model described by Arnold and Nikoloski (2011, PMID:22001849.
  // biomodels.db:MODEL1109270007
  // biomodels.db:BIOMD0000000391
  // isDescribedBy pubmed:22001849
  // GO:0019253
  // hasTaxon taxonomy:33090
  // hasProperty mamo:MAMO_0000046

  // Compartments:
  compartment chloroplast = 1;
  compartment cytosol = 1;

  // Species:
  species RuBP in chloroplast = 2;  // isVersionOf CHEBI:16710
  species PGA in chloroplast = 2.4;  // isVersionOf CHEBI:17050
  species DPGA in chloroplast = 0.0011;  // isVersionOf CHEBI:22902
  species GAP in chloroplast = 0.02;  // isVersionOf CHEBI:17138
  species DHAP in chloroplast = 0.48;  // isVersionOf CHEBI:16108 pubchem.compound:668
  species FBP in chloroplast = 0.67;  // isVersionOf CHEBI:16905
  species F6P in chloroplast = 0.6407643;  // isVersionOf CHEBI:15946
  species E4P in chloroplast = 0.05;  // isVersionOf pubchem.compound:122357
  species SBP in chloroplast = 0.3;  // isVersionOf CHEBI:17969
  species S7P in chloroplast = 2;  // isVersionOf CHEBI:15721
  species X5P in chloroplast = 0.07473842;  // isVersionOf CHEBI:16332
  species R5P in chloroplast = 0.1251868;  // isVersionOf CHEBI:17797
  species Ru5P in chloroplast = 0.05007474;  // isVersionOf CHEBI:17363
  species G6P in chloroplast = 1.473758;  // pubchem.compound:439958
  species G1P in chloroplast = 0.08547795;  // isVersionOf pubchem.compound:65533
  species ATP in chloroplast = 0.68;  // isVersionOf CHEBI:15422
  species $ADP in chloroplast;  // isVersionOf CHEBI:16761
  species $NADPH in chloroplast = 0.21;  // CHEBI:16474
  species $NADP in chloroplast = 0.29;  // CHEBI:25523
  species $H in chloroplast = 1.258925e-5;  // isVersionOf CHEBI:15378
  species $Pi in chloroplast;  // isVersionOf CHEBI:43474
  species $Pext in cytosol = 0.5;  // isVersionOf CHEBI:43474

  // Assignment rules:
  Pi := 15 - 2*(RuBP + DPGA + FBP + SBP) - (PGA + GAP + DHAP + F6P + E4P + S7P + X5P + R5P + Ru5P + G6P + G1P + ATP);
  ADP := 1.5 - ATP;

  // Reactions:
  RuBisCO: RuBP => 2 PGA; chloroplast*MM_s1_reg_5_c_RuBisCO(RuBisCO_Vm, RuBP, RuBisCO_K, PGA, RuBisCO_KR1, FBP, RuBisCO_KR2, SBP, RuBisCO_KR3, Pi, KR4, NADPH, KR5); RuBisCO is "RuBisCo";  // modifiers: FBP, SBP, Pi, NADPH
    RuBisCO_Vm = 340; RuBisCO_K = 0.02; RuBisCO_KR1 = 0.84; RuBisCO_KR2 = 0.04; RuBisCO_KR3 = 0.0075; KR4 = 0.9; KR5 = 0.07;
  PGA_K: PGA + ATP -> DPGA + $ADP; chloroplast*(PGA_K_k1*PGA*ATP - PGA_K_k2*DPGA*ADP); PGA_K is "PGA kinase";
    PGA_K_k1 = 500000000; PGA_K_k2 = 1.6129e12;
  GAP_DH: DPGA + $NADPH + $H -> GAP + $NADP + $Pi; chloroplast*(GAP_DH_k1*DPGA*NADPH*H - GAP_DH_k2*GAP*NADP*Pi); GAP_DH is "GAP dehydrogenase";
    GAP_DH_k1 = 500000000; GAP_DH_k2 = 31.25;
  TP_I: GAP -> DHAP; chloroplast*(TP_I_k1*GAP - TP_I_k2*DHAP); TP_I is "TP isomerase";
    TP_I_k1 = 500000000; TP_I_k2 = 22727000;
  FBP_A: DHAP + GAP -> FBP; chloroplast*(FBP_A_k1*DHAP*GAP - FBP_A_k2*FBP); FBP_A is "FBP aldolase";
    FBP_A_k1 = 500000000; FBP_A_k2 = 70423000;
  FBPase: FBP => F6P + $Pi; chloroplast*MM_s1_reg_2_c_FBPase(FBPase_Vm, FBP, FBPase_K, F6P, FBPase_KR1, Pi, FBPase_KR2); FBPase is "FBP ase";
    FBPase_Vm = 200; FBPase_K = 0.03; FBPase_KR1 = 0.7; FBPase_KR2 = 12;
  F6P_TK: GAP + F6P -> X5P + E4P; chloroplast*(F6P_TK_k1*GAP*F6P - F6P_TK_k2*X5P*E4P); F6P_TK is "F6P transketolase";
    F6P_TK_k1 = 500000000; F6P_TK_k2 = 5.9524e9;
  SBP_A: DHAP + E4P -> SBP; chloroplast*(SBP_A_k1*DHAP*E4P - SBP_A_k2*SBP); SBP_A is "SBP aldolase";
    SBP_A_k1 = 500000000; SBP_A_k2 = 38461500;
  SBPase: SBP => S7P + $Pi; chloroplast*MM_s1_reg_1_c_SBPase_starch_phos(SBPase_Vm, SBP, SBPase_K, Pi, SBPase_KR1); SBPase is "SBP ase";
    SBPase_Vm = 40; SBPase_K = 0.02; SBPase_KR1 = 12;
  S7P_TK: GAP + S7P -> X5P + R5P; chloroplast*(S7P_TK_k1*GAP*S7P - S7P_TK_k2*X5P*R5P); S7P_TK is "S7P transketolase";
    S7P_TK_k1 = 500000000; S7P_TK_k2 = 588240000;
  R5P_I: R5P -> Ru5P; chloroplast*(R5P_I_k1*R5P - R5P_I_k2*Ru5P); R5P_I is "R5P isomerase";
    R5P_I_k1 = 500000000; R5P_I_k2 = 1250000000;
  Ru5P_E: X5P -> Ru5P; chloroplast*(Ru5P_E_k1*X5P - Ru5P_E_k2*Ru5P); Ru5P_E is "Ru5P epimerase";
    Ru5P_E_k1 = 500000000; Ru5P_E_k2 = 746269000;
  Ru5P_K: Ru5P + ATP => RuBP + $ADP; chloroplast*function_4(Ru5P_K_Vm, Ru5P, ATP, Ru5P_K_K1, PGA, Ru5P_K_KR1, RuBP, Ru5P_K_KR2, Pi, Ru5P_K_KR3, ADP, KR41, Ru5P_K_K2, KR42); Ru5P_K is "Ru5P kinase";  // modifiers: PGA, Pi
    Ru5P_K_Vm = 1000; Ru5P_K_K1 = 0.05; Ru5P_K_KR1 = 2; Ru5P_K_KR2 = 0.7; Ru5P_K_KR3 = 4; KR41 = 2.5; Ru5P_K_K2 = 0.05; KR42 = 0.4;
  PG_I: F6P -> G6P; chloroplast*(PG_I_k1*F6P - PG_I_k2*G6P); PG_I is "PG isomerase";
    PG_I_k1 = 500000000; PG_I_k2 = 217400000;
  PG_M: G6P -> G1P; chloroplast*(PG_M_k1*G6P - PG_M_k2*G1P); PG_M is "PG mutase";
    PG_M_k1 = 500000000; PG_M_k2 = 8.621e9;
  // changed velocity in accordance with the authors: (...)/(G1P+Km1)((1+[ADP]/Ki)([ATP]+Km2*(...)))
  Starch_S: G1P + ATP => ; chloroplast*starch_synthase(Starch_S_Vm, G1P, ATP, Starch_S_K1, Starch_S_K2, ADP, Starch_S_KR1, Pi, KA1, PGA, KA2, F6P, KA3, FBP); Starch_S is "starch synthase";  // modifiers: ADP, Pi, PGA, F6P, FBP
    Starch_S_Vm = 40; Starch_S_K1 = 0.08; Starch_S_K2 = 0.08; Starch_S_KR1 = 10; KA1 = 0.1; KA2 = 0.02; KA3 = 0.02;
  // Poolman (1999)
  Starch_P: $Pi => G1P; chloroplast*MM_s1_reg_1_c_SBPase_starch_phos(Starch_P_Vm, Pi, Starch_P_K, G1P, Starch_P_KR1); Starch_P is "starch phosphorylase";
    Starch_P_Vm = 40; Starch_P_K = 0.1; Starch_P_KR1 = 0.05;
  ATP_S: $ADP + $Pi => ATP; chloroplast*MM_s2_reg_ATP_synth(ATP_S_Vm, ADP, Pi, ATP_S_K1, ATP_S_K2); ATP_S is "ATP synthetase";
    ATP_S_Vm = 350; ATP_S_K1 = 0.014; ATP_S_K2 = 0.3;
  TPT_PGA: PGA => ; chloroplast*MM_s1_reg_A_3_c_TPT(TPT_PGA_Vm, PGA, TPT_PGA_KA, Pext, TPT_PGA_K, Pi, TPT_PGA_KR1, GAP, TPT_PGA_KR2, DHAP, TPT_PGA_KR3); TPT_PGA is "TPT - PGA";  // modifiers: Pext, Pi, GAP, DHAP
    TPT_PGA_Vm = 250; TPT_PGA_KA = 0.74; TPT_PGA_K = 0.25; TPT_PGA_KR1 = 0.63; TPT_PGA_KR2 = 0.075; TPT_PGA_KR3 = 0.077;
  TPT_GAP: GAP => ; chloroplast*MM_s1_reg_A_3_c_TPT(TPT_GAP_Vm, GAP, TPT_GAP_KA, Pext, TPT_GAP_K, Pi, TPT_GAP_KR1, PGA, TPT_GAP_KR2, DHAP, TPT_GAP_KR3); TPT_GAP is "TPT - GAP";  // modifiers: Pext, Pi, PGA, DHAP
    TPT_GAP_Vm = 250; TPT_GAP_KA = 0.74; TPT_GAP_K = 0.075; TPT_GAP_KR1 = 0.63; TPT_GAP_KR2 = 0.25; TPT_GAP_KR3 = 0.077;
  TPT_DHAP: DHAP => ; chloroplast*MM_s1_reg_A_3_c_TPT(TPT_DHAP_Vm, DHAP, TPT_DHAP_KA, Pext, TPT_DHAP_K, Pi, TPT_DHAP_KR1, PGA, TPT_DHAP_KR2, GAP, TPT_DHAP_KR3); TPT_DHAP is "TPT - DHAP";  // modifiers: Pext, Pi, PGA, GAP
    TPT_DHAP_Vm = 250; TPT_DHAP_KA = 0.74; TPT_DHAP_K = 0.077; TPT_DHAP_KR1 = 0.63; TPT_DHAP_KR2 = 0.25; TPT_DHAP_KR3 = 0.075;

  // Unit definitions:
  unit volume = litre;
  unit substance = 1e-3 mole;
end
