// SBML level 2 version 4

function MMlike_s2p2_reg_3_c_s1_1_m_s2(Vm, s1, s2, p1, p2, q, Ks1, r1, Kr1, r2, Kr2, r3, Kr3, r4, Kr41, Ks2, Kr42)
  Vm*(s1*s2 - p1*p2/q)/((s1 + Ks1*(1 + r1/Kr1 + r2/Kr2 + r3/Kr3))*(s2*(1 + r4/Kr41) + Ks2*(1 + r4/Kr42)));
end
MMlike_s2p2_reg_3_c_s1_1_m_s2 is "MMlike s2p2 + reg 3*c-s1,1*m-s2";

function Competitive_inhibition_irr(substrate, Inhibitor, Km, V, Ki)
  V*substrate/(Km + substrate + Km*Inhibitor/Ki);
end
Competitive_inhibition_irr is "Competitive inhibition (irr)";

function function_17(substrate, Km, V)
  V*substrate/(Km + substrate);
end
function_17 is "Henri-Michaelis-Menten (irreversible)";

function MMlike_s1p2_reg_2_c(Vm, s1, p1, p2, q, Ks1, r1, Kr1, r2, Kr2)
  Vm*(s1 - p1*p2/q)/(s1 + Ks1*(1 + r1/Kr1 + r2/Kr2));
end
MMlike_s1p2_reg_2_c is "MMlike s1p2 + reg 2*c";

function MMlike_s2p2_reg_1_c_s1_4_c_s2(Vm, s1, s2, p1, p2, q, Ks1, r1, Kr1, Ks2, r2, Kr2, r3, Kr3, r4, Kr4, r5, Kr5)
  Vm*(s1*s2 - p1*p2/q)/((s1 + Ks1*(1 + r1/Kr1))*(s2 + Ks2*(1 + r2/Kr2)*(1 + r3/Kr3)*(1 + r4/Kr4)*(1 + r5/Kr5)));
end
MMlike_s2p2_reg_1_c_s1_4_c_s2 is "MMlike s2p2 + reg 1*c-s1,4*c-s2";

function MMlike_s2p2_s2_reg_1_c(Vm, s1, s2, p1, p2, q, Ks1, r1, Kr1)
  Vm*(s1*s2 - p1*p2/q)/(s1 + Ks1*(1 + r1/Kr1));
end
MMlike_s2p2_s2_reg_1_c is "MMlike s2p2 -s2 + reg 1*c";

function MMlike_s2p2_reg_2_c_s1_1_c_s2(Vm, s1, s2, p1, p2, q, Ks1, r1, Kr1, r2, Kr2, Ks2, r3, Kr3)
  Vm*(s1*s2 - p1*p2/q)/((s1 + Ks1*(1 + r1/Kr1)*(1 + r2/Kr2))*(s2 + Ks2*(1 + r3/Kr3)));
end
MMlike_s2p2_reg_2_c_s1_1_c_s2 is "MMlike s2p2 + reg 2*c-s1,1*c-s2";

function MM_s2p1_reg(s1, s2, p1, q, Ks1, Ks2, Kp1, Vm)
  Vm*(s1*s2 - p1/q)/(Ks1*Ks2*((1 + s1/Ks1)*(1 + s2/Ks2) + p1/Kp1));
end
MM_s2p1_reg is "MM s2p1 - reg";

function MMlike_s1p2_reg_1_c(Vm, s1, p1, p2, q, Ks1, r1, Kr1)
  Vm*(s1 - p1*p2/q)/(s1 + Ks1*(1 + r1/Kr1));
end
MMlike_s1p2_reg_1_c is "MMlike s1p2 + reg 1*c";

function MM_s1p2_reg(s1, p1, p2, q, Ks1, Kp1, Kp2, Vm)
  Vm*(s1 - p1*p2/q)/(Ks1*(s1/Ks1 + (1 + p1/Kp1)*(1 + p2/Kp2)));
end
MM_s1p2_reg is "MM s1p2 - reg";

function MM_s2p2_reg(s1, s2, p1, p2, q, Ks1, Ks2, Kp1, Kp2, Vm)
  Vm*(s1*s2 - p1*p2/q)/(Ks1*Ks2*((1 + s1/Ks1)*(1 + s2/Ks2) + (1 + p1/Kp1)*(1 + p2/Kp2) - 1));
end
MM_s2p2_reg is "MM s2p2 - reg";

function MM_s2_reg_1_c(Vm, s1, s2, Ks1, Ks2, r1, Kr1)
  Vm*s1*s2/((s1 + Ks1)*(s2 + Ks2*(1 + r1/Kr1)));
end
MM_s2_reg_1_c is "MM s2 + reg 1*c";

function starch_synthase_Pettersson(Vm, S1, S2, K1, K2, R1, KR1, R2, KA1, A1, KA2, A2, KA3, A3)
  Vm*S1*S2/((S1 + K1)*(1 + R1/KR1)*(S2 + K2*(1 + K2*R2/(KA1*A1 + KA2*A2 + KA3*A3))));
end
starch_synthase_Pettersson is "starch synthase - Pettersson";

function MM_s1_reg_2_s(Vm, s1, Ks1, r1, Kr1, r2, Kr2)
  Vm*s1/(s1 + Ks1*(1 + r1/Kr1)*(1 + r2/Kr2));
end
MM_s1_reg_2_s is "MM s1 + reg 2*s";

function MMlike_s2p2_reg_1_c(Vm, s1, s2, p1, p2, q, Ks1, r1, Kr1, Ks2)
  Vm*(s1*s2 - p1*p2/q)/((s1 + Ks1*(1 + r1/Kr1))*(s2 + Ks2));
end
MMlike_s2p2_reg_1_c is "MMlike s2p2 + reg 1*c";

function MM_s1_reg_5_c(Vm, S, K, R1, KR1, R2, KR2, R3, KR3, R4, KR4, R5, KR5)
  Vm*S/(S + K*(1 + R1/KR1 + R2/KR2 + R3/KR3 + R4/KR4 + R5/KR5));
end
MM_s1_reg_5_c is "MM s1 + reg 5*c";

function MM_s2_reg(Vm, s1, s2, K1, K2)
  Vm*s1*s2/((s1 + K1)*(s2 + K2));
end
MM_s2_reg is "MM s2 - reg";

function MMlike_s1_reg(Vm, s1, Ks1, r1, Kr1)
  Vm*s1/(s1 + Ks1*(1 + r1/Kr1));
end
MMlike_s1_reg is "MMlike s1 - reg";

function MM_s1_reg_2_n(Vm, s1, r1, Kr1, r2, Kr2, Ks1)
  Vm*s1/((s1 + Ks1)*(1 + r1/Kr1)*(1 + r2/Kr2));
end
MM_s1_reg_2_n is "MM s1 + reg 2*n";

function MMlike_s2p2_reg_2_c(Vm, s1, s2, p1, p2, Ks1, Ks2, r1, Kr1, r2, Kr2, q)
  Vm*(s1*s2 - p1*p2/q)/((s1 + Ks1*(1 + r1/Kr1 + r2/Kr2))*(s2 + Ks2));
end
MMlike_s2p2_reg_2_c is "MMlike s2p2 + reg 2*c";

function MMlike_s2p1_reg(Vm, s1, s2, p1, q, Ks1, Ks2)
  Vm*(s1*s2 - p1/q)/((s1 + Ks1)*(s2 + Ks2));
end
MMlike_s2p1_reg is "MMlike s2p1 - reg";

function MM_s1_reg_A_3_c(Vm, S, KA, A, K, R1, KR1, R2, KR2, R3, KR3)
  Vm*S/(S*(1 + KA/A) + K*(1 + (1 + KA/A)*(R1/KR1 + R2/KR2 + R3/KR3)));
end
MM_s1_reg_A_3_c is "MM s1 + reg A,3*c";

model Arnold2011_Zhu2007_CalvinCycle_Starch_Sucrose_Photorespiration()
  // This model is from the article:
  // A quantitative comparison of Calvin–Benson cycle models
  // Anne Arnold, Zoran Nikoloski Trends in Plant Science2011 Oct 14. 22001849,
  // Abstract:
  // The Calvin-Benson cycle (CBC) provides the precursors for biomass synthesis necessary for plant growth. The dynamic behavior and yield of the CBC depend on the environmental conditions and regulation of the cellular state. Accurate quantitative models hold the promise of identifying the key determinants of the tightly regulated CBC function and their effects on the responses in future climates. We provide an integrative analysis of the largest compendium of existing models for photosynthetic processes. Based on the proposed ranking, our framework facilitates the discovery of best-performing models with regard to metabolomics data and of candidates for metabolic engineering.
  // Note: Model of the Calvin cycle and the related end-product pathways to starch and sucrose synthesis and photorespiration by Zhu et al. (2007, DOI:10.1104/pp.107.103713) and the personally provided implementation.
  // The parameter values are partly taken from Pettersson and Ryde-Pettersson (1988, DOI:10.1111/j.1432-1033.1988.tb14242.x). The initial metabolite values are chosen from the data set of Zhu et al. (2007, DOI:10.1104/pp.107.103713). A detailed description of all modifications is given in the model described by Arnold and Nikoloski (2011, PMID:22001849.
  // biomodels.db:MODEL1109270009
  // biomodels.db:BIOMD0000000393
  // isDescribedBy pubmed:22001849
  // encodes GO:0019253
  // hasTaxon taxonomy:33090
  // hasProperty mamo:MAMO_0000046

  // Compartments:
  compartment chloroplast = 1;
  compartment cytosol = 1;

  // Species:
  species PGA in chloroplast = 2.4;  // isVersionOf pubchem.compound:724
  species DPGA in chloroplast = 0.0011;  // isVersionOf pubchem.compound:44472828
  species $GAP in chloroplast;  // isVersionOf pubchem.compound:643984
  species $DHAP in chloroplast;  // isVersionOf pubchem.compound:668
  species TP in chloroplast = 0.5;  // isVersionOf pubchem.compound:24794350
  species FBP in chloroplast = 0.67;  // isVersionOf pubchem.compound:172313
  species $F6P in chloroplast;  // isVersionOf pubchem.compound:69507
  species $G6P in chloroplast;  // isVersionOf pubchem.compound:439958
  species $G1P in chloroplast;  // isVersionOf pubchem.compound:65533
  species HeP in chloroplast = 2.2;  // isVersionOf CHEBI:15965
  species E4P in chloroplast = 0.05;  // isVersionOf pubchem.compound:122357
  species SBP in chloroplast = 0.3;  // isVersionOf CHEBI:17969
  species S7P in chloroplast = 2;  // isVersionOf CHEBI:15721
  species $X5P in chloroplast;  // isVersionOf pubchem.compound:42609827
  species $R5P in chloroplast;  // isVersionOf pubchem.compound:439167
  species $Ru5P in chloroplast;  // isVersionOf pubchem.compound:439184
  species PeP in chloroplast = 0.25;  // isVersionOf pubchem.compound:1005
  species RuBP in chloroplast = 2;  // isVersionOf pubchem.compound:4337391
  species ATP in chloroplast = 0.68;  // isVersionOf CHEBI:15422
  species $ADP in chloroplast;  // isVersionOf CHEBI:16761
  species $NADPH in chloroplast = 0.21;  // isVersionOf CHEBI:16474
  species $Pi in chloroplast;  // isVersionOf CHEBI:43474
  species PGCA in chloroplast = 0.0029;  // isVersionOf pubchem.compound:126523595
  species GCA in chloroplast = 0.36;  // isVersionOf pubchem.compound:126523016
  species GCEA in chloroplast = 0.1812;  // isVersionOf pubchem.compound:3557
  species $CO2 in chloroplast = 0.009;  // isVersionOf CHEBI:16526
  species $O2 in chloroplast = 0.2646;  // isVersionOf CHEBI:15279
  species $NADP in chloroplast = 0.29;  // isVersionOf CHEBI:25523
  species HPRc in chloroplast = 0.0035;  // isVersionOf pubchem.compound:3468
  species GCAc in cytosol = 0.36;  // isVersionOf pubchem.compound:841751
  species GOAc in cytosol = 0.028;  // isVersionOf pubchem.compound:2775
  species GLYc in cytosol = 1.8;  // isVersionOf CHEBI:15428
  species SERc in cytosol = 7.5;  // isVersionOf CHEBI:17822
  species GCEAc in cytosol = 0.1812;  // isVersionOf pubchem.compound:3557
  species PGAc in cytosol = 0;  // isVersionOf pubchem.compound:668242
  species $GAPc in cytosol;  // isVersionOf pubchem.compound:152025
  species $DHAPc in cytosol;  // isVersionOf pubchem.compound:53788488
  species TPc in cytosol = 2.3;  // isVersionOf pubchem.compound:841076
  species FBPc in cytosol = 2;  // isVersionOf pubchem.compound:56435918
  species $F6Pc in cytosol;  // isVersionOf pubchem.compound:691766
  species $G6Pc in cytosol;  // isVersionOf pubchem.compound:126700772
  species $G1Pc in cytosol;  // isVersionOf pubchem.compound:49847001
  species HePc in cytosol = 5.8;  // isVersionOf CHEBI:15965
  species F26BPc in cytosol = 7.8e-6;  // isVersionOf pubchem.compound:105021
  species UDPGc in cytosol = 0.57;  // isVersionOf pubchem.compound:53477679
  species SucPc in cytosol = 0;  // CHEBI:16308
  species Succ in cytosol = 0;  // isVersionOf pubchem.compound:5988
  species $UTPc in cytosol = 0.75;  // isVersionOf pubchem.compound:6133
  species $UDPc in cytosol;  // isVersionOf pubchem.compound:20056717
  species $NAD in cytosol = 0.4;  // isVersionOf CHEBI:13389
  species $NADH in cytosol = 0.47;  // isVersionOf CHEBI:16908
  species $GLUc in cytosol = 24;  // isPartOf CHEBI:17234
  species $KGc in cytosol = 0.4;
  species $Pic in cytosol;  // CHEBI:43474
  species $PiTc in cytosol;  // hasPart CHEBI:43474
  species $ATPc in cytosol = 0.35;  // CHEBI:15422
  species $ADPc in cytosol;  // CHEBI:16761
  species $PiPic in cytosol;  // hasPart CHEBI:43474

  // Parameters:
  cA = 1.5;
  cP = 15;
  cAc = 1;
  cPc = 15;
  cNc = 0.87;
  cUc = 1.5;
  E = 1.456965;
  var Wc_min; Wc_min is "Wc*min";
  var Wo_min; Wo_min is "Wo*min";

  // Assignment rules:
  K52a := 0.0025*(1 + F26BPc/7e-5);
  R5P := PeP/0.4/(1 + 1/0.4 + 1/0.67);
  G6P := HeP/(1 + 1/2.3 + 0.058);
  DHAP := TP/(1 + 0.05);
  GAP := 0.05*TP/(1 + 0.05);
  G1P := HeP*0.058/(1 + 1/2.3 + 0.058);
  X5P := PeP/0.67/(1 + 1/0.4 + 1/0.67);
  Pi := cP - 2*(RuBP + DPGA + FBP + SBP) - (PGA + TP + HeP + E4P + S7P + PeP + ATP + PGCA);
  Ru5P := PeP/(1 + 1/0.4 + 1/0.67);
  F6P := HeP/2.3/(1 + 1/2.3 + 0.058);
  ADP := cA - ATP;
  G6Pc := HePc/(1 + 1/2.3 + 0.0584);
  GAPc := 0.05*TPc/(1 + 0.05);
  PiTc := cPc - 2*(FBPc + F26BPc) - (PGAc + TPc + HePc + SucPc + ATPc + UTPc);
  F6Pc := HePc/2.3/(1 + 1/2.3 + 0.0584);
  Pic := 12000000/2*(sqrt(1 + 4*PiTc/12000000) - 1);
  PiPic := PiTc - Pic;
  Wc_min := 2.913931*CO2/(CO2 + 0.0115*(1 + O2/0.222))*((1 + RuBP/E - abs(1 - RuBP/E))/2);
  G1Pc := HePc*0.0584/(1 + 1/2.3 + 0.0584);
  DHAPc := TPc/(1 + 0.05);
  UDPc := cUc - UTPc - UDPGc;
  Wo_min := 0.24*2.913931*O2/(O2 + 0.222*(1 + CO2/0.0115))*((1 + RuBP/E - abs(1 - RuBP/E))/2);
  ADPc := cAc - ATPc;

  // Reactions:
  RuBisCO_CO2: RuBP => 2 PGA; chloroplast*MM_s1_reg_5_c(Wc_min, RuBP, RuBisCO_CO2_K, PGA, RuBisCO_CO2_KR1, FBP, RuBisCO_CO2_KR2, SBP, RuBisCO_CO2_KR3, Pi, RuBisCO_CO2_KR4, NADPH, RuBisCO_CO2_KR5); RuBisCO_CO2 is "RuBisCO - CO2";  // modifiers: FBP, SBP, Pi, NADPH
    RuBisCO_CO2_K = 0.02; RuBisCO_CO2_KR1 = 0.84; RuBisCO_CO2_KR2 = 0.04; RuBisCO_CO2_KR3 = 0.075; RuBisCO_CO2_KR4 = 0.9; RuBisCO_CO2_KR5 = 0.07;
  PGA_K: PGA + ATP => DPGA + $ADP; chloroplast*MM_s2_reg_1_c(PGA_K_Vm, PGA, ATP, PGA_K_Ks1, PGA_K_Ks2, ADP, PGA_K_Kr1); PGA_K is "PGA kinase";
    PGA_K_Vm = 30.1408; PGA_K_Ks1 = 0.24; PGA_K_Ks2 = 0.39; PGA_K_Kr1 = 0.23;
  GAP_DH: DPGA + $NADPH => TP + $NADP; chloroplast*MM_s2_reg(GAP_DH_Vm, DPGA, NADPH, GAP_DH_K1, GAP_DH_K2); GAP_DH is "GAP dehydrogenase";  // modifiers: GAP
    GAP_DH_Vm = 4.03948; GAP_DH_K1 = 0.004; GAP_DH_K2 = 0.1;
  FBP_A: 2 TP -> FBP; chloroplast*MM_s2p1_reg(GAP, DHAP, FBP, FBP_A_q, FBP_A_Ks1, FBP_A_Ks2, FBP_A_Kp1, FBP_A_Vm); FBP_A is "FBP aldolase";  // modifiers: GAP, DHAP
    FBP_A_q = 7.1; FBP_A_Ks1 = 0.3; FBP_A_Ks2 = 0.4; FBP_A_Kp1 = 0.02; FBP_A_Vm = 1.21889;
  FBPase: FBP -> HeP + $Pi; chloroplast*MMlike_s1p2_reg_2_c(FBPase_Vm, FBP, F6P, Pi, FBPase_q, FBPase_Ks1, F6P, FBPase_Kr1, Pi, FBPase_Kr2);  // modifiers: F6P
    FBPase_Vm = 0.72626; FBPase_q = 666000; FBPase_Ks1 = 0.033; FBPase_Kr1 = 0.7; FBPase_Kr2 = 12;
  F6P_TK: HeP + TP -> E4P + PeP; chloroplast*MMlike_s2p2_reg_2_c(F6P_TK_Vm, F6P, GAP, X5P, E4P, F6P_TK_Ks1, F6P_TK_Ks2, X5P, F6P_TK_Kr1, E4P, F6P_TK_Kr2, F6P_TK_q); F6P_TK is "F6P transketolase";  // modifiers: F6P, GAP, X5P
    F6P_TK_Vm = 3.12207; F6P_TK_Ks1 = 0.1; F6P_TK_Ks2 = 0.1; F6P_TK_Kr1 = 0.1; F6P_TK_Kr2 = 0.1; F6P_TK_q = 10;
  SBP_A: TP + E4P -> SBP; chloroplast*MMlike_s2p1_reg(SBP_A_Vm, DHAP, E4P, SBP, SBP_A_q, SBP_A_Ks1, SBP_A_Ks2); SBP_A is "SBP aldolase";  // modifiers: DHAP
    SBP_A_Vm = 1.21889; SBP_A_q = 1.017; SBP_A_Ks1 = 0.4; SBP_A_Ks2 = 0.2;
  SBPase: SBP -> S7P + $Pi; chloroplast*MMlike_s1p2_reg_1_c(SBPase_Vm, SBP, S7P, Pi, SBPase_q, SBPase_Ks1, Pi, SBPase_Kr1);
    SBPase_Vm = 0.324191; SBPase_q = 666000; SBPase_Ks1 = 0.05; SBPase_Kr1 = 12;
  S7P_TK: TP + S7P -> 2 PeP; chloroplast*MMlike_s2p2_reg_2_c(S7P_TK_Vm, GAP, S7P, X5P, R5P, S7P_TK_Ks1, S7P_TK_Ks2, X5P, S7P_TK_Kr1, R5P, S7P_TK_Kr2, S7P_TK_q); S7P_TK is "S7P transketolase";  // modifiers: GAP, X5P, R5P
    S7P_TK_Vm = 3.12207; S7P_TK_Ks1 = 0.072; S7P_TK_Ks2 = 0.46; S7P_TK_Kr1 = 0.1; S7P_TK_Kr2 = 1.5; S7P_TK_q = 1.17647;
  Ru5P_K: PeP + ATP -> RuBP + $ADP; chloroplast*MMlike_s2p2_reg_3_c_s1_1_m_s2(Ru5P_K_Vm, Ru5P, ATP, RuBP, ADP, Ru5P_K_q, Ru5P_K_Ks1, PGA, Ru5P_K_Kr1, RuBP, Ru5P_K_Kr2, Pi, Ru5P_K_Kr3, ADP, Kr41, Ru5P_K_Ks2, Kr42); Ru5P_K is "Ru5P kinase";  // modifiers: Ru5P, PGA, Pi
    Ru5P_K_Vm = 10.8348; Ru5P_K_q = 6846; Ru5P_K_Ks1 = 0.05; Ru5P_K_Kr1 = 2; Ru5P_K_Kr2 = 0.7; Ru5P_K_Kr3 = 4; Kr41 = 2.5; Ru5P_K_Ks2 = 0.059; Kr42 = 0.4;
  ATP_S: $ADP + $Pi -> ATP; chloroplast*MM_s2p1_reg(ADP, Pi, ATP, ATP_S_q, ATP_S_Ks1, ATP_S_Ks2, ATP_S_Kp1, ATP_S_Vm); ATP_S is "ATP synthetase";
    ATP_S_q = 5.734; ATP_S_Ks1 = 0.014; ATP_S_Ks2 = 0.3; ATP_S_Kp1 = 0.3; ATP_S_Vm = 15;
  AGPase: HeP + ATP => ; chloroplast*starch_synthase_Pettersson(AGPase_Vm, G1P, ATP, AGPase_K1, AGPase_K2, ADP, AGPase_KR1, Pi, KA1, PGA, KA2, F6P, KA3, FBP);  // modifiers: G1P, ADP, Pi, PGA, F6P, FBP
    AGPase_Vm = 0.266843; AGPase_K1 = 0.08; AGPase_K2 = 0.08; AGPase_KR1 = 10; KA1 = 0.1; KA2 = 0.02; KA3 = 0.02;
  TPT_PGA: PGA => PGAc; MM_s1_reg_A_3_c(TPT_PGA_Vm, PGA, TPT_PGA_KA, Pic, TPT_PGA_K, Pi, TPT_PGA_KR1, GAP, TPT_PGA_KR2, DHAP, TPT_PGA_KR3); TPT_PGA is "TPT - PGA";  // modifiers: Pic, Pi, GAP, DHAP
    TPT_PGA_Vm = 1.24333; TPT_PGA_KA = 0.74; TPT_PGA_K = 0.25; TPT_PGA_KR1 = 0.63; TPT_PGA_KR2 = 0.075; TPT_PGA_KR3 = 0.077;
  TPT_GAP: TP => TPc; MM_s1_reg_A_3_c(TPT_GAP_Vm, GAP, TPT_GAP_KA, Pic, TPT_GAP_K, Pi, TPT_GAP_KR1, PGA, TPT_GAP_KR2, DHAP, TPT_GAP_KR3); TPT_GAP is "TPT - GAP";  // modifiers: GAP, GAPc, Pic, Pi, PGA, DHAP
    TPT_GAP_Vm = 1.24333; TPT_GAP_KA = 0.74; TPT_GAP_K = 0.075; TPT_GAP_KR1 = 0.63; TPT_GAP_KR2 = 0.25; TPT_GAP_KR3 = 0.077;
  TPT_DHAP: TP => TPc; MM_s1_reg_A_3_c(TPT_DHAP_Vm, DHAP, TPT_DHAP_KA, Pic, TPT_DHAP_K, Pi, TPT_DHAP_KR1, PGA, TPT_DHAP_KR2, GAP, TPT_DHAP_KR3); TPT_DHAP is "TPT - DHAP";  // modifiers: DHAP, DHAPc, Pic, Pi, PGA, GAP
    TPT_DHAP_Vm = 1.24333; TPT_DHAP_KA = 0.74; TPT_DHAP_K = 0.077; TPT_DHAP_KR1 = 0.63; TPT_DHAP_KR2 = 0.25; TPT_DHAP_KR3 = 0.075;
  FBPc_A: 2 TPc -> FBPc; cytosol*MM_s2p1_reg(GAPc, DHAPc, FBPc, FBPc_A_q, FBPc_A_Ks1, FBPc_A_Ks2, FBPc_A_Kp1, FBPc_A_Vm); FBPc_A is "FBPc aldolase";  // modifiers: GAPc, DHAPc
    FBPc_A_q = 12; FBPc_A_Ks1 = 0.3; FBPc_A_Ks2 = 0.4; FBPc_A_Kp1 = 0.02; FBPc_A_Vm = 0.107377;
  FBPcase: FBPc -> HePc + $Pic; cytosol*MM_s1p2_reg(FBPc, F6Pc, Pic, FBPcase_q, K52a, FBPcase_Kp1, FBPcase_Kp2, FBPcase_Vm);  // modifiers: F6Pc
    FBPcase_q = 6663; FBPcase_Kp1 = 0.7; FBPcase_Kp2 = 12; FBPcase_Vm = 0.063979;
  UGPase: HePc + $UTPc -> UDPGc + $PiPic; cytosol*MM_s2p2_reg(G1Pc, UTPc, UDPGc, PiPic, UGPase_q, UGPase_Ks1, UGPase_Ks2, UGPase_Kp1, UGPase_Kp2, UGPase_Vm);  // modifiers: G1Pc
    UGPase_q = 0.31; UGPase_Ks1 = 0.14; UGPase_Ks2 = 0.1; UGPase_Kp1 = 0.12; UGPase_Kp2 = 0.11; UGPase_Vm = 0.115403;
  SucPc_S: HePc + UDPGc -> SucPc + $UDPc; cytosol*MMlike_s2p2_reg_1_c_s1_4_c_s2(SucPc_S_Vm, F6Pc, UDPGc, SucPc, UDPc, SucPc_S_q, SucPc_S_Ks1, FBPc, SucPc_S_Kr1, SucPc_S_Ks2, UDPc, SucPc_S_Kr2, SucPc, SucPc_S_Kr3, Succ, Kr4, Pic, Kr5); SucPc_S is "SucPc synthase";  // modifiers: F6Pc, FBPc, Succ, Pic
    SucPc_S_Vm = 0.0555034; SucPc_S_q = 10; SucPc_S_Ks1 = 0.8; SucPc_S_Kr1 = 0.8; SucPc_S_Ks2 = 2.4; SucPc_S_Kr2 = 0.7; SucPc_S_Kr3 = 0.4; Kr4 = 50; Kr5 = 11;
  SucPc_P: SucPc -> Succ + $Pic; cytosol*MMlike_s1p2_reg_1_c(SucPc_P_Vm, SucPc, Succ, Pic, SucPc_P_q, SucPc_P_Ks1, Succ, SucPc_P_Kr1); SucPc_P is "SucPc phosphatase";
    SucPc_P_Vm = 0.555034; SucPc_P_q = 780; SucPc_P_Ks1 = 0.35; SucPc_P_Kr1 = 80;
  F6Pc_K: HePc + $ATPc -> F26BPc + $ADPc; cytosol*MMlike_s2p2_reg_2_c_s1_1_c_s2(F6Pc_K_Vm, F6Pc, ATPc, F26BPc, ADPc, F6Pc_K_q, F6Pc_K_Ks1, F26BPc, F6Pc_K_Kr1, DHAPc, F6Pc_K_Kr2, F6Pc_K_Ks2, ADPc, F6Pc_K_Kr3); F6Pc_K is "F6Pc kinase";  // modifiers: F6Pc, DHAPc
    F6Pc_K_Vm = 0.100915; F6Pc_K_q = 590; F6Pc_K_Ks1 = 0.5; F6Pc_K_Kr1 = 0.021; F6Pc_K_Kr2 = 0.7; F6Pc_K_Ks2 = 0.5; F6Pc_K_Kr3 = 0.16;
  F26BPc_P: F26BPc => HePc + $Pic; cytosol*MM_s1_reg_2_n(F26BPc_P_Vm, F26BPc, Pic, F26BPc_P_Kr1, F6Pc, F26BPc_P_Kr2, F26BPc_P_Ks1); F26BPc_P is "F26BPc phosphatase";  // modifiers: F6Pc
    F26BPc_P_Vm = 0.0168192; F26BPc_P_Kr1 = 0.5; F26BPc_P_Kr2 = 0.1; F26BPc_P_Ks1 = 0.032;
  Succ_Deg: Succ => ; cytosol*function_17(Succ, Succ_Deg_Km, Succ_Deg_V); Succ_Deg is "Succ degradation";
    Succ_Deg_Km = 5; Succ_Deg_V = 2;
  PGAc_Deg: PGAc => ; cytosol*function_17(PGAc, PGAc_Deg_Km, PGAc_Deg_V); PGAc_Deg is "PGAc degradation";
    PGAc_Deg_Km = 1; PGAc_Deg_V = 0.5;
  GPT_GCEAc: GCEAc => GCEA; Competitive_inhibition_irr(GCEAc, GCAc, GPT_GCEAc_Km, GPT_GCEAc_V, GPT_GCEAc_Ki); GPT_GCEAc is "GPT - GCEAc";  // modifiers: GCAc
    GPT_GCEAc_Km = 0.39; GPT_GCEAc_V = 5; GPT_GCEAc_Ki = 0.28;
  GPT_GCEA: GCEA => GCEAc; Competitive_inhibition_irr(GCEA, GCA, GPT_GCEA_Km, GPT_GCEA_V, GPT_GCEA_Ki); GPT_GCEA is "GPT - GCEA";  // modifiers: GCA
    GPT_GCEA_Km = 0.39; GPT_GCEA_V = 5; GPT_GCEA_Ki = 0.28;
  GPT_GCA: GCA => GCAc; Competitive_inhibition_irr(GCA, GCEA, GPT_GCA_Km, GPT_GCA_V, GPT_GCA_Ki); GPT_GCA is "GPT - GCA";  // modifiers: GCEA
    GPT_GCA_Km = 0.2; GPT_GCA_V = 6; GPT_GCA_Ki = 0.22;
  GPT_GCAc: GCAc => GCA; Competitive_inhibition_irr(GCAc, GCEAc, GPT_GCAc_Km, GPT_GCAc_V, GPT_GCAc_Ki); GPT_GCAc is "GPT - GCAc";  // modifiers: GCEAc
    GPT_GCAc_Km = 0.2; GPT_GCAc_V = 6; GPT_GCAc_Ki = 0.22;
  RuBisCO_O2: RuBP => PGA + PGCA; chloroplast*MM_s1_reg_5_c(Wo_min, RuBP, RuBisCO_O2_K, PGA, RuBisCO_O2_KR1, FBP, RuBisCO_O2_KR2, SBP, RuBisCO_O2_KR3, Pi, RuBisCO_O2_KR4, NADPH, RuBisCO_O2_KR5); RuBisCO_O2 is "RuBisC0 - O2";  // modifiers: FBP, SBP, Pi, NADPH
    RuBisCO_O2_K = 0.02; RuBisCO_O2_KR1 = 0.84; RuBisCO_O2_KR2 = 0.04; RuBisCO_O2_KR3 = 0.075; RuBisCO_O2_KR4 = 0.9; RuBisCO_O2_KR5 = 0.07;
  PGCA_P: PGCA => GCA; chloroplast*MM_s1_reg_2_s(PGCA_P_Vm, PGCA, PGCA_P_Ks1, GCA, PGCA_P_Kr1, Pi, PGCA_P_Kr2); PGCA_P is "PGCA phosphatase";  // modifiers: Pi
    PGCA_P_Vm = 52.4199; PGCA_P_Ks1 = 0.026; PGCA_P_Kr1 = 94; PGCA_P_Kr2 = 2.55;
  GCEA_K: ATP + GCEA -> PGA + $ADP; chloroplast*MMlike_s2p2_reg_1_c(GCEA_K_Vm, ATP, GCEA, PGA, ADP, GCEA_K_q, GCEA_K_Ks1, PGA, GCEA_K_Kr1, GCEA_K_Ks2); GCEA_K is "GCEA kinase";
    GCEA_K_Vm = 5.71579; GCEA_K_q = 300; GCEA_K_Ks1 = 0.21; GCEA_K_Kr1 = 0.36; GCEA_K_Ks2 = 0.25;
  GCAc_Ox: GCAc => GOAc; cytosol*function_17(GCAc, GCAc_Ox_Km, GCAc_Ox_V); GCAc_Ox is "GCAc oxidase";
    GCAc_Ox_Km = 0.1; GCAc_Ox_V = 1.45611;
  SERcGOAc_AT: SERc + GOAc -> HPRc + GLYc; MMlike_s2p2_reg_1_c(SERcGOAc_AT_Vm, SERc, GOAc, HPRc, GLYc, SERcGOAc_AT_q, SERcGOAc_AT_Ks1, GLYc, SERcGOAc_AT_Kr1, SERcGOAc_AT_Ks2); SERcGOAc_AT is "SERc:GOAc aminotransferase";
    SERcGOAc_AT_Vm = 3.30619; SERcGOAc_AT_q = 0.24; SERcGOAc_AT_Ks1 = 2.7; SERcGOAc_AT_Kr1 = 33; SERcGOAc_AT_Ks2 = 0.15;
  GCEA_DH: HPRc + $NADH -> GCEAc + $NAD; MMlike_s2p2_s2_reg_1_c(GCEA_DH_Vm, HPRc, NADH, GCEAc, NAD, GCEA_DH_q, GCEA_DH_Ks1, HPRc, GCEA_DH_Kr1); GCEA_DH is "GCEA dehydrogenase";
    GCEA_DH_Vm = 10.0098; GCEA_DH_q = 250000; GCEA_DH_Ks1 = 0.09; GCEA_DH_Kr1 = 12;
  GLUcGOAc_AT: $GLUc + GOAc -> $KGc + GLYc; cytosol*MMlike_s2p2_reg_1_c(GLUcGOAc_AT_Vm, GLUc, GOAc, KGc, GLYc, GLUcGOAc_AT_q, GLUcGOAc_AT_Ks1, GLYc, GLUcGOAc_AT_Kr1, GLUcGOAc_AT_Ks2); GLUcGOAc_AT is "GLUc:GOAc aminotransferase";
    GLUcGOAc_AT_Vm = 2.74582; GLUcGOAc_AT_q = 607; GLUcGOAc_AT_Ks1 = 1.7; GLUcGOAc_AT_Kr1 = 2; GLUcGOAc_AT_Ks2 = 0.15;
  GLYc_DC: 2 GLYc => SERc; cytosol*MMlike_s1_reg(GLYc_DC_Vm, GLYc, GLYc_DC_Ks1, SERc, GLYc_DC_Kr1); GLYc_DC is "GLYc decarboxylase";
    GLYc_DC_Vm = 2.49475; GLYc_DC_Ks1 = 6; GLYc_DC_Kr1 = 4;

  // Unit definitions:
  unit volume = litre;
  unit substance = 1e-3 mole;
end
