// SBML level 2 version 4

model Queralt2006_MitoticExit_Cdc55DownregulationBySeparase()
  // This model is from the article:
  // Downregulation of PP2A(Cdc55) phosphatase by separase initiates mitotic exit in budding yeast.
  // Queralt E, Lehane C, Novak B, Uhlmann F. Cell. 2006 May 19;125(4):719-32. 16713564 ,
  // Abstract:
  // After anaphase, the high mitotic cyclin-dependent kinase (Cdk) activity is downregulated to promote exit from mitosis. To this end, in the budding yeast S. cerevisiae, the Cdk counteracting phosphatase Cdc14 is activated. In metaphase, Cdc14 is kept inactive in the nucleolus by its inhibitor Net1. During anaphase, Cdk- and Polo-dependent phosphorylation of Net1 is thought to release active Cdc14. How Net1 is phosphorylated specifically in anaphase, when mitotic kinase activity starts to decline, has remained unexplained. Here, we show that PP2A(Cdc55) phosphatase keeps Net1 underphosphorylated in metaphase. The sister chromatid-separating protease separase, activated at anaphase onset, interacts with and downregulates PP2A(Cdc55), thereby facilitating Cdk-dependent Net1 phosphorylation. PP2A(Cdc55) downregulation also promotes phosphorylation of Bfa1, contributing to activation of the "mitotic exit network" that sustains Cdc14 as Cdk activity declines. These findings allow us to present a new quantitative model for mitotic exit in budding yeast.
  // This model originates from BioModels Database: A Database of Annotated Published Models (http://www.ebi.ac.uk/biomodels/). It is copyright (c) 2005-2012 The BioModels.net Team.
  // For more information see the terms of use .
  // To cite BioModels Database, please use: Li C, Donizelli M, Rodriguez N, Dharuri H, Endler L, Chelliah V, Li L, He E, Henry A, Stefan MI, Snoep JL, Hucka M, Le Novère N, Laibe C (2010) BioModels Database: An enhanced, curated and annotated resource for published quantitative kinetic models. BMC Syst Biol., 4:92.
  // biomodels.db:MODEL5951818256
  // biomodels.db:BIOMD0000000409
  // isDescribedBy pubmed:16713564
  // hasTaxon taxonomy:4932
  // isVersionOf GO:0000278 CCO:P0000038
  // hasProperty mamo:MAMO_0000046

  // Compartments:
  compartment compartment = 1;  // isVersionOf GO:0005623

  // Species:
  species $AA in compartment = 1;  // isVersionOf CHEBI:33704
  species Clb2 in compartment = 0.997;  // isVersionOf uniprot:P24869
  species $degr in compartment = 1;
  species Cdc20 in compartment = 0;  // isVersionOf uniprot:P26309
  species Cdh1 in compartment = 3.8e-5;  // isVersionOf uniprot:P53197
  species $Cdh1_i in compartment; Cdh1_i is "inactive Cdh1";  // isVersionOf uniprot:P53197
  species securinT in compartment = 0.6;  // isVersionOf uniprot:P40316
  species $securin in compartment;  // isVersionOf uniprot:P40316
  species separaseT in compartment = 0.25;  // isVersionOf uniprot:Q03018
  species $separase in compartment;  // isVersionOf uniprot:Q03018
  species securinseparase in compartment = 0.248; securinseparase is "securin:separase";  // hasPart uniprot:P40316 uniprot:Q03018
  species Net1 in compartment = 0.098;  // isVersionOf uniprot:P47035
  species Net1Cdc14 in compartment = 0.485;  // hasPart uniprot:P47035 uniprot:Q00684
  species PoloT in compartment = 0.99;  // isVersionOf uniprot:P32562
  species Polo in compartment = 0.945;  // isVersionOf uniprot:P32562
  species $Polo_i in compartment; Polo_i is "inactive Polo";  // isVersionOf uniprot:P32562
  species Tem1 in compartment = 0.00389;  // isVersionOf uniprot:P38987
  species $Tem1_i in compartment; Tem1_i is "inactive Tem1";  // isVersionOf uniprot:P38987
  species Cdc15 in compartment = 0.0257;  // isVersionOf uniprot:P27636
  species $Cdc15_i in compartment; Cdc15_i is "inactive Cdc15";  // isVersionOf uniprot:P27636
  species MEN in compartment = 8e-6;  // hasPart uniprot:P38987 uniprot:P27636
  species $PP2A in compartment;  // isVersionOf uniprot:Q00362
  species $Net1P in compartment;  // isVersionOf uniprot:P47035 kegg.compound:C00562
  species $Cdc14 in compartment;  // isVersionOf uniprot:Q00684

  // Parameters:
  var Cdk; Cdk is "Cdk activity";
  ksclb2 = 0.03;
  kdclb2 = 0.03;
  kadclb2 = 0.2;
  kaadclb2 = 2;
  kscdc20 = 0.015;
  kdcdc20 = 0.05;
  kadcdc20 = 2;
  kdcdh = 0.01;
  kadcdh = 1;
  kapcdh = 1;
  Jcdh = 0.0015;
  Cdh1T = 1;
  kssecurin = 0.03;
  kdsecurin = 0.05;
  kadsecurin = 2;
  ksseparase = 0.001;
  kdseparase = 0.004;
  lasecurin = 500;
  ldsecurin = 1;
  kad = 0.1;
  kd = 0.45;
  kp = 0.4;
  kap = 2;
  Jnet = 0.2;
  lanet = 500;
  ldnet = 1;
  Net1T = 1;
  Cdc14T = 0.5;
  kspolo = 0.01;
  kdpolo = 0.01;
  kadpolo = 0.25;
  kapolo = 0;
  kaapolo = 0.5;
  kipolo = 0.1;
  Jpolo = 0.25;
  katem = 0;
  kaatem = 0.5;
  kitem = 0.1;
  kaitem = 1;
  Jtem1 = 0.005;
  Tem1T = 1;
  kacdc15 = 0.02;
  kaacdc15 = 0.5;
  kicdc15 = 0;
  kaicdc15 = 0.2;
  Jcdc15 = 0.2;
  lamen = 10;
  ldmen = 0.1;
  Cdc15T = 1;
  kpp = 0.1;
  ki = 20;
  PP2AT = 1;
  Inh = 0;

  // Assignment rules:
  separase := separaseT - securinseparase;
  Cdh1_i := Cdh1T - Cdh1;
  Tem1_i := Tem1T - Tem1;
  securin := securinT - securinseparase;
  Polo_i := PoloT - Polo;
  Cdk := Clb2/(1 + Inh);
  Net1P := Net1T - Net1 - Net1Cdc14;
  Cdc14 := Cdc14T - Net1Cdc14;
  Cdc15_i := Cdc15T - Cdc15;
  PP2A := (1 + kpp*ki*separase)/(1 + ki*separase)*PP2AT;

  // Reactions:
  v1: $AA -> Clb2; ksclb2;  // isVersionOf GO:0006412
  v2: Clb2 -> $degr; (kdclb2 + kadclb2*Cdc20 + kaadclb2*Cdh1)*Clb2;  // modifiers: Cdc20, Cdh1; isVersionOf GO:0030163
  v3: $AA -> Cdc20; kscdc20;  // isVersionOf GO:0006412
  v4: Cdc20 -> $degr; (kdcdc20 + kadcdc20*Cdh1)*Cdc20;  // modifiers: Cdh1; isVersionOf GO:0030163
  v5: $Cdh1_i -> Cdh1; (kdcdh + kadcdh*Cdc14)*((Cdh1T - Cdh1)/(Jcdh + Cdh1T - Cdh1));  // modifiers: Cdc14; isVersionOf GO:0006464
  v6: Cdh1 -> $Cdh1_i; kapcdh*Cdk*(Cdh1/(Jcdh + Cdh1));  // isVersionOf GO:0006464
  v7: $AA -> securinT + $securin; kssecurin;  // isVersionOf GO:0006412
  v8: securinT + $securin -> $degr; (kdsecurin + kadsecurin*Cdc20)*securinT;  // modifiers: Cdc20; isVersionOf GO:0030163
  v9: $AA -> separaseT + $separase; ksseparase;  // isVersionOf GO:0006412
  v10: separaseT + $separase -> $degr; kdseparase*separaseT;  // isVersionOf GO:0030163
  v11: $securin + $separase -> securinseparase; lasecurin*securin*separase - ldsecurin*securinseparase;  // isVersionOf GO:0006461
  securinseparase_securindegradation: securinseparase -> $separase; (kdsecurin + kadsecurin*Cdc20)*securinseparase;  // modifiers: Cdc20; isVersionOf GO:0043241
  securinseparase_separase_degradation: securinseparase -> $securin; kdseparase*securinseparase; securinseparase_separase_degradation is "securin:separase separase degradation";  // isVersionOf GO:0043241
  Net1P_dephosphorylation: $Net1P -> Net1; (kad*Cdc14 + kd*PP2A)*(Net1P/(Jnet + Net1P));  // modifiers: Cdc14, Clb2, PP2A; isVersionOf GO:0016311
  Net1_phosphorylation: Net1 -> $Net1P; (kp*Cdk + kap*MEN)*(Net1/(Jnet + Net1 + Net1Cdc14));  // modifiers: MEN, Net1Cdc14, Clb2; isVersionOf GO:0016310
  v15: Net1 -> Net1Cdc14; lanet*Net1*Cdc14;  // modifiers: Cdc14; isVersionOf GO:0006461
  v16: Net1Cdc14 -> Net1; ldnet*Net1Cdc14;  // isVersionOf GO:0043241
  Net1Cdc14_phosphorylation: Net1Cdc14 -> $Net1P; (kp*Cdk + kap*MEN)*(Net1Cdc14/(Jnet + Net1 + Net1Cdc14));  // modifiers: MEN, Net1, Clb2; isVersionOf GO:0016310
  v18: $AA -> PoloT + $Polo_i; kspolo;  // isVersionOf GO:0006412
  v19: PoloT + $Polo_i -> $degr; (kdpolo + kadpolo*Cdh1)*PoloT;  // modifiers: Cdh1; isVersionOf GO:0030163
  v20: $Polo_i -> Polo; (kapolo + kaapolo*Cdk)*((PoloT - Polo)/(Jpolo + PoloT - Polo));  // modifiers: PoloT; isVersionOf GO:0006464
  v21: Polo -> $Polo_i; kipolo*(Polo/(Jpolo + Polo));  // isVersionOf GO:0006464
  v22: Polo -> $degr; (kdpolo + kadpolo*Cdh1)*Polo;  // modifiers: Cdh1; isVersionOf GO:0030163
  v23: $Tem1_i -> Tem1; (katem + kaatem*Polo)*((Tem1T - Tem1)/(Jtem1 + Tem1T - Tem1));  // modifiers: Polo; isVersionOf GO:0006464
  v24: Tem1 -> $Tem1_i; (kitem + kaitem*PP2A)*(Tem1/(Jtem1 + Tem1));  // modifiers: PP2A; isVersionOf GO:0006464
  v25: $Cdc15_i -> Cdc15; (kacdc15 + kaacdc15*Cdc14)*((Cdc15T - Cdc15)/(Jcdc15 + Cdc15T - Cdc15));  // modifiers: Cdc14; isVersionOf GO:0006464
  v26: Cdc15 -> $Cdc15_i; (kicdc15 + kaicdc15*Cdk)*(Cdc15/(Jcdc15 + Cdc15));  // isVersionOf GO:0006464
  v27: $AA -> MEN; lamen*(Tem1 - MEN)*(Cdc15 - MEN);  // modifiers: Tem1, Cdc15; isVersionOf GO:0006412
  v28: MEN -> $degr; ldmen*MEN;  // isVersionOf GO:0030163
  Tem1_degradation_in_MEN: MEN -> ; (kitem + kaitem*PP2A)*(MEN/(Jtem1 + Tem1));  // modifiers: Tem1, PP2A; isVersionOf GO:0030163
  Cdc15_degradation_in_MEN: MEN -> ; (kicdc15 + kaicdc15*Cdk)*(MEN/(Jcdc15 + Cdc15));  // modifiers: Cdc15, Clb2; isVersionOf GO:0030163
end
