// SBML level 2 version 4

function Constant_flux_irreversible(v)
  v;
end
Constant_flux_irreversible is "Constant flux (irreversible)";

function function_1(substrate, Km, V)
  V*substrate/(Km + substrate);
end
function_1 is "Henri-Michaelis-Menten (irreversible)";

function Rate_Law_for_SARA_Phosph_1(k, rec, s, km)
  k*rec*s/(km + s);
end
Rate_Law_for_SARA_Phosph_1 is "Rate Law for SARA-Phosph [1]";

function Rate_Law_for_Rec_comp1_1(TGFbeta, k, s, s2)
  k*s*s2*TGFbeta;
end
Rate_Law_for_Rec_comp1_1 is "Rate Law for Rec_comp1 [1]";

function Rate_Law_for_Degradation(k1, substrate, modifier)
  k1*substrate*(1 + modifier);
end

function function_5(k, k1, m)
  k + k1*m;
end
function_5 is "Rate Law for flux and basicflux [1]";

function Rate_Law_for_fluxSmad7_1_1(k, k1, m, m2, m3)
  (k + k1*m)/(1 + m2 + m3);
end
Rate_Law_for_fluxSmad7_1_1 is "Rate Law for fluxSmad7_1 [1]";

model Model_1()
  // Wegner2012_TGFbetaSignalling_FeedbackLoops
  // This model is from the article:
  // Dynamics and feedback loops in the transforming growth factor β signaling pathway.
  // Wegner K, Bachmann A, Schad JU, Lucarelli P, Sahle S, Nickel P, Meyer C, Klingmüller U, Dooley S, Kummer U. Biophys Chem. 2012 Jan 5. 22284904 ,
  // Abstract:
  // Transforming growth factor β (TGF-β) ligands activate a signaling cascade with multiple cell context dependent outcomes. Disruption or disturbance leads to variant clinical disorders. To develop strategies for disease intervention, delineation of the pathway in further detail is required. Current theoretical models of this pathway describe production and degradation of signal mediating proteins and signal transduction from the cell surface into the nucleus, whereas feedback loops have not exhaustively been included. In this study we present a mathematical model to determine the relevance of feedback regulators (Arkadia, Smad7, Smurf1, Smurf2, SnoN and Ski) on TGF-β target gene expression and the potential to initiate stable oscillations within a realistic parameter space. We employed massive sampling of the parameters space to pinpoint crucial players for potential oscillations as well as transcriptional product levels. We identified Smad7 and Smurf2 with the highest impact on the dynamics. Based on these findings, we conducted preliminary time course experiments.
  // This model originates from BioModels Database: A Database of Annotated Published Models (http://www.ebi.ac.uk/biomodels/). It is copyright (c) 2005-2012 The BioModels.net Team.
  // For more information see the terms of use .
  // To cite BioModels Database, please use: Li C, Donizelli M, Rodriguez N, Dharuri H, Endler L, Chelliah V, Li L, He E, Henry A, Stefan MI, Snoep JL, Hucka M, Le Novère N, Laibe C (2010) BioModels Database: An enhanced, curated and annotated resource for published quantitative kinetic models. BMC Syst Biol., 4:92.
  // biomodels.db:MODEL1202090000
  // biomodels.db:BIOMD0000000410
  // isDescribedBy pubmed:22284904
  // hasTaxon taxonomy:10090 BTO:0000575
  // isVersionOf GO:0007179
  // hasProperty mamo:MAMO_0000046

  // Compartments:
  compartment _1 = 1; _1 is "cytoplasm";  // isVersionOf GO:0005737
  compartment _3 = 1; _3 is "nucleus";  // isVersionOf GO:0005634

  // Species:
  species _75 in _1 = 0; _75 is "TGF_RII";  // isVersionOf uniprot:Q62312
  species _79 in _1 = 0; _79 is "TGFbeta_TGF_RII";  // hasPart uniprot:Q62312 uniprot:P04202
  species _84 in _1 = 0; _84 is "TGF_RI";  // isVersionOf uniprot:Q64729
  species _96 in _1 = 0; _96 is "Rec_active";  // isVersionOf CHEBI:26523
  species _99 in _1 = 0; _99 is "Smad2_c";  // isVersionOf uniprot:Q62432
  species _101 in _1 = 0; _101 is "SARA";  // isHomologTo uniprot:A9XB08
  species _105 in _1 = 0; _105 is "Smad2_SARA";  // hasPart uniprot:A9XB08 uniprot:Q62432
  species _129 in _1 = 0; _129 is "pSmad2_c";  // isVersionOf uniprot:Q62432 kegg.compound:C00562
  species _147 in _1 = 0; _147 is "Smad4_c";  // isVersionOf uniprot:P97471
  species _153 in _1 = 0; _153 is "pSmad2_Smad4_c";  // isVersionOf kegg.compound:C00562; hasPart uniprot:P97471 uniprot:Q62432
  species _174 in _1 = 0; _174 is "Smad7_c";  // isVersionOf uniprot:O35253
  species _181 in _1 = 0; _181 is "Smad7_Smurf2_c";  // hasPart uniprot:A2A5Z6 uniprot:O35253
  species _198 in _1 = 0; _198 is "Rec_Smad7";  // hasPart uniprot:P04202 uniprot:Q64729 uniprot:Q62312 uniprot:O35253
  species Smurf2_c in _1 = 0;  // isVersionOf uniprot:A2A5Z6
  species SnoN_c in _1 = 0;  // isVersionOf uniprot:Q60979
  species Smad3_c in _1 = 0;  // isVersionOf uniprot:Q05CN3
  species pSmad3_c in _1 = 0;  // isVersionOf uniprot:Q05CN3 kegg.compound:C00562
  species Smad3_SARA in _1 = 0;  // hasPart uniprot:A9XB08 uniprot:Q05CN3
  species pSmad3_Smad4_c in _1 = 0;  // isVersionOf kegg.compound:C00562; hasPart uniprot:Q05CN3 uniprot:P97471
  species Ski_c in _1 = 0;  // isVersionOf uniprot:Q60698
  species Smad3_Ski_c in _1 = 0;  // hasPart uniprot:Q60698 uniprot:Q05CN3
  species Smurf1_c in _1 = 0;  // isVersionOf uniprot:A2A5Z6
  species Smad7_Smurf1_c in _1 = 0;  // hasPart uniprot:A2A5Z6 uniprot:O35253
  species pSmad2_Smad4_Ski_n in _1 = 0;  // isVersionOf kegg.compound:C00562; hasPart uniprot:Q60698 uniprot:P97471 uniprot:Q62432
  species Smad2_Ski_c in _1 = 0;  // hasPart uniprot:Q60698 uniprot:Q62432
  species pSmad2_SnoN_n in _1 = 0;  // isVersionOf kegg.compound:C00562; hasPart uniprot:Q60979 uniprot:Q62432
  species pSmad3_SnoN_n in _1 = 0;  // isVersionOf kegg.compound:C00562; hasPart uniprot:Q05CN3 uniprot:Q60979
  species Arkadia_c in _1 = 0;  // isVersionOf uniprot:Q99ML9
  species _5 in _3 = 0; _5 is "Smad4_n";  // isVersionOf uniprot:P97471
  species _9 in _3 = 0; _9 is "pSmad2_Smad4_n";  // isVersionOf kegg.compound:C00562; hasPart uniprot:P97471 uniprot:Q62432
  species _11 in _3 = 0; _11 is "SnoN_n";  // isVersionOf uniprot:Q60979
  species _13 in _3 = 0; _13 is "pSmad2_Smad4_SnoN_n";  // isVersionOf kegg.compound:C00562; hasPart uniprot:Q60979 uniprot:P97471 uniprot:Q62432
  species _15 in _3 = 0; _15 is "Smurf2_n";  // isVersionOf uniprot:A2A5Z6
  species _19 in _3 = 0; _19 is "pSmad2_n";  // isVersionOf kegg.compound:C00562; hasPart uniprot:Q62432
  species _21 in _3 = 0; _21 is "Smad2_n";  // hasPart uniprot:Q62432
  species _25 in _3 = 0; _25 is "Smad7_n";  // isVersionOf uniprot:O35253
  species _27 in _3 = 0; _27 is "Smad7_Smurf2_n";  // isVersionOf uniprot:A2A5Z6 uniprot:O35253
  species Smad4_SnoN_n in _3 = 0;  // hasPart uniprot:Q60979 uniprot:P97471
  species Smad3_n in _3 = 0;  // isVersionOf uniprot:Q05CN3
  species pSmad3_Smad4_n in _3 = 0;  // isVersionOf kegg.compound:C00562; hasPart uniprot:Q05CN3 uniprot:P97471
  species Smad4_Smad2_n in _3 = 0;  // hasPart uniprot:Q62432 uniprot:P97471
  species pSmad3_n in _3 = 0;  // isVersionOf uniprot:Q05CN3 kegg.compound:C00562
  species pSmad3_Smad4_SnoN_n in _3 = 0;  // isVersionOf kegg.compound:C00562; hasPart uniprot:Q60979 uniprot:P97471
  species Ski_n in _3 = 0;  // isVersionOf uniprot:Q60698
  species Smad4_Ski_n in _3 = 0;  // hasPart uniprot:P97471
  species Smurf1_n in _3 = 0;  // isVersionOf uniprot:A2A5Z6
  species Smad7_Smurf1_n in _3 = 0;  // hasPart uniprot:A2A5Z6 uniprot:O35253
  species pSmad3_Smad4_Ski_n in _3 = 0;  // isVersionOf kegg.compound:C00562; hasPart uniprot:Q60698 uniprot:Q05CN3 uniprot:P97471
  species Smad4_Smad3_n in _3 = 0;  // hasPart uniprot:Q05CN3 uniprot:P97471
  species freePromoters in _3 = 0.1;
  species inactivePromoters in _3 = 0;
  species geneProduct in _3 = 0;  // isVersionOf CCO:U0000003
  species Arkadia_n in _3 = 0;  // isVersionOf uniprot:Q99ML9

  // Parameters:
  TGFbeta = 0.01;
  var allSnoN;
  var allSmad7;
  var allSmurf2;
  var allSmad2;
  var allSmad4;
  var allPSmad3;
  var allSmad3;
  var allSmad4cyt;
  var allSmad4nuc;

  // Assignment rules:
  allSmad7 := _174 + _181 + _198 + _25 + _27;
  allSnoN := SnoN_c + _11 + Smad4_SnoN_n + Smad4_SnoN_n;
  allSmurf2 := _181 + Smurf2_c + _15 + _27;
  allSmad2 := _99 + _105 + _129 + _153 + _9 + _13 + _19 + _21 + Smad4_Smad2_n;
  allSmad4 := _147 + _153 + pSmad3_Smad4_c + _5 + _9 + pSmad3_Smad4_n + _13 + Smad4_SnoN_n + Smad4_Smad2_n + pSmad3_Smad4_SnoN_n + Smad4_Smad3_n + pSmad3_Smad4_Ski_n + Smad4_Ski_n;
  allPSmad3 := pSmad3_c + pSmad3_Smad4_c + pSmad3_Smad4_n + pSmad3_n + pSmad3_Smad4_SnoN_n + pSmad3_Smad4_Ski_n;
  allSmad3 := Smad3_c + pSmad3_c + Smad3_SARA + pSmad3_Smad4_c + Smad3_Ski_c + Smad3_n + pSmad3_Smad4_n + pSmad3_n + pSmad3_Smad4_SnoN_n + pSmad3_Smad4_Ski_n + Smad4_Smad3_n;
  allSmad4cyt := _147 + _153 + pSmad3_Smad4_c;
  allSmad4nuc := pSmad2_Smad4_Ski_n + _5 + _9 + _13 + pSmad3_Smad4_n + Smad4_SnoN_n + pSmad3_Smad4_n + Smad4_Smad2_n + pSmad3_Smad4_SnoN_n + Smad4_Ski_n + pSmad3_Smad4_Ski_n + pSmad3_Smad4_Ski_n + Smad4_Smad3_n;

  // Reactions:
  _29: Smad4_Smad3_n => _5 + 2 Smad3_n; _3*_29_k1*Smad4_Smad3_n; _29 is "Smad_dissoc3";  // isVersionOf GO:0043241
    _29_k1 = 0.0492;
  _31: _9 => Smad4_Smad2_n; _3*function_1(_9, _31_Km, _31_V); _31 is "Smad2_dephosphNuc";  // isVersionOf GO:0016311
    _31_Km = 40; _31_V = 2.34;
  _33: _9 + 2 _11 -> _13; _3*(_33_k1*_9*_11^2 - _33_k2*_13); _33 is "Smad_inhibComp2SnoN";  // isVersionOf GO:0006461
    _33_k1 = 1.6; _33_k2 = 1.6;
  _35: 3 _15 + pSmad2_SnoN_n => 3 _19; _35_k1*_15^3*pSmad2_SnoN_n; _35 is "SnoN_degrad2";  // isVersionOf GO:0009056
    _35_k1 = 0.232;
  _37: _5 + 2 _19 => _9; _3*_37_k1*_5*_19^2; _37 is "Smad_compNuc2";  // isVersionOf GO:0006461
    _37_k1 = 255.068;
  _39: _19 => _21; _3*function_1(_19, _39_Km, _39_V); _39 is "Smad2_dephosphNuc2";  // isVersionOf GO:0016311
    _39_Km = 0.53; _39_V = 3.51;
  _41: _21 + _15 => ; _3*_41_k1*_21*_15; _41 is "Smad2_degrad";  // isVersionOf GO:0009056
    _41_k1 = 0.2;
  _43: _15 + _25 -> _27; _3*(_43_k1*_15*_25 - _43_k2*_27); _43 is "Smad7-Smurf2";  // isVersionOf GO:0006461
    _43_k1 = 2.9; _43_k2 = 0.2;
  _77: 2 _75 => _79; _1*Rate_Law_for_Rec_comp1_1(TGFbeta, _77_k, _75, _75); _77 is "Rec_comp1";  // isVersionOf GO:0006461
    _77_k = 9.45;
  _86: _79 + 2 _84 -> _96; _1*(_86_k1*_79*_84^2 - _86_k2*_96); _86 is "Rec_comp2";  // isVersionOf GO:0006461
    _86_k1 = 0.03333; _86_k2 = 0.03333;
  _103: _101 + _99 -> _105; _1*(_103_k1*_101*_99 - _103_k2*_105); _103 is "SARA-comp2";  // isVersionOf GO:0006461
    _103_k1 = 1; _103_k2 = 0.1;
  _125: _99 => _129; _1*Rate_Law_for_SARA_Phosph_1(_125_k, _96, _99, _125_km); _125 is "Smad2_phosph";  // modifiers: _96; isVersionOf GO:0016310
    _125_k = 1000; _125_km = 0.0318;
  _132: _105 => _129 + _101; _1*Rate_Law_for_SARA_Phosph_1(_132_k, _96, _105, _132_km); _132 is "Smad2_phosphSARA";  // modifiers: _96; isVersionOf GO:0016310
    _132_k = 3.51; _132_km = 0.53;
  _139: _129 => _19; _139_k1*_129; _139 is "Smad2-P_transp";  // isVersionOf GO:0006810
    _139_k1 = 16.6;
  _149: _147 + 2 _129 => _153; _1*_149_k1*_147*_129^2; _149 is "Smad_compCyt2";  // isVersionOf GO:0006461
    _149_k1 = 1000;
  _156: _147 -> _5; _156_k1*_147 - _156_k2*_5; _156 is "Smad4_transp";  // isVersionOf GO:0006810
    _156_k1 = 0.156; _156_k2 = 0.156;
  _164: _153 => _9; _164_k1*_153; _164 is "Smad_compTransp2";  // isVersionOf GO:0006810
    _164_k1 = 0.16;
  _172: _25 -> _174; _172_k1*_25 - _172_k2*_174; _172 is "Smad7_transp";  // isVersionOf GO:0006810
    _172_k1 = 0.1; _172_k2 = 0.01;
  _178: _27 -> _181; _178_k1*_27 - _178_k2*_181; _178 is "Smad7-Smurf2_transp";  // isVersionOf GO:0006810
    _178_k1 = 1; _178_k2 = 0.01;
  _192: _181 + _96 => ; _1*_192_k1*_181*_96; _192 is "Rec_degrad1";  // isVersionOf GO:0009056
    _192_k1 = 1900;
  _194: _174 + _96 -> _198; _1*(_194_k1*_174*_96 - _194_k2*_198); _194 is "Rec_inhib";  // isVersionOf GO:0006461
    _194_k1 = 8.69; _194_k2 = 0.01;
  fluxRecII: => _75; _1*Constant_flux_irreversible(fluxRecII_v);  // isVersionOf GO:0032800
    fluxRecII_v = 0.00146;
  fluxSara: => _101; _1*function_5(fluxSara_k, fluxSara_k1, geneProduct);  // modifiers: geneProduct; isVersionOf GO:0006412
    fluxSara_k = 0.0001; fluxSara_k1 = 0.031;
  fluxSmad7: => _174; _1*Rate_Law_for_fluxSmad7_1_1(fluxSmad7_k, fluxSmad7_k1, geneProduct, Smad4_SnoN_n, Smad4_Ski_n);  // modifiers: geneProduct, Smad4_SnoN_n, Smad4_Ski_n; isVersionOf GO:0006412
    fluxSmad7_k = 0.0001; fluxSmad7_k1 = 0.1;
  fluxSmurf2: => Smurf2_c; _1*function_5(fluxSmurf2_k, fluxSmurf2_k1, geneProduct);  // modifiers: geneProduct; isVersionOf GO:0006412
    fluxSmurf2_k = 0.000228; fluxSmurf2_k1 = 0.0285;
  fluxSnoN: => SnoN_c; _1*function_5(fluxSnoN_k, fluxSnoN_k1, geneProduct);  // modifiers: geneProduct; isVersionOf GO:0006412
    fluxSnoN_k = 2e-5; fluxSnoN_k1 = 0.00055;
  fluxRecI: => _84; _1*Constant_flux_irreversible(fluxRecI_v);  // isVersionOf GO:0032800
    fluxRecI_v = 0.0125;
  Smad4_SnoN: _5 + _11 -> Smad4_SnoN_n; _3*(Smad4_SnoN_k1*_5*_11 - Smad4_SnoN_k2*Smad4_SnoN_n); Smad4_SnoN is "Smad4-SnoN";  // isVersionOf GO:0006461
    Smad4_SnoN_k1 = 1; Smad4_SnoN_k2 = 0.05288;
  Smad2_transp: _99 -> _21; Smad2_transp_k1*_99 - Smad2_transp_k2*_21;  // isVersionOf GO:0006810
    Smad2_transp_k1 = 0.156; Smad2_transp_k2 = 0.336;
  Rec_degrad: _96 => ; _1*Rec_degrad_k1*_96;  // isVersionOf GO:0009056
    Rec_degrad_k1 = 0.027778;
  RecI_degrad: _84 => ; _1*RecI_degrad_k1*_84;  // isVersionOf GO:0009056
    RecI_degrad_k1 = 0.027778;
  RecII_degrad: _75 => ; _1*RecII_degrad_k1*_75;  // isVersionOf GO:0009056
    RecII_degrad_k1 = 0.027778;
  Rec_recycl: _79 => 2 _75; _1*Rec_recycl_k1*_79;  // isVersionOf GO:0006461
    Rec_recycl_k1 = 0.03333;
  fluxSmad2: => _99; _1*Constant_flux_irreversible(fluxSmad2_v);  // isVersionOf GO:0006412
    fluxSmad2_v = 0.0156;
  fluxSmad4: => _147; _1*Constant_flux_irreversible(fluxSmad4_v);  // isVersionOf GO:0006412
    fluxSmad4_v = 0.01183;
  Smad4_degrad: _147 => ; _1*Smad4_degrad_k1*_147;  // isVersionOf GO:0009056
    Smad4_degrad_k1 = 0.1266;
  SARA_degrad: _101 => ; _1*SARA_degrad_k1*_101;  // isVersionOf GO:0009056
    SARA_degrad_k1 = 0.065;
  Smad2_dephospCyt: _129 => _99; _1*function_1(_129, Smad2_dephospCyt_Km, Smad2_dephospCyt_V);  // isVersionOf GO:0016311
    Smad2_dephospCyt_Km = 3.51; Smad2_dephospCyt_V = 0.53;
  SnoN_degrad: SnoN_c => ; _1*SnoN_degrad_k1*SnoN_c;  // isVersionOf GO:0009056
    SnoN_degrad_k1 = 0.232;
  Smurf2_transp: _15 -> Smurf2_c; Smurf2_transp_k1*_15 - Smurf2_transp_k2*Smurf2_c;  // isVersionOf GO:0006810
    Smurf2_transp_k1 = 0.2333; Smurf2_transp_k2 = 1.8056;
  Smad2_cyt_degrad: _99 => ; _1*Smad2_cyt_degrad_k1*_99;  // isVersionOf GO:0009056
    Smad2_cyt_degrad_k1 = 0.2;
  SnoN_trans: SnoN_c -> _11; SnoN_trans_k1*SnoN_c - SnoN_trans_k2*_11;  // isVersionOf GO:0006810
    SnoN_trans_k1 = 0.1; SnoN_trans_k2 = 0.2;
  fluxSmad3: => Smad3_c; _1*Constant_flux_irreversible(fluxSmad3_v);  // isVersionOf GO:0006412
    fluxSmad3_v = 0.04528;
  Smad3_cyt_degrad: Smad3_c => ; _1*Smad3_cyt_degrad_k1*Smad3_c;  // isVersionOf GO:0009056
    Smad3_cyt_degrad_k1 = 0.2;
  Smad3_dephospCyt: pSmad3_c => Smad3_c; _1*function_1(pSmad3_c, Smad3_dephospCyt_Km, Smad3_dephospCyt_V);  // isVersionOf GO:0016311
    Smad3_dephospCyt_Km = 3.51; Smad3_dephospCyt_V = 0.53;
  Smad3_dephospNuc: pSmad3_Smad4_n => Smad4_Smad3_n; _3*function_1(pSmad3_Smad4_n, Smad3_dephospNuc_Km, Smad3_dephospNuc_V);  // isVersionOf GO:0016311
    Smad3_dephospNuc_Km = 40; Smad3_dephospNuc_V = 2.34;
  Smad3_dephospNuc2: pSmad3_n => Smad3_n; _3*function_1(pSmad3_n, Smad3_dephospNuc2_Km, Smad3_dephospNuc2_V);  // isVersionOf GO:0016311
    Smad3_dephospNuc2_Km = 0.53; Smad3_dephospNuc2_V = 3.51;
  Smad3_phosph: Smad3_c => pSmad3_c; _1*Rate_Law_for_SARA_Phosph_1(Smad3_phosph_k, _96, Smad3_c, Smad3_phosph_km);  // modifiers: _96; isVersionOf GO:0016310
    Smad3_phosph_k = 1000; Smad3_phosph_km = 0.0318;
  Smad3_phosphSARA: Smad3_SARA => pSmad3_c + _101; _1*Rate_Law_for_SARA_Phosph_1(Smad3_phosphSARA_k, _96, Smad3_SARA, Smad3_phosphSARA_km);  // modifiers: _96; isVersionOf GO:0016310
    Smad3_phosphSARA_k = 3.51; Smad3_phosphSARA_km = 0.53;
  Smad3_degrad: Smad3_n => ; _3*Smad3_degrad_k1*Smad3_n;  // isVersionOf GO:0009056
    Smad3_degrad_k1 = 0.2;
  Smad3_transp: Smad3_c -> Smad3_n; Smad3_transp_k1*Smad3_c - Smad3_transp_k2*Smad3_n;  // isVersionOf GO:0006810
    Smad3_transp_k1 = 0.156; Smad3_transp_k2 = 0.336;
  SARA_comp3: _101 + Smad3_c -> Smad3_SARA; _1*(SARA_comp3_k1*_101*Smad3_c - SARA_comp3_k2*Smad3_SARA); SARA_comp3 is "SARA-comp3";  // isVersionOf GO:0006461
    SARA_comp3_k1 = 1; SARA_comp3_k2 = 0.1;
  Smad_dissoc2: Smad4_Smad2_n => _5 + 2 _21; _3*Smad_dissoc2_k1*Smad4_Smad2_n;  // isVersionOf GO:0006461
    Smad_dissoc2_k1 = 0.0492;
  Smad3_P_transp: pSmad3_c => pSmad3_n; Smad3_P_transp_k1*pSmad3_c; Smad3_P_transp is "Smad3-P-transp";  // isVersionOf GO:0006810
    Smad3_P_transp_k1 = 16.6;
  Smad_compCyt3: _147 + 2 pSmad3_c => pSmad3_Smad4_c; _1*Smad_compCyt3_k1*_147*pSmad3_c^2;  // isVersionOf GO:0006461
    Smad_compCyt3_k1 = 1000;
  Smad_compNuc3: _5 + 2 pSmad3_n => pSmad3_Smad4_n; _3*Smad_compNuc3_k1*_5*pSmad3_n^2;  // isVersionOf GO:0006461
    Smad_compNuc3_k1 = 255.068;
  Smad_inhibComp3SnoN: pSmad3_Smad4_n + 2 _11 -> pSmad3_Smad4_SnoN_n; _3*(Smad_inhibComp3SnoN_k1*pSmad3_Smad4_n*_11^2 - Smad_inhibComp3SnoN_k2*pSmad3_Smad4_SnoN_n);  // isVersionOf GO:0006461
    Smad_inhibComp3SnoN_k1 = 1.6; Smad_inhibComp3SnoN_k2 = 1.6;
  Smad_compTransp3: pSmad3_Smad4_c => pSmad3_Smad4_n; Smad_compTransp3_k1*pSmad3_Smad4_c;  // isVersionOf GO:0006810
    Smad_compTransp3_k1 = 0.16;
  SnoN_degrad3: pSmad3_SnoN_n => pSmad3_n; SnoN_degrad3_k1*pSmad3_SnoN_n;  // isVersionOf GO:0009056
    SnoN_degrad3_k1 = 0.232;
  Smad7_degrad: _174 => ; _1*Rate_Law_for_Degradation(Smad7_degrad_k1, _174, Arkadia_c);  // modifiers: Arkadia_c; isVersionOf GO:0009056
    Smad7_degrad_k1 = 0.1;
  Ski_degrad: Ski_c => ; _1*Ski_degrad_k1*Ski_c;  // isVersionOf GO:0009056
    Ski_degrad_k1 = 0.232;
  Ski_trans: Ski_c -> Ski_n; Ski_trans_k1*Ski_c - Ski_trans_k2*Ski_n;  // isVersionOf GO:0006810
    Ski_trans_k1 = 0.1; Ski_trans_k2 = 0.2;
  fluxSki: => Ski_c; _1*function_5(fluxSki_k, fluxSki_k1, geneProduct);  // modifiers: geneProduct; isVersionOf GO:0006412
    fluxSki_k = 2e-5; fluxSki_k1 = 0.00055;
  Smurf2_degrad: Smurf2_c => ; _1*Rate_Law_for_Degradation(Smurf2_degrad_k1, Smurf2_c, _174);  // modifiers: _174; isVersionOf GO:0009056
    Smurf2_degrad_k1 = 0.05;
  Smad4_Ski: _5 + Ski_n -> Smad4_Ski_n; _3*(Smad4_Ski_k1*_5*Ski_n - Smad4_Ski_k2*Smad4_Ski_n); Smad4_Ski is "Smad4-Ski";  // isVersionOf GO:0006461
    Smad4_Ski_k1 = 1; Smad4_Ski_k2 = 0.05288;
  Smad3_Ski_cyt: Smad3_c + Ski_c -> Smad3_Ski_c; _1*(Smad3_Ski_cyt_k1*Smad3_c*Ski_c - Smad3_Ski_cyt_k2*Smad3_Ski_c); Smad3_Ski_cyt is "Smad3-Ski_cyt";  // isVersionOf GO:0006461
    Smad3_Ski_cyt_k1 = 0.1; Smad3_Ski_cyt_k2 = 0.1;
  Smad7_Smurf1: Smurf1_n + _25 -> Smad7_Smurf1_n; _3*(Smad7_Smurf1_k1*Smurf1_n*_25 - Smad7_Smurf1_k2*Smad7_Smurf1_n); Smad7_Smurf1 is "Smad7-Smurf1";  // isVersionOf GO:0006461
    Smad7_Smurf1_k1 = 2.9; Smad7_Smurf1_k2 = 0.2;
  fluxSmurf1: => Smurf1_c; _1*function_5(fluxSmurf1_k, fluxSmurf1_k1, geneProduct);  // modifiers: geneProduct; isVersionOf GO:0006412
    fluxSmurf1_k = 0.0001; fluxSmurf1_k1 = 0.0022;
  Smad_inhibComp3Ski: pSmad3_Smad4_n + 2 Ski_n -> pSmad3_Smad4_Ski_n; _3*(Smad_inhibComp3Ski_k1*pSmad3_Smad4_n*Ski_n^2 - Smad_inhibComp3Ski_k2*pSmad3_Smad4_Ski_n);  // isVersionOf GO:0006461
    Smad_inhibComp3Ski_k1 = 1.6; Smad_inhibComp3Ski_k2 = 1.6;
  Rec_degrad2: Smad7_Smurf1_c + _96 => ; _1*Rec_degrad2_k1*Smad7_Smurf1_c*_96;  // isVersionOf GO:0009056
    Rec_degrad2_k1 = 1900;
  Smad7_Smurf1_transp: Smad7_Smurf1_n -> Smad7_Smurf1_c; Smad7_Smurf1_transp_k1*Smad7_Smurf1_n - Smad7_Smurf1_transp_k2*Smad7_Smurf1_c; Smad7_Smurf1_transp is "Smad7-Smurf1_transp";  // isVersionOf GO:0006810
    Smad7_Smurf1_transp_k1 = 1; Smad7_Smurf1_transp_k2 = 0.01;
  Smurf1_degrad: Smurf1_c => ; _1*Rate_Law_for_Degradation(Smurf1_degrad_k1, Smurf1_c, _174);  // modifiers: _174; isVersionOf GO:0009056
    Smurf1_degrad_k1 = 0.5;
  Smurf1_transp: Smurf1_n -> Smurf1_c; Smurf1_transp_k1*Smurf1_n - Smurf1_transp_k2*Smurf1_c;  // isVersionOf GO:0006810
    Smurf1_transp_k1 = 0.05; Smurf1_transp_k2 = 3;
  Smad3_freePromot: pSmad3_Smad4_n + freePromoters -> geneProduct; _3*(Smad3_freePromot_k1*pSmad3_Smad4_n*freePromoters - Smad3_freePromot_k2*geneProduct); Smad3_freePromot is "Smad3-freePromot";  // isVersionOf GO:0010843
    Smad3_freePromot_k1 = 0.463; Smad3_freePromot_k2 = 0.102;
  Smad2_freePromot: _9 + freePromoters -> geneProduct; _3*(Smad2_freePromot_k1*_9*freePromoters - Smad2_freePromot_k2*geneProduct); Smad2_freePromot is "Smad2-freePromot";  // isVersionOf GO:0010843
    Smad2_freePromot_k1 = 0.463; Smad2_freePromot_k2 = 0.102;
  Smad3_SnoN_freePromot: pSmad3_Smad4_SnoN_n + freePromoters -> inactivePromoters; _3*(Smad3_SnoN_freePromot_k1*pSmad3_Smad4_SnoN_n*freePromoters - Smad3_SnoN_freePromot_k2*inactivePromoters); Smad3_SnoN_freePromot is "Smad3-SnoN-freePromot";  // isVersionOf GO:0010843
    Smad3_SnoN_freePromot_k1 = 0.2; Smad3_SnoN_freePromot_k2 = 0.2;
  Smad2_SnoN_gene: _13 + freePromoters -> inactivePromoters; _3*(Smad2_SnoN_gene_k1*_13*freePromoters - Smad2_SnoN_gene_k2*inactivePromoters); Smad2_SnoN_gene is "Smad2-SnoN-gene";
    Smad2_SnoN_gene_k1 = 0.2; Smad2_SnoN_gene_k2 = 0.2;
  Smad3_Ski_freePromot: pSmad3_Smad4_Ski_n + freePromoters -> inactivePromoters; _3*(Smad3_Ski_freePromot_k1*pSmad3_Smad4_Ski_n*freePromoters - Smad3_Ski_freePromot_k2*inactivePromoters); Smad3_Ski_freePromot is "Smad3-Ski-freePromot";  // isVersionOf GO:0010843
    Smad3_Ski_freePromot_k1 = 0.2; Smad3_Ski_freePromot_k2 = 0.2;
  Smad_inhibComp2Ski: _9 + 2 Ski_n -> pSmad2_Smad4_Ski_n; Smad_inhibComp2Ski_k1*_9*Ski_n^2 - Smad_inhibComp2Ski_k2*pSmad2_Smad4_Ski_n;  // isVersionOf GO:0006461
    Smad_inhibComp2Ski_k1 = 1.6; Smad_inhibComp2Ski_k2 = 1.6;
  Smad2_Ski_gene: pSmad2_Smad4_Ski_n + freePromoters -> inactivePromoters; Smad2_Ski_gene_k1*pSmad2_Smad4_Ski_n*freePromoters - Smad2_Ski_gene_k2*inactivePromoters; Smad2_Ski_gene is "Smad2-Ski-gene";  // isVersionOf GO:0010843
    Smad2_Ski_gene_k1 = 0.2; Smad2_Ski_gene_k2 = 0.2;
  Smad4_freePromot: Smad4_Ski_n + freePromoters -> inactivePromoters; _3*(Smad4_freePromot_k1*Smad4_Ski_n*freePromoters - Smad4_freePromot_k2*inactivePromoters); Smad4_freePromot is "Smad4-freePromot";  // isVersionOf GO:0010843
    Smad4_freePromot_k1 = 0.1; Smad4_freePromot_k2 = 0.1;
  Smad2_Ski_cyt: _99 + Ski_c -> Smad2_Ski_c; _1*(Smad2_Ski_cyt_k1*_99*Ski_c - Smad2_Ski_cyt_k2*Smad2_Ski_c); Smad2_Ski_cyt is "Smad2-Ski_cyt";  // isVersionOf GO:0006461
    Smad2_Ski_cyt_k1 = 0.1; Smad2_Ski_cyt_k2 = 0.1;
  Smad2_Snon: 3 _19 + 3 _11 -> pSmad2_SnoN_n; Smad2_Snon_k1*_19^3*_11^3 - Smad2_Snon_k2*pSmad2_SnoN_n; Smad2_Snon is "Smad2-Snon";  // isVersionOf GO:0006461
    Smad2_Snon_k1 = 1; Smad2_Snon_k2 = 1;
  Smad3_Snon: 3 pSmad3_n + 3 _11 -> pSmad3_SnoN_n; Smad3_Snon_k1*pSmad3_n^3*_11^3 - Smad3_Snon_k2*pSmad3_SnoN_n; Smad3_Snon is "Smad3-Snon";  // isVersionOf GO:0006461
    Smad3_Snon_k1 = 1; Smad3_Snon_k2 = 1;
  Smad2_comp_degrad: _9 => ; _3*Smad2_comp_degrad_k1*_9; Smad2_comp_degrad is "Smad2-comp-degrad";  // isVersionOf GO:0009056
    Smad2_comp_degrad_k1 = 0.005;
  Samd3_comp_degrad: pSmad3_Smad4_n => ; _3*Samd3_comp_degrad_k1*pSmad3_Smad4_n; Samd3_comp_degrad is "Samd3-comp-degrad";  // isVersionOf GO:0009056
    Samd3_comp_degrad_k1 = 0.005;
  fluxArkadia: => Arkadia_c; _1*Constant_flux_irreversible(fluxArkadia_v);  // isVersionOf GO:0006412
    fluxArkadia_v = 2e-5;
  Arkadia_deg: Arkadia_c => ; _1*Arkadia_deg_k1*Arkadia_c;  // isVersionOf GO:0009056
    Arkadia_deg_k1 = 0.1;
  SnoN_deg2: pSmad2_SnoN_n + 3 Arkadia_n => 3 _19; SnoN_deg2_k1*pSmad2_SnoN_n*Arkadia_n^3; SnoN_deg2 is "SnoN-deg2";  // isVersionOf GO:0009056
    SnoN_deg2_k1 = 0.1;
  SnoN_deg3: pSmad3_SnoN_n + 3 Arkadia_n => pSmad3_n; SnoN_deg3_k1*pSmad3_SnoN_n*Arkadia_n^3; SnoN_deg3 is "SnoN-deg3";  // isVersionOf GO:0009056
    SnoN_deg3_k1 = 0.1;
  transArkadia: Arkadia_c -> Arkadia_n; transArkadia_k1*Arkadia_c - transArkadia_k2*Arkadia_n;  // isVersionOf GO:0006810
    transArkadia_k1 = 0.1; transArkadia_k2 = 0.1;

  // Unit definitions:
  unit time = 60 second;
  unit substance = 1e-6 mole;
end
