// SBML level 2 version 4
// dcterms:bibliographicCitation: http://identifiers.org/doi/10.1007/s10867-012-9264-x
// dcterms:bibliographicCitation: http://identifiers.org/pubmed/899

function arhenius_neg_feedb_tempvar(v, E, R, T2, T1, k, S, h)
  v*exp(E/R*(T2 - T1)/(T1*T2))/(k + S^h);
end

function arhenius_mass_action_tempvar(v, E, R, T2, T1, S)
  v*exp(E/R*(T2 - T1)/(T1*T2))*S;
end

function arhenius_tranls_temp_var(v, E, R, T2, T1, S)
  v*exp(E/R*(T2 - T1)/(T1*T2))*S;
end

function function_3(v, E, R, T2, T1, S, Km)
  v*exp(E/R*(T2 - T1)/(T1*T2))*S/(Km + S);
end
function_3 is "arhenius michaelis menten temp var";

function arhenius_complexf_temp_var(v, E, R, T2, T1, S1, S2, a)
  v*exp(E/R*(T2 - T1)/(T1*T2))*S1*S2^a;
end

model Model_1()
  // Heiland2012_CircadianClock_C.reinhardtii
  // This model is from the article:
  // Modeling temperature entrainment of circadian clocks using the Arrhenius equation and a reconstructed model from Chlamydomonas reinhardtii
  // Ines Heiland, Christian Bodenstein, Thomas Hinze, Olga Weisheit, Oliver Ebenhoeh, Maria Mittag and Stefan Schuster Journal of Biological Physics 4 March 2012; pp 1-16; doi: 10.1007/s10867-012-9264-x ,
  // Abstract:
  // Endogenous circadian rhythms allow living organisms to anticipate daily variations in their natural environment. Temperature regulation and entrainment mechanisms of circadian clocks are still poorly understood. To better understand the molecular basis of these processes, we built a mathematical model based on experimental data examining temperature regulation of the circadian RNA-binding protein CHLAMY1 from the unicellular green alga Chlamydomonas reinhardtii , simulating the effect of temperature on the rates by applying the Arrhenius equation. Using numerical simulations, we demonstrate that our model is temperature-compensated and can be entrained to temperature cycles of various length and amplitude. The range of periods that allow entrainment of the model depends on the shape of the temperature cycles and is larger for sinusoidal compared to rectangular temperature curves. We show that the response to temperature of protein (de)phosphorylation rates play a key role in facilitating temperature entrainment of the oscillator in Chlamydomonas reinhardtii . We systematically investigated the response of our model to single temperature pulses to explain experimentally observed phase response curves.
  // This model originates from BioModels Database: A Database of Annotated Published Models (http://www.ebi.ac.uk/biomodels/). It is copyright (c) 2005-2012 The BioModels.net Team.
  // For more information see the terms of use .
  // To cite BioModels Database, please use: Li C, Donizelli M, Rodriguez N, Dharuri H, Endler L, Chelliah V, Li L, He E, Henry A, Stefan MI, Snoep JL, Hucka M, Le Novère N, Laibe C (2010) BioModels Database: An enhanced, curated and annotated resource for published quantitative kinetic models. BMC Syst Biol., 4:92.
  // biomodels.db:MODEL1201130000
  // biomodels.db:BIOMD0000000411
  // isDescribedBy pubmed:23729908
  // hasTaxon taxonomy:3055
  // isVersionOf GO:0060086
  // hasProperty mamo:MAMO_0000046

  // Compartments:
  compartment default = 1;  // isVersionOf GO:0005623

  // Species:
  species $C3_Gene in default = 1;  // encodes uniprot:A8J6K7
  species C3_mRNA in default = 1;  // encodes uniprot:A8J6K7
  species C_3 in default = 1;  // isVersionOf uniprot:A8J6K7
  species C_3_P in default = 1;  // isVersionOf uniprot:A8J6K7 kegg.compound:C00562
  species $C_3_pre in default = 1;  // isVersionOf uniprot:A8J6K7
  species C1 in default = 1;  // isVersionOf uniprot:A8J2S3
  species $C1_mRNA in default = 1;  // encodes uniprot:A8J2S3
  species C1_phos_default in default = 1;  // isVersionOf uniprot:A8J2S3 kegg.compound:C00562
  species c1c3complex in default = 1;  // hasPart uniprot:A8J6K7 uniprot:A8J2S3
  species junk in default = 1;

  // Parameters:
  T = 291;
  v_phos = 1;
  V_dephos = 0.5;
  R = 8.31447;
  amplitude = 10;
  entrperiod = 24;
  var EAlow;
  var EAhigh;
  vphosdegr = 1;
  Ephos = 60000;
  Edephos = 67000;

  // Assignment rules:
  T2 := 296 + amplitude/2*sin(2*pi*time/entrperiod);
  EAlow := 50000;
  EAhigh := 84000;

  // Reactions:
  C3_phos: C_3 => C_3_P; default*arhenius_mass_action_tempvar(C3_phos_v, EAlow, R, T2, T, C_3);  // isVersionOf GO:0016310
    C3_phos_v = 0.1;
  C3_transk: $C3_Gene => C3_mRNA; default*arhenius_neg_feedb_tempvar(C3_transk_v, EAhigh, R, T2, T, k, C_3_P, h);  // modifiers: C_3_P; isVersionOf GO:0009299
    C3_transk_v = 2.6; k = 0.4; h = 2;
  C3_mRNADegr: C3_mRNA => junk; default*function_3(C3_mRNADegr_v, EAlow, R, T2, T, C3_mRNA, C3_mRNADegr_Km);  // isVersionOf GO:0006402
    C3_mRNADegr_v = 3; C3_mRNADegr_Km = 2;
  C3_degr: C_3 => junk; default*function_3(C3_degr_v, EAlow, R, T2, T, C_3, C3_degr_Km);  // isVersionOf GO:0030163
    C3_degr_v = 2.2; C3_degr_Km = 0.2;
  C3_phos_degr: C_3_P => junk; default*function_3(C3_phos_degr_v, EAlow, R, T2, T, C_3_P, C3_phos_degr_Km);  // isVersionOf GO:0030163
    C3_phos_degr_v = 1.5; C3_phos_degr_Km = 1.4;
  C3_transl: $C_3_pre => C_3; default*arhenius_tranls_temp_var(C3_transl_v, EAhigh, R, T2, T, C3_mRNA);  // modifiers: C3_mRNA; isVersionOf GO:0006412
    C3_transl_v = 5;
  C1_transl: $C1_mRNA => C1; default*arhenius_mass_action_tempvar(C1_transl_v, C1_transl_E, R, T2, T, C1_mRNA);  // isVersionOf GO:0006412
    C1_transl_v = 19; C1_transl_E = 67000;
  complexformation: C1_phos_default + C_3_P => c1c3complex; default*arhenius_complexf_temp_var(complexformation_v, EAhigh, R, T2, T, C1_phos_default, C_3_P, a);  // isVersionOf GO:0006461
    complexformation_v = 10; a = 2;
  C1_phos: C1 => C1_phos_default; default*arhenius_mass_action_tempvar(v_phos, Ephos, R, T2, T, C1);  // isVersionOf GO:0016310
  C1_degr: C1 => junk; default*function_3(C1_degr_v, C1_degr_E, R, T2, T, C1, C1_degr_Km);  // isVersionOf GO:0030163
    C1_degr_v = 30; C1_degr_E = 67000; C1_degr_Km = 2;
  complexdegr: c1c3complex => junk; default*function_3(complexdegr_v, complexdegr_E, R, T2, T, c1c3complex, complexdegr_Km);  // isVersionOf GO:0030163
    complexdegr_v = 20; complexdegr_E = 67000; complexdegr_Km = 4;
  C1_dephos: C1_phos_default => C1; default*arhenius_mass_action_tempvar(V_dephos, Edephos, R, T2, T, C1_phos_default);  // isVersionOf GO:0016311
  C1_phos_degr: C1_phos_default => junk; default*function_3(vphosdegr, C1_phos_degr_E, R, T2, T, C1_phos_default, C1_phos_degr_Km);  // isVersionOf GO:0030163
    C1_phos_degr_E = 67000; C1_phos_degr_Km = 1;

  // Unit definitions:
  unit time = 3600 second;
  unit substance = 1e-9 mole;
end
