// SBML level 2 version 4

function function_1(substrate, Km, V)
  V*substrate/(Km + substrate);
end
function_1 is "Henri-Michaelis-Menten (irreversible)";

model Model_1()
  // Mellor2012_LipooxygenasePathway
  // This model is from the article:
  // Reduction of off-flavor generation in soybean homogenates: a mathematical model.
  // Mellor N , Bligh F , Chandler I , Hodgman C J. Food Sci.2010 Sep; 75(7): R131-8; PMID: 2153556,
  // Abstract:
  // The generation of off-flavors in soybean homogenates such as n-hexanal via the lipoxygenase (LOX) pathway can be a problem in the processed food industry. Previous studies have examined the effect of using soybean varieties missing one or more of the 3 LOX isozymes on n-hexanal generation. A dynamic mathematical model of the soybean LOX pathway using ordinary differential equations was constructed using parameters estimated from existing data with the aim of predicting how n-hexanal generation could be reduced. Time-course simulations of LOX-null beans were run and compared with experimental results. Model L(2), L(3), and L(12) beans were within the range relative to the wild type found experimentally, with L(13) and L(23) beans close to the experimental range. Model L(1) beans produced much more n-hexanal relative to the wild type than those in experiments. Sensitivity analysis indicates that reducing the estimated K(m) parameter for LOX isozyme 3 (L-3) would improve the fit between model predictions and experimental results found in the literature. The model also predicts that increasing L-3 or reducing L-2 levels within beans may reduce n-hexanal generation. PRACTICAL APPLICATION: This work describes the use of mathematics to attempt to quantify the enzyme-catalyzed conversions of compounds in soybean homogenates into undesirable flavors, primarily from the compound n-hexanal. The effect of different soybean genotypes and enzyme kinetic constants was also studied, leading to recommendations on which combinations might minimize off-flavor levels and what further work might be carried out to substantiate these conclusions.
  // biomodels.db:MODEL1203230000
  // biomodels.db:BIOMD0000000415
  // isDescribedBy pubmed:21535565
  // isVersionOf GO:0019372
  // hasTaxon taxonomy:3847
  // hasProperty mamo:MAMO_0000046

  // Compartments:
  compartment compartment_1 = 1000;  // isVersionOf GO:0005623

  // Species:
  species LA in compartment_1 = 6.7e-5;  // isVersionOf CHEBI:17351
  species _13HOD_S_Z_E in compartment_1 = 0; _13HOD_S_Z_E is "13HOD-S(Z,E)";  // hasVersion CHEBI:35923
  species _13HOD_R_Z_E in compartment_1 = 0; _13HOD_R_Z_E is "13HOD-R(Z,E)";  // hasVersion CHEBI:35923
  species _13HOD_S_E_E in compartment_1 = 0; _13HOD_S_E_E is "13HOD-S(E,E)";  // hasVersion CHEBI:35923
  species _13HOD_R_E_E in compartment_1 = 0; _13HOD_R_E_E is "13HOD-R(E,E)";  // hasVersion CHEBI:35923
  species _9HOD_S_Z_E in compartment_1 = 0; _9HOD_S_Z_E is "9HOD-S(Z,E)";  // hasVersion CHEBI:35923
  species _9HOD_R_Z_E in compartment_1 = 0; _9HOD_R_Z_E is "9HOD-R(Z,E)";  // hasVersion CHEBI:35923
  species _9HOD_S_E_E in compartment_1 = 0; _9HOD_S_E_E is "9HOD-S(E,E)";  // hasVersion CHEBI:35923
  species _9HOD_R_E_E in compartment_1 = 0; _9HOD_R_E_E is "9HOD-R(E,E)";  // hasVersion CHEBI:35923
  species nHexanal in compartment_1 = 0;  // isVersionOf pubchem.compound:6184

  // Parameters:
  Km_L1 = 0.49; Km_L1 is "Km(L1)";
  Vm_L1 = 0.00825; Vm_L1 is "Vm(L1)";
  Km_L2 = 0.49; Km_L2 is "Km(L2)";
  Vm_L2 = 0.039; Vm_L2 is "Vm(L2)";
  Km_L3 = 0.49; Km_L3 is "Km(L3)";
  Vm_L3 = 0.00255; Vm_L3 is "Vm(L3)";
  Km_HPL = 0.05; Km_HPL is "Km(HPL)";
  Vm_HPL_SZE = 0.285; Vm_HPL_SZE is "Vm(HPL-SZE)";
  var Vm_HPL_RZE; Vm_HPL_RZE is "Vm(HPL-RZE)";

  // Assignment rules:
  Vm_HPL_RZE := 0.135*Vm_HPL_SZE;

  // Reactions:
  LOX1: LA => 0.574 _13HOD_S_Z_E + 0.144 _13HOD_R_Z_E + 0.05 _13HOD_S_E_E + 0.012 _13HOD_R_E_E + 0.162 _9HOD_S_Z_E + 0.04 _9HOD_R_Z_E + 0.014 _9HOD_S_E_E + 0.004 _9HOD_R_E_E; compartment_1*function_1(LA, Km_L1, Vm_L1);  // isVersionOf GO:0050665
  LOX2: LA => 0.751 _13HOD_S_Z_E + 0.023 _13HOD_R_Z_E + 0.025 _13HOD_S_E_E + 0.015 _13HOD_R_E_E + 0.127 _9HOD_S_Z_E + 0.026 _9HOD_R_Z_E + 0.018 _9HOD_S_E_E + 0.016 _9HOD_R_E_E; compartment_1*function_1(LA, Km_L2, Vm_L2);  // isVersionOf GO:0050665
  LOX3: LA => 0.068 _13HOD_S_Z_E + 0.059 _13HOD_R_Z_E + 0.136 _13HOD_S_E_E + 0.107 _13HOD_R_E_E + 0.218 _9HOD_S_Z_E + 0.218 _9HOD_R_Z_E + 0.098 _9HOD_S_E_E + 0.097 _9HOD_R_E_E; compartment_1*function_1(LA, Km_L3, Vm_L3);  // isVersionOf GO:0050665
  HPL: _13HOD_S_Z_E => nHexanal; compartment_1*function_1(_13HOD_S_Z_E, Km_HPL, Vm_HPL_SZE);
  HPL_RZE: _13HOD_R_Z_E => nHexanal; compartment_1*function_1(_13HOD_R_Z_E, Km_HPL, Vm_HPL_RZE); HPL_RZE is "HPL(RZE)";

  // Unit definitions:
  unit volume = 1e-3 litre;
  unit time = 60 second;
  unit substance = 1e-3 mole;
end
