// SBML level 2 version 4

model Ratushny2012_SPF_I()
  // This model is from the article:
  // Asymmetric positive feedback loops reliably control biological responses
  // Alexander V Ratushny, Ramsey A Saleem, Katherine Sitko, Stephen A Ramsey & John D Aitchison Mol Syst Biol. 2012 Apr 24;8:577. 22531117 ,
  // Abstract:
  // Positive feedback is a common mechanism enabling biological systems to respond to stimuli in a switch-like manner. Such systems are often characterized by the requisite formation of a heterodimer where only one of the pair is subject to feedback. This ASymmetric Self-UpREgulation (ASSURE) motif is central to many biological systems, including cholesterol homeostasis (LXRα/RXRα), adipocyte differentiation (PPARγ/RXRα), development and differentiation (RAR/RXR), myogenesis (MyoD/E12) and cellular antiviral defense (IRF3/IRF7). To understand why this motif is so prevalent, we examined its properties in an evolutionarily conserved transcriptional regulatory network in yeast (Oaf1p/Pip2p). We demonstrate that the asymmetry in positive feedback confers a competitive advantage and allows the system to robustly increase its responsiveness while precisely tuning the response to a consistent level in the presence of varying stimuli. This study reveals evolutionary advantages for the ASSURE motif, and mechanisms for control, that are relevant to pharmacologic intervention and synthetic biology applications.
  // To the extent possible under law, all copyright and related or neighbouring rights to this encoded model have been dedicated to the public domain worldwide. Please refer to CC0 Public Domain Dedication for more information.
  // In summary, you are entitled to use this encoded model in absolutely any manner you deem suitable, verbatim, or with modification, alone or embedded it in a larger context, redistribute it, commercially or not, in a restricted way or not.
  // To cite BioModels Database, please use: Li C, Donizelli M, Rodriguez N, Dharuri H, Endler L, Chelliah V, Li L, He E, Henry A, Stefan MI, Snoep JL, Hucka M, Le Novère N, Laibe C (2010) BioModels Database: An enhanced, curated and annotated resource for published quantitative kinetic models. BMC Syst Biol., 4:92.
  // biomodels.db:MODEL1203010004
  // biomodels.db:BIOMD0000000419
  // isDescribedBy pubmed:22531117
  // isVersionOf GO:0006355
  // hasTaxon taxonomy:4932
  // hasProperty mamo:MAMO_0000046

  // Compartments:
  compartment univ = 1;  // isVersionOf GO:0005623

  // Species:
  species P1 in univ = 10/univ;  // isVersionOf GO:0003675
  species P2 in univ = 10/univ;  // isVersionOf GO:0003675
  species Target in univ = 10/univ;

  // Parameters:
  Kd = 1e-5;
  Ksp = 0.001;
  h = 2;
  k0 = 0.1;
  ka = 40;
  ks = 10;
  ku = 0.1;
  s = 1000;

  // Assignment rules:
  dsp1ksp := Ksp/2*(1 + (s + P1*univ)/Ksp - ((1 + (s + P1*univ)/Ksp)^2 - 4*s*P1*univ/Ksp^2)^0.5);
  dsp1p2kd := Kd/2*(1 + (dsp1ksp + P2*univ)/Kd - ((1 + (dsp1ksp + P2*univ)/Kd)^2 - 4*dsp1ksp*P2*univ/Kd^2)^0.5);

  // Reactions:
  ___r1: => P1; ks*(k0 + (dsp1p2kd/ka)^h)/(1 + (dsp1p2kd/ka)^h);
  ___r2: P1 => ; ___r2___RATE__*P1;
    ___r2___RATE__ = 0.1;
  ___r3: => P2; ks*(k0 + (dsp1p2kd/ka)^h)/(1 + (dsp1p2kd/ka)^h);
  ___r4: P2 => ; ___r4___RATE__*P2;
    ___r4___RATE__ = 0.1;
  ___r5: => Target; ks*(k0 + (dsp1p2kd/ka)^h)/(1 + (dsp1p2kd/ka)^h);
  ___r6: Target => ; ___r6___RATE__*Target;
    ___r6___RATE__ = 0.1;
end
