// SBML level 2 version 4

function RUPE(Vmax, RU5P, X5P, Keq_RUPE, KRu5P, KX5P)
  Vmax*(RU5P - X5P/Keq_RUPE)/(RU5P + KRu5P*(1 + X5P/KX5P));
end

function PGDH(Vmax, K6PG1, KNADP, PGN, NADP, RU5P, NADPH, Kapp, BPG, KPGA23, ATP, KATP, K6PG2, KNADPH)
  Vmax/K6PG1/KNADP*(PGN*NADP - RU5P*NADPH/Kapp)/((1 + NADP/KNADP)*(1 + PGN/K6PG1 + BPG/KPGA23) + ATP/KATP + NADPH*(1 + PGN/K6PG2)/KNADPH);
end

function G6PDH(Vmax, KG6P, KNADP, G6P, NADP, PGN, NADPH, Kapp, ATP, KATP, KNADPH, BPG, KPGA23)
  Vmax/KG6P/KNADP*(G6P*NADP - PGN*NADPH/Kapp)/(1 + NADP*(1 + G6P/KG6P)/KNADP + ATP/KATP + NADPH/KNADPH + BPG/KPGA23);
end

function TKL(Vmax, R5P, X5P, GAP, S7P, Keq_TKL, K1, K2, K6, K3, K5, K4, K7)
  Vmax*(R5P*X5P - GAP*S7P/Keq_TKL)/((K1 + R5P)*X5P + (K2 + K6*S7P)*R5P + (K3 + K5*S7P)*GAP + K4*S7P + K7*X5P*GAP);
end

function PGI(Vmf, A, Kg6p, Vmr, P, Kf6p, E4P, Kery4p, F16P, Kfbp, PGN, Kpg)
  (Vmf*A/Kg6p - Vmr*P/Kf6p)/(1 + A/Kg6p + P/Kf6p + E4P/Kery4p + F16P/Kfbp + PGN/Kpg);
end

function TKL2(Vmax, E4P, X5P, GAP, F6P, Keq_TKL2, K1, K2, K6, K3, K5, K4, K7)
  Vmax*(E4P*X5P - GAP*F6P/Keq_TKL2)/((K1 + E4P)*X5P + (K2 + K6*F6P)*E4P + (K3 + K5*F6P)*GAP + K4*F6P + K7*X5P*GAP);
end

function HK(Vmf, Ka, Kb, A, B, P, Q, Kapp, Kp, Kq)
  Vmf/(Ka*Kb)*(A*B - P*Q/Kapp)/(1 + A/Ka + B/Kb + A*B/(Ka*Kb) + P/Kp + Q/Kq + P*Q/(Kp*Kq) + A*Q/(Ka*Kq) + P*B/(Kp*Kb));
end

function R5PI(Vmax, RU5P, R5P, Keq_R5PI, KRu5P, KR5P)
  Vmax*(RU5P - R5P/Keq_R5PI)/(RU5P + KRu5P*(1 + R5P/KR5P));
end

function GLUT(Vmaxf, GLC_e, GLC, keq, KGlc_e, KGlc)
  Vmaxf*(GLC_e - GLC/keq)/(KGlc_e*(1 + GLC/KGlc) + GLC_e);
end

function TAL(Vmax, S7P, GAP, E4P, F6P, Keq_TAL, K1, K2, K6, K3, K5, K4, K7)
  Vmax*(S7P*GAP - E4P*F6P/Keq_TAL)/((K1 + GAP)*S7P + (K2 + K6*F6P)*GAP + (K3 + K5*F6P)*E4P + K4*F6P + K7*S7P*E4P);
end

function PGLM(Vmaxf, G1P, KG1P, Vmaxr, G6P, KG6P)
  (Vmaxf*G1P/KG1P - Vmaxr*G6P/KG6P)/(1 + G1P/KG1P + G6P/KG6P);
end

function PRPPS(Vmax, R5P, ATP, PRPP, AMP, Kapp, KATP, KR5P)
  Vmax*(R5P*ATP - PRPP*AMP/Kapp)/((KATP + ATP)*(KR5P + R5P));
end

function GPa(Vmaxf, GLY, Pi, KiGLYf, KPi, Vmaxr, G1P, KGLYb, KiG1P, KiPi, KiGLYb)
  (Vmaxf*(GLY*Pi/(KiGLYf*KPi)) - Vmaxr*(GLY*G1P/(KGLYb*KiG1P)))/(1 + GLY/KiGLYf + Pi/KiPi + GLY/KiGLYb + G1P/KiG1P + GLY*Pi/(KiGLYf*KiPi) + GLY*G1P/(KiGLYb*KiG1P));
end

function GPb(Vmaxf, GLY, Pi, KiGLYf, KPi, Vmaxr, G1P, KiGLYb, KG1P, KiPi, KiG1P, AMP, nH, Kamp)
  (Vmaxf*(GLY*Pi/(KiGLYf*KPi)) - Vmaxr*(GLY*G1P/(KiGLYb*KG1P)))/(1 + GLY/KiGLYf + Pi/KiPi + GLY/KiGLYb + G1P/KiG1P + GLY*Pi/(KiGLYf*KPi) + GLY*G1P/(KiGLYb*KG1P))*(AMP^nH/Kamp)/(1 + AMP^nH/Kamp);
end

function FBA(Vmf, A, Kfbp, Vmr, P, Q, Kdhap, Kg3p)
  (Vmf*A/Kfbp - Vmr*P*Q/(Kdhap*Kg3p))/(1 + A/Kfbp + P/Kdhap + Q/Kg3p + P*Q/(Kdhap*Kg3p));
end

function TPI(Vf, GAP, Kms, Vr, DHAP, Kmp)
  (Vf*GAP/Kms - Vr*DHAP/Kmp)/(1 + GAP/Kms + DHAP/Kmp);
end

function GAPDH(Vmf, A, B, C, Knad, Kg3p, Kp, Vmr, P, Q, Kdpg, Knadh)
  (Vmf*A*B*C/(Knad*Kg3p*Kp) - Vmr*P*Q/(Kdpg*Knadh))/(1 + A/Knad + A*B/(Knad*Kg3p) + A*B*C/(Knad*Kg3p*Kp) + P*Q/(Kdpg*Knadh) + Q/Knadh);
end

function PGK(Vmf, A, B, alfa, Ka, Kb, Vmr, P, Q, beta, Kp, Kq)
  (Vmf*A*B/(alfa*Ka*Kb) - Vmr*P*Q/(beta*Kp*Kq))/(1 + A/Ka + B/Kb + A*B/(alfa*Ka*Kb) + P*Q/(beta*Kp*Kq) + P/Kp + Q/Kq);
end

function PFK(Vm, a, B, Katp, beta, F26P, alfa, Kf26bp, A, Kf6p, L, CIT, Kcit, Kiatp, Q, P, Kadp, Kfbp, Kapp)
  Vm*(a*B/Katp/(1 + a*B/Katp))*((1 + beta*a*F26P/(alfa*Kf26bp))/(1 + a*F26P/(alfa*Kf26bp)))*(a*A*(1 + a*F26P/(alfa*Kf26bp))/(Kf6p*(1 + a*F26P/Kf26bp))*(1 + a*A*(1 + a*F26P/(alfa*Kf26bp))/(Kf6p*(1 + a*F26P/Kf26bp)))^3/(L*(1 + a*CIT/Kcit)^4*(1 + a*B/Kiatp)^4/(1 + a*F26P/Kf26bp)^4 + (1 + a*A*(1 + a*F26P/(alfa*Kf26bp))/(Kf6p*(1 + a*F26P/Kf26bp)))^4) - a*Q*a*P/(Kadp*Kfbp*Kapp)/(a*Q/Kadp + a*P/Kfbp + a*Q*a*P/(Kadp*Kfbp) + 1));
end

function PGYM_1(Vmf, PG3, Kms, Vmr, PG2, Kmp)
  (Vmf*PG3/Kms - Vmr*PG2/Kmp)/(1 + PG3/Kms + PG2/Kmp);
end
PGYM_1 is "PGYM [1]";

function GS(Vmaxf, Kf, a, G1P, ATP, GLY, Pi, ADP, Keq, Kr)
  Vmaxf/Kf*a*G1P*a*ATP*a*GLY*(1 - (a*Pi)^2*a*ADP/(a*G1P*a*ATP*Keq))/(1 + a*G1P*a*ATP*a*GLY/Kf + a*GLY*(a*Pi)^2*a*ADP/Kr);
end

function ENO_1(Vmf, PG2, Kms, Vmr, PEP, Kmp)
  (Vmf*PG2/Kms - Vmr*PEP/Kmp)/(1 + PG2/Kms + PEP/Kmp);
end
ENO_1 is "ENO [1]";

function PK_1(Vm, B, Kadp, A, Kpep, L, Q, Kiatp, F16P, Kfbp, P, Katp, Kpyr, Kapp, a)
  Vm*(a*B/Kadp/(1 + a*B/Kadp)*(a*A/Kpep*(1 + a*A/Kpep)^3/(L*(1 + a*Q/Kiatp)^4/(1 + a*F16P/Kfbp)^4 + (1 + a*A/Kpep)^4)) - a*Q*a*P/(Katp*Kpyr*Kapp)/(a*Q/Katp + a*P/Kpyr + a*Q*a*P/(Katp*Kpyr) + 1));
end
PK_1 is "PK [1]";

function LDH_1(Vmf, A, B, alfa, Ka, Kb, Vmr, P, Q, beta, Kp, Kq)
  (Vmf*A*B/(alfa*Ka*Kb) - Vmr*P*Q/(beta*Kp*Kq))/(1 + A/Ka + B/Kb + A*B/(alfa*Ka*Kb) + P*Q/(beta*Kp*Kq) + P/Kp + Q/Kq);
end
LDH_1 is "LDH [1]";

function AK_1(Vf, ADP, ATP, AMP, Keq)
  Vf*ADP^2*(1 - ATP*AMP/Keq)/((1 + ADP)^2 + (1 + ATP)*(1 + AMP) - 1);
end
AK_1 is "AK [1]";

function DHase_1(Vf, NADH, NAD, Keq)
  Vf*NADH*(1 - NAD/(NADH*Keq))/(1 + NADH + 1 + NAD - 1);
end
DHase_1 is "DHase [1]";

function DPHase_1(Vf, NADPH, NADP, Keq)
  Vf*NADPH*(1 - NADP/(NADPH*Keq))/(1 + NADPH + 1 + NADP - 1);
end
DPHase_1 is "DPHase [1]";

function MPM_1(Vmf, PYR, y, Pi, ADP, O2, ATP, CO2, Keq)
  Vmf*PYR^(1/y)*Pi*ADP*O2^(5/(2*y))*(1 - ATP*CO2^(3/y)/(PYR^(1/y)*O2^(5/(2*y))*Pi*ADP*Keq))/((1 + PYR)^(1/y)*(1 + O2)^(5/(2*y))*(1 + Pi)*(1 + ADP) + (1 + ATP)*(1 + CO2)^(3/y) - 1);
end
MPM_1 is "MPM [1]";

model MODEL1210150000()
  // Mosca2012 - Central Carbon Metabolism Regulated by AKT
  // The role of the PI3K/Akt/PKB signalling pathway in oncogenesis has been extensively investigated and altered expression or mutations of many components of this pathway have been implicated in human cancers. Indeed, expression of constitutively active forms of Akt/PKB can prevent cell death upon growth factor withdrawal. PI3K/Akt/mTOR-mediated survival relies on a profound metabolic adaptation, including aerobic glycolysis. Here, the link between the PI3K/Akt/mTOR pathway, glycolysis, lactic acid production and nucleotide biosynthesis has been modelled, considering two states - high and low PI3K/Akt/mTOR activity. The high PI3K/Akt/mTOR activity represents cancer cell line where PI3K/Akt/mTOR promotes a high rate of glucose metabolism (condition H) and the low PI3K/Akt/mTOR activity is characterised by a lower glycolytic rate due to a reduced PI3K/Akt/mTOR signal (condition L). This model corresponds to the high PI3K/Akt/mTOR signal (condition H).
  // This model is described in the article:
  // Computational Modelling of the Metabolic States Regulated by the Kinase Akt.
  // Mosca E, Alfieri R, Maj C, Bevilacqua A, Canti G, Milanesi L.
  // Frontiers in Systems Biology. 2012 Oct 13
  // Abstract:
  // Signal transduction pathways and gene regulation determine a major reorganization of metabolic activities in order to support cell proliferation. Protein Kinase B (PKB), also known as Akt, participates in the PI3K/Akt/mTOR pathway, a master regulator of aerobic glycolysis and cellular biosynthesis, two activities shown by both normal and cancer proliferating cells. Not surprisingly considering its relevance for cellular metabolism, Akt/PKB is often found hyperactive in cancer cells. In the last decade, many efforts have been made to improve the understanding of the control of glucose metabolism and the identification of a therapeutic window between proliferating cancer cells and proliferating normal cells. In this context, we have modelled the link between the PI3K/Akt/mTOR pathway, glycolysis, lactic acid production and nucleotide biosynthesis. We used a computational model in order to compare two metabolic states generated by the specific variation of the metabolic fluxes regulated by the activity of the PI3K/Akt/mTOR pathway. One of the two states represented the metabolism of a growing cancer cell characterised by aerobic glycolysis and cellular biosynthesis, while the other state represented the same metabolic network with a reduced glycolytic rate and a higher mitochondrial pyruvate metabolism, as reported in literature in relation to the activity of the PI3K/Akt/mTOR. Some steps that link glycolysis and pentose phosphate pathway revealed their importance for controlling the dynamics of cancer glucose metabolism.
  // This model is hosted on BioModels Database and identified by: MODEL1210150000 .
  // To cite BioModels Database, please use: BioModels Database: An enhanced, curated and annotated resource for published quantitative kinetic models .
  // To the extent possible under law, all copyright and related or neighbouring rights to this encoded model have been dedicated to the public domain worldwide. Please refer to CC0 Public Domain Dedication for more information.
  // biomodels.db:MODEL1210150000
  // biomodels.db:BIOMD0000000426
  // isDescribedBy pubmed:23181020
  // isVersionOf GO:0019222 GO:0043491
  // hasTaxon taxonomy:9606 BTO:0000567
  // hasProperty mamo:MAMO_0000046

  // Compartments:
  compartment compartment_1 = 1;  // isVersionOf GO:0005623

  // Species:
  species GLC in compartment_1 = 0.000897;  // isVersionOf CHEBI:17234
  species G6P in compartment_1 = 0.00109;  // isVersionOf CHEBI:17665
  species $ADP in compartment_1;  // isVersionOf CHEBI:16761
  species ATP in compartment_1 = 0.0087;  // isVersionOf CHEBI:15422
  species F6P in compartment_1 = 3.62e-5;  // isVersionOf CHEBI:15946
  species F16P in compartment_1 = 0.000367;  // isVersionOf CHEBI:40595
  species E4P in compartment_1 = 0.00093;  // isVersionOf CHEBI:48153
  species PGN in compartment_1 = 0.0001;  // isVersionOf CHEBI:16938
  species $GLC_e in compartment_1 = 0.01;  // occursIn GO:0005783; isVersionOf CHEBI:17234
  species $NADP in compartment_1;  // isVersionOf CHEBI:25523
  species NADPH in compartment_1 = 1.87082e-5;  // isVersionOf CHEBI:16464
  species BPG in compartment_1 = 6.29e-5;  // isVersionOf pubchem.compound:683
  species RU5P in compartment_1 = 0.000143;  // isVersionOf CHEBI:58121
  species X5P in compartment_1 = 0.000242;  // isVersionOf CHEBI:57737
  species R5P in compartment_1 = 2.74e-5;  // isVersionOf CHEBI:58273
  species GAP in compartment_1 = 0.000153;  // isVersionOf CHEBI:17138
  species S7P in compartment_1 = 8.58e-5;  // isVersionOf CHEBI:15721
  species $NADH in compartment_1;  // isVersionOf CHEBI:16908
  species NAD in compartment_1 = 0.00134;  // isVersionOf CHEBI:13389
  species $AMP_compartment in compartment_1 = 0.00311;  // isVersionOf CHEBI:16027
  species $PRPP in compartment_1 = 0.001;  // isVersionOf pubchem.compound:7339
  species G1P in compartment_1 = 3.41e-5;  // isVersionOf CHEBI:16077
  species $Pi in compartment_1 = 0.02;  // isVersionOf CHEBI:18367
  species $GLY in compartment_1 = 0.2084037;  // isVersionOf CHEBI:28087
  species $CIT in compartment_1 = 0.00108;  // isVersionOf CHEBI:30769
  species $F26P in compartment_1 = 3.67e-6;  // isVersionOf pubchem.compound:105021
  species DHAP in compartment_1 = 0.000553;  // isVersionOf CHEBI:57642
  species PG3 in compartment_1 = 3.07e-5;  // isVersionOf CHEBI:17050
  species PG2 in compartment_1 = 4.98e-6;  // isVersionOf CHEBI:18117
  species PEP in compartment_1 = 5.79e-5;  // isVersionOf CHEBI:18021
  species PYR in compartment_1 = 0.00183;  // isVersionOf CHEBI:15361
  species $LAC in compartment_1 = 0.0155;  // isVersionOf CHEBI:24996
  species $CO2 in compartment_1 = 0.0214;  // isVersionOf CHEBI:16526
  species $O2 in compartment_1 = 6.5e-5;  // isVersionOf CHEBI:26689

  // Parameters:
  Atot = 0.0114;
  NPtot = 1.932e-5;
  Ntot = 0.001345;
  var GPa_Vr;
  GPa_Keq = 0.42;
  GPb_Keq = 16.62;
  var GPb_Vr;
  var FBA_Vr;
  var TPI_Vr;
  var GAPDH_Vr;
  var PGK_Vr;
  FBA_Keq = 0.0018;
  var PGI_Vmr;
  PGI_Keq = 0.0556;
  var PGLM_Vmr;
  PGLM_Keq = 17.2;
  scale1e3 = 1000;
  TPI_Keq = 0.381;
  GAPDH_Keq = 0.3574;
  PGK_Keq = 11.369;
  PGYM_Keq = 1.6491;
  var PGYM_Vr;
  ENO_Keq = 1.4127;
  var ENO_Vr;
  LDH_Keq = 3452.5;
  var LDH_Vr;
  var AMP;
  AKT = 1;
  AKT_MPM = 1;
  var GLUT_Vf;
  var HK_Vf;
  var PGI_Vmf;
  var G6PDH_Vf;
  var PGDH_Vf;
  var TKL_Vf;
  var TKL2_Vf;
  var FBA_Vf;
  var TPI_Vf;
  var GAPDH_Vf;
  var PGK_Vf;
  var GS_Vf;
  var PFK_Vf;
  var ENO_Vf;
  var PK_Vf;
  var LDH_Vf;
  var DHase_Vf;
  var DPHase_Vf;
  var MPM_Vf;
  PGK_Kp = 0.00013;
  PGK_Kq = 0.00027;
  PGK_Ka = 7.9e-5;
  PGK_Kb = 4e-5;
  ENO_Kmp = 6e-5;
  ENO_Kms = 3.8e-5;
  PGLM_Vmaxf = 7.364;
  PGLM_KG6P = 3e-5;
  PGLM_KG1P = 6.3e-5;
  GPa_Vmaxf = 0.03347;
  GPa_KiGLYb = 0.00015;
  GPa_KiG1P = 0.0101;
  GPa_KiGLYf = 0.0017;
  GPa_KPi = 0.004;
  GPb_Vmaxf = 0.01049;
  GPb_KiGLYb = 0.0044;
  GPb_KG1P = 0.0015;
  GPb_KiGLYf = 0.015;
  GPb_KiPi = 0.0046;
  FBA_Kdhap = 8e-5;
  FBA_Kg3p = 0.00016;
  FBA_Kfbp = 9e-6;
  TPI_Kmp = 0.0016;
  TPI_Kms = 0.00051;
  GAPDH_Kdpg = 2.2e-5;
  GAPDH_Knadh = 1e-5;
  GAPDH_Kg3p = 0.00019;
  GAPDH_Knad = 9e-5;
  GAPDH_Kp = 0.029;
  PGYM_Vmf = 154;
  PGYM_Kmp = 0.00012;
  PGYM_Kms = 0.00019;
  PGI_Kf6p = 5e-5;
  PGI_Kg6p = 0.0004;
  LDH_Kp = 0.0047;
  LDH_Kq = 7e-5;
  LDH_Ka = 2e-6;
  LDH_Kb = 0.0003;

  // Assignment rules:
  TKL_Vf := 1056*AKT;
  TKL2_Vf := 0.1761*AKT;
  PGK_Vf := 73.41*AKT;
  PK_Vf := 27.81*AKT;
  GLUT_Vf := 23.03*AKT;
  PFK_Vf := 107.6*AKT;
  PGK_Vr := PGK_Vf*PGK_Kp*PGK_Kq/(PGK_Ka*PGK_Kb*PGK_Keq);
  MPM_Vf := 9801000*AKT_MPM;
  PGDH_Vf := 31.02*AKT;
  ENO_Vf := 160.9*AKT;
  ENO_Vr := ENO_Vf*ENO_Kmp/(ENO_Kms*ENO_Keq);
  PGLM_Vmr := PGLM_Vmaxf*PGLM_KG6P/(PGLM_KG1P*PGLM_Keq);
  DPHase_Vf := 127800*AKT;
  NADP := NPtot - NADPH;
  ADP := Atot - ATP;
  NADH := Ntot - NAD;
  GPa_Vr := GPa_Vmaxf*GPa_KiGLYb*GPa_KiG1P/(GPa_KiGLYf*GPa_KPi*GPa_Keq);
  GPb_Vr := GPb_Vmaxf*GPb_KiGLYb*GPb_KG1P/(GPb_KiGLYf*GPb_KiPi*GPb_Keq);
  FBA_Vf := 14.63*AKT;
  FBA_Vr := FBA_Vf*FBA_Kdhap*FBA_Kg3p/(FBA_Keq*FBA_Kfbp);
  TPI_Vf := 5.976*AKT;
  TPI_Vr := TPI_Vf*TPI_Kmp/(TPI_Kms*TPI_Keq);
  GAPDH_Vf := 109.1*AKT;
  GAPDH_Vr := GAPDH_Vf*GAPDH_Kdpg*GAPDH_Knadh/(GAPDH_Kg3p*GAPDH_Knad*GAPDH_Kp*GAPDH_Keq);
  GS_Vf := 32040*AKT;
  DHase_Vf := 4982000*AKT;
  PGYM_Vr := PGYM_Vmf*PGYM_Kmp/(PGYM_Kms*PGYM_Keq);
  HK_Vf := 86.85*AKT;
  G6PDH_Vf := 1.008*AKT;
  PGI_Vmf := 7778*AKT;
  PGI_Vmr := PGI_Vmf*(PGI_Kf6p/(PGI_Kg6p*PGI_Keq));
  AMP := AMP_compartment;
  LDH_Vf := 340.3*AKT;
  LDH_Vr := LDH_Vf*LDH_Kp*LDH_Kq/(LDH_Ka*LDH_Kb*LDH_Keq);

  // Reactions:
  reaction_1: $GLC_e -> GLC; compartment_1*GLUT(GLUT_Vf, GLC_e, GLC, keq, KGlc_e, KGlc); reaction_1 is "GLUT";  // isVersionOf GO:0015758
    keq = 1; KGlc_e = 0.01; KGlc = 0.0093;
  reaction_2: GLC + ATP -> G6P + $ADP; compartment_1*HK(HK_Vf, Ka, Kb, GLC, ATP, G6P, ADP, reaction_2_Kapp, Kp, Kq); reaction_2 is "HK";  // isVersionOf GO:0004396
    Ka = 0.0001; Kb = 0.0011; reaction_2_Kapp = 651; Kp = 2e-5; Kq = 0.0035;
  reaction_3: G6P -> F6P; compartment_1*PGI(PGI_Vmf, G6P, PGI_Kg6p, PGI_Vmr, F6P, PGI_Kf6p, E4P, Kery4p, F16P, reaction_3_Kfbp, PGN, Kpg); reaction_3 is "PGI";  // modifiers: E4P, F16P, PGN; isVersionOf GO:0004347
    Kery4p = 1e-6; reaction_3_Kfbp = 6e-5; Kpg = 1.5e-5;
  reaction_4: G6P + $NADP -> PGN + NADPH; compartment_1*G6PDH(G6PDH_Vf, KG6P, reaction_4_KNADP, G6P, NADP, PGN, NADPH, reaction_4_Kapp, ATP, reaction_4_KATP, reaction_4_KNADPH, BPG, reaction_4_KPGA23); reaction_4 is "G6PDH";  // modifiers: ATP, BPG; isVersionOf GO:0004345
    KG6P = 6.67e-8; reaction_4_KNADP = 3.67e-9; reaction_4_Kapp = 2000; reaction_4_KATP = 7.49e-7; reaction_4_KNADPH = 3.12e-9; reaction_4_KPGA23 = 2.289e-6;
  reaction_5: PGN + $NADP -> RU5P + NADPH; compartment_1*PGDH(PGDH_Vf, K6PG1, reaction_5_KNADP, PGN, NADP, RU5P, NADPH, reaction_5_Kapp, BPG, reaction_5_KPGA23, ATP, reaction_5_KATP, K6PG2, reaction_5_KNADPH); reaction_5 is "PGDH";  // modifiers: BPG, ATP; isVersionOf GO:0017057
    K6PG1 = 1e-8; reaction_5_KNADP = 1.8e-8; reaction_5_Kapp = 141.7; reaction_5_KPGA23 = 1.2e-7; reaction_5_KATP = 1.54e-7; K6PG2 = 5.8e-8; reaction_5_KNADPH = 4.5e-9;
  reaction_6: RU5P -> X5P; compartment_1*RUPE(reaction_6_Vmax, RU5P, X5P, Keq_RUPE, reaction_6_KRu5P, KX5P); reaction_6 is "RUPE";  // isVersionOf GO:0008742
    reaction_6_Vmax = 1.471; Keq_RUPE = 2.7; reaction_6_KRu5P = 1.9e-7; KX5P = 5e-7;
  reaction_7: RU5P -> R5P; compartment_1*R5PI(reaction_7_Vmax, RU5P, R5P, Keq_R5PI, reaction_7_KRu5P, reaction_7_KR5P); reaction_7 is "R5PI";  // isVersionOf GO:0004751
    reaction_7_Vmax = 0.7646; Keq_R5PI = 3; reaction_7_KRu5P = 7.8e-7; reaction_7_KR5P = 2.2e-6;
  reaction_8: R5P + X5P -> GAP + S7P; compartment_1*TKL(TKL_Vf, R5P, X5P, GAP, S7P, Keq_TKL, reaction_8_K1, reaction_8_K2, reaction_8_K6, reaction_8_K3, reaction_8_K5, reaction_8_K4, reaction_8_K7); reaction_8 is "TKL";  // isVersionOf GO:0004802
    Keq_TKL = 2.08; reaction_8_K1 = 4.177e-7; reaction_8_K2 = 3.055e-7; reaction_8_K6 = 0.00774; reaction_8_K3 = 1.2432e-5; reaction_8_K5 = 0.41139; reaction_8_K4 = 4.96e-9; reaction_8_K7 = 48.8;
  reaction_9: X5P + E4P -> GAP + F6P; compartment_1*TKL2(TKL2_Vf, E4P, X5P, GAP, F6P, Keq_TKL2, reaction_9_K1, reaction_9_K2, reaction_9_K6, reaction_9_K3, reaction_9_K5, reaction_9_K4, reaction_9_K7); reaction_9 is "TKL2";  // isVersionOf GO:0004802
    Keq_TKL2 = 29.7; reaction_9_K1 = 1.84e-9; reaction_9_K2 = 3.055e-7; reaction_9_K6 = 0.122; reaction_9_K3 = 5.48e-8; reaction_9_K5 = 0.0287; reaction_9_K4 = 3e-10; reaction_9_K7 = 0.215;
  reaction_10: S7P + GAP -> F6P + E4P; compartment_1*TAL(reaction_10_Vmax, S7P, GAP, E4P, F6P, Keq_TAL, reaction_10_K1, reaction_10_K2, reaction_10_K6, reaction_10_K3, reaction_10_K5, reaction_10_K4, reaction_10_K7); reaction_10 is "TAL";  // isVersionOf GO:0004801
    reaction_10_Vmax = 58.27; Keq_TAL = 2.703; reaction_10_K1 = 8.23e-9; reaction_10_K2 = 4.765e-8; reaction_10_K6 = 0.4653; reaction_10_K3 = 1.733e-7; reaction_10_K5 = 0.8683; reaction_10_K4 = 6.095e-9; reaction_10_K7 = 2.524;
  reaction_11: R5P + ATP -> $AMP_compartment + $PRPP; compartment_1*PRPPS(reaction_11_Vmax, R5P, ATP, PRPP, AMP_compartment, reaction_11_Kapp, reaction_11_KATP, reaction_11_KR5P); reaction_11 is "PRPPS";  // isVersionOf GO:0004749
    reaction_11_Vmax = 0.5104; reaction_11_Kapp = 100000; reaction_11_KATP = 3e-8; reaction_11_KR5P = 5.7e-7;
  reaction_12: G1P -> G6P; compartment_1*PGLM(PGLM_Vmaxf, G1P, PGLM_KG1P, PGLM_Vmr, G6P, PGLM_KG6P); reaction_12 is "PGLM";  // isVersionOf GO:0004614
  reaction_13: $GLY + $Pi -> $GLY + G1P; compartment_1*GPa(GPa_Vmaxf, GLY, Pi, GPa_KiGLYf, GPa_KPi, GPa_Vr, G1P, KGLYb, GPa_KiG1P, KiPi, GPa_KiGLYb); reaction_13 is "GPa";  // isVersionOf GO:0008184
    KGLYb = 0.00015; KiPi = 0.0047;
  reaction_14: F16P -> GAP + DHAP; compartment_1*FBA(FBA_Vf, F16P, FBA_Kfbp, FBA_Vr, DHAP, GAP, FBA_Kdhap, FBA_Kg3p); reaction_14 is "FBA";  // isVersionOf GO:0097023
  reaction_15: GAP -> DHAP; compartment_1*TPI(TPI_Vf, GAP, TPI_Kms, TPI_Vr, DHAP, TPI_Kmp); reaction_15 is "TPI";  // isVersionOf GO:0004807
  reaction_16: GAP + NAD + $Pi -> BPG + $NADH; compartment_1*GAPDH(GAPDH_Vf, NAD, GAP, Pi, GAPDH_Knad, GAPDH_Kg3p, GAPDH_Kp, GAPDH_Vr, BPG, NADH, GAPDH_Kdpg, GAPDH_Knadh); reaction_16 is "GAPDH";  // isVersionOf GO:0004365
  reaction_17: BPG + $ADP -> PG3 + ATP; compartment_1*PGK(PGK_Vf, BPG, ADP, reaction_17_alfa, PGK_Ka, PGK_Kb, PGK_Vr, PG3, ATP, reaction_17_beta, PGK_Kp, PGK_Kq); reaction_17 is "PGK";  // isVersionOf GO:0004618
    reaction_17_alfa = 1; reaction_17_beta = 1;
  reaction_18: $GLY + $Pi -> $GLY + G1P; compartment_1*GPb(GPb_Vmaxf, GLY, Pi, GPb_KiGLYf, KPi, GPb_Vr, G1P, GPb_KiGLYb, GPb_KG1P, GPb_KiPi, KiG1P, AMP, nH, Kamp); reaction_18 is "GPb";  // isVersionOf GO:0008184
    KPi = 0.0002; KiG1P = 0.0074; nH = 1.75; Kamp = 1.9e-12;
  reaction_19: G1P + ATP -> $GLY + $ADP + 2 $Pi; compartment_1*GS(GS_Vf, Kf, scale1e3, G1P, ATP, GLY, Pi, ADP, reaction_19_Keq, Kr); reaction_19 is "GS";  // isVersionOf GO:0009011
    Kf = 17400; reaction_19_Keq = 267100; Kr = 158;
  reaction_20: F6P + ATP -> F16P + $ADP; compartment_1*PFK(PFK_Vf, scale1e3, ATP, reaction_20_Katp, reaction_20_beta, F26P, reaction_20_alfa, Kf26bp, F6P, Kf6p, reaction_20_L, CIT, Kcit, reaction_20_Kiatp, ADP, F16P, reaction_20_Kadp, reaction_20_Kfbp, reaction_20_Kapp); reaction_20 is "PFK";  // modifiers: F26P, CIT; isVersionOf GO:0008443
    reaction_20_Katp = 2.1e-5; reaction_20_beta = 0.98; reaction_20_alfa = 0.32; Kf26bp = 8.4e-7; Kf6p = 1; reaction_20_L = 4.1; Kcit = 6.8; reaction_20_Kiatp = 20; reaction_20_Kadp = 5; reaction_20_Kfbp = 5; reaction_20_Kapp = 247;
  PGYM: PG3 -> PG2; compartment_1*PGYM_1(PGYM_Vmf, PG3, PGYM_Kms, PGYM_Vr, PG2, PGYM_Kmp);  // isVersionOf GO:0004619
  ENO: PG2 -> PEP; compartment_1*ENO_1(ENO_Vf, PG2, ENO_Kms, ENO_Vr, PEP, ENO_Kmp);  // isVersionOf GO:0004634
  PK: PEP + $ADP -> PYR + ATP; compartment_1*PK_1(PK_Vf, ADP, PK_Kadp, PEP, Kpep, PK_L, ATP, PK_Kiatp, F16P, PK_Kfbp, PYR, PK_Katp, Kpyr, PK_Kapp, scale1e3);  // modifiers: F16P; isVersionOf GO:0008443
    PK_Kadp = 0.4; Kpep = 0.014; PK_L = 1; PK_Kiatp = 2.5; PK_Kfbp = 0.0004; PK_Katp = 0.86; Kpyr = 10; PK_Kapp = 195172;
  LDH: PYR + $NADH -> $LAC + NAD; compartment_1*LDH_1(LDH_Vf, NADH, PYR, LDH_alfa, LDH_Ka, LDH_Kb, LDH_Vr, LAC, NAD, LDH_beta, LDH_Kp, LDH_Kq);  // isVersionOf GO:0004457
    LDH_alfa = 1; LDH_beta = 1;
  AK: 2 $ADP -> ATP + $AMP_compartment; compartment_1*AK_1(Vf, ADP, ATP, AMP_compartment, AK_Keq);  // isVersionOf GO:0004017
    Vf = 141.2; AK_Keq = 2.26;
  DHase: $NADH -> NAD; compartment_1*DHase_1(DHase_Vf, NADH, NAD, DHase_Keq);  // isVersionOf GO:0006116
    DHase_Keq = 300;
  DPHase: NADPH -> $NADP; compartment_1*DPHase_1(DPHase_Vf, NADPH, NADP, DPHase_Keq);  // isVersionOf GO:0070995
    DPHase_Keq = 0.2;
  MPM: 0.08 PYR + 0.2 $O2 + $Pi + $ADP -> 0.24 $CO2 + ATP; compartment_1*MPM_1(MPM_Vf, PYR, y, Pi, ADP, O2, ATP, CO2, MPM_Keq);  // isVersionOf GO:0004739
    y = 12.5; MPM_Keq = 1000000;
  ATPase: ATP => $ADP + $Pi; compartment_1*k1*ATP;  // isVersionOf GO:0016887
    k1 = 6210;

  // Unit definitions:
  unit volume = 1e-9 litre;
  unit time = 60 second;
  unit substance = 1e-9 mole;
end
