// SBML level 2 version 4

function _1_para_inh_Mass_action_rrev(ko, k, S, M, Ki, h)
  ko*k*S/(1 + (M/Ki)^h);
end
_1_para_inh_Mass_action_rrev is "1 para inh Mass action (rrev)";

function _3_param_mass_action_irrev(ko, k, M, S)
  ko*k*M*S;
end
_3_param_mass_action_irrev is "3 param mass action (irrev)";

function function_8(ko, k, M1, S1, S2, M2, Ki, h)
  ko*k*M1*S1*S2/(1 + (M2/Ki)^h);
end
function_8 is "2 param 2 S MA with inhibition (irrev)";

function Modified_constant_flux_irrev(k, M)
  k*M;
end
Modified_constant_flux_irrev is "Modified constant flux (irrev)";

function transport_rev(A, P, S, f, ks)
  f*ks*A*(S - P);
end
transport_rev is "transport (rev)";

function Modified_mass_action_irrev(k, M, S)
  k*M*S;
end
Modified_mass_action_irrev is "Modified mass action (irrev)";

function function_5(k1, M1, k2, M2, Km)
  k1*M1*(1 + k2*M2)/(Km + M1*(1 + k2*M2));
end
function_5 is "2 param mod. add. constant flux MM (irrev)";

function mod_constat_flux_MM_irrev(k, M, Km)
  k*M/(Km + M);
end
mod_constat_flux_MM_irrev is "mod. constat flux (MM) (irrev)";

function mod_MA_OR_irrev(k1, M1, S, k2, M2)
  k1*M1*S + k2*M2*S;
end
mod_MA_OR_irrev is "mod. MA OR (irrev)";

function function_1(ko, k, M1, S, M2, h, Ki)
  ko*k*M1*S/(1 + (M2/Ki)^h);
end
function_1 is "3 param activation with inhibition (iirev)";

model MODEL1209110001()
  // Schaber2012 - Hog pathway in yeast
  // The high osmolarity glycerol (HOG) pathway in the yeast Saccharomyces cerevisiae is one of the best-studied mitogen-activated protein kinase (MAPK) pathways and serves as a prototype signalling system for eukaryotes. This pathway is necessary and sufficient to adapt to high external osmolarity. A key component of this pathway is the stress-activated protein kinase (SAPK) Hog1, which is rapidly phosphorylated by the SAPK kinase Pbs2 upon hyper-osmotic shock, and which is the terminal kinase of two parallel signalling pathways, subsequently called the Sho1 branch and the Sln1 branch, respectively. Ensemble modelling (192 models) is used to study the yeast HOG pathway, a prototype for eukaryotic mitogen-activated kinase signalling systems. The best fit model (Model Nr.22: described here) provides new insights into the function of this system, some of which are then experimentally validated.
  // This model is described in the article:
  // Modelling reveals novel roles of two parallel signalling pathways and homeostatic feedbacks in yeast.
  // Schaber J, Baltanas R, Bush A, Klipp E, Colman-Lerner A.
  // Mol Syst Biol. 2012 Nov 13;8:622.
  // Abstract:
  // The high osmolarity glycerol (HOG) pathway in yeast serves as a prototype signalling system for eukaryotes. We used an unprecedented amount of data to parameterise 192 models capturing different hypotheses about molecular mechanisms underlying osmo-adaptation and selected a best approximating model. This model implied novel mechanisms regulating osmo-adaptation in yeast. The model suggested that (i) the main mechanism for osmo-adaptation is a fast and transient non-transcriptional Hog1-mediated activation of glycerol production, (ii) the transcriptional response serves to maintain an increased steady-state glycerol production with low steady-state Hog1 activity, and (iii) fast negative feedbacks of activated Hog1 on upstream signalling branches serves to stabilise adaptation response. The best approximating model also indicated that homoeostatic adaptive systems with two parallel redundant signalling branches show a more robust and faster response than single-branch systems. We corroborated this notion to a large extent by dedicated measurements of volume recovery in single cells. Our study also demonstrates that systematically testing a model ensemble against data has the potential to achieve a better and unbiased understanding of molecular mechanisms.
  // This model is hosted on BioModels Database and identified by: MODEL1209110001 .
  // To cite BioModels Database, please use: BioModels Database: An enhanced, curated and annotated resource for published quantitative kinetic models .
  // To the extent possible under law, all copyright and related or neighbouring rights to this encoded model have been dedicated to the public domain worldwide. Please refer to CC0 Public Domain Dedication for more information.
  // biomodels.db:MODEL1209110001
  // biomodels.db:BIOMD0000000429
  // isDescribedBy pubmed:23149687
  // isVersionOf GO:0000161
  // hasTaxon taxonomy:4932
  // hasProperty mamo:MAMO_0000046

  // Compartments:
  // Osmolytically active volume, derived from a total cell volume of 50 fl and a solid base volume of 41%.
  compartment Vos = Vos_0;  // isVersionOf GO:0005623
  compartment Vex = 1000*V;  // isVersionOf GO:0005576
  // Total cell volume.
  compartment V;  // isVersionOf GO:0005623
  compartment M = 1;  // isVersionOf GO:0005886

  // Species:
  // Intracellular glycerol, approximated by assuming a measured value of 0.1 mM/OD in 1 ml sample (Klipp, et al., 2005) and assuming
  // 18•106 cells per ml sample culture and an average osmotic cell volume of 29.5 fl, i.e. 1/18/29.5•108.
  substanceOnly species Glyin in Vos = Glyin_0*Vos;  // isVersionOf CHEBI:17754
  // MAP kinase
  substanceOnly species Hog1 in Vos = (Hog1Total - Hog1P/Vos - Hog1PP/Vos)*Vos;  // isVersionOf uniprot:P32485; isEncodedBy sgd:S000004103
  // Double phosphorylated, i.e. active, MAP kinase. It was derived from data that 2.23 % of the maximal phosphorylation is the steady state activation. f_n is the fraction in the nucleus at maximal phohsporylation.
  substanceOnly species Hog1PP in Vos = Hog1PP_0*Vos;  // isVersionOf uniprot:P32485 kegg.compound:C00562
  // MAP kinase kinase
  substanceOnly species Pbs2 in Vos = (Pbs2Total - Pbs2P/Vos - Sho1Pbs2P/Vos)*Vos;  // encodes sgd:S000003664
  // Activated MAP kinase kinase (Sln1 branch). Initial condition set such that a steady state of Hog1 phosphorylation is maintained.
  substanceOnly species Pbs2P in Vos = piecewise(-(kHog1dephos*(Phosphatase/Vos)*(Hog1PP/Vos + sqrt(Hog1PP/Vos*(4*Hog1Total - 3*(Hog1PP/Vos))))/(4*kHog1phos1*(Hog1PP/Vos - Hog1Total))), (Sln1BranchActive == 1) && (Sho1BranchActive == 1), piecewise(-((kHog1phos1*kHog1dephos*(Phosphatase/Vos)*(Hog1PP/Vos) + sqrt((kHog1phos1*kHog1dephos*(Phosphatase/Vos))^2*(Hog1PP/Vos)*(4*Hog1Total - 3*(Hog1PP/Vos))))/(2*kHog1phos1^2*(Hog1PP/Vos - Hog1Total))), (Sln1BranchActive == 1) && (Sho1BranchActive == 0), 0))*Vos;  // isVersionOf uniprot:P08018
  // Placeholder for phosphatases like Ppt1/2/3 and others. Initial value derived from measured number of Ptp3 molecules (769, http://yeastgfp.yeastgenome.org)
  substanceOnly species Phosphatase in Vos = 769*N2uM*Vos;  // isPartOf uniprot:P40048
  // Placeholder for Hog1-dependent proteins, especially Gpd1. Initial value derived from measured number of Gpd1 molecules (807, http://yeastgfp.yeastgenome.org)
  substanceOnly species Protein in Vos = Protein_0*Vos;  // isVersionOf CHEBI:36080
  // Placeholder for transcribed genes. Initial value derived from data, i.e. initial percentage of maximum.
  substanceOnly species RNA in Vos = RNA_0*Vos;  // isVersionOf CHEBI:33699
  // Single phosphorylated MAP kinase. Initial condition set such that a steady state of Hog1 phosphorylation is maintained.
  substanceOnly species Hog1P in Vos = piecewise(1/2*(-(Hog1PP/Vos) + sqrt(Hog1PP/Vos*(4*Hog1Total - 3*(Hog1PP/Vos)))), (Sln1BranchActive == 1) && (Sho1BranchActive == 1), piecewise((-kHog1phos1*kHog1dephos*(Phosphatase/Vos)*(Hog1PP/Vos) + sqrt((kHog1phos1*kHog1dephos*(Phosphatase/Vos))^2*(Hog1PP/Vos)*(4*Hog1Total - 3*(Hog1PP/Vos))))/(2*kHog1phos1*kHog1dephos*(Phosphatase/Vos)), (Sln1BranchActive == 1) && (Sho1BranchActive == 0), (-kHog1phos2*kHog1dephos*(Phosphatase/Vos)*(Hog1PP/Vos) + sqrt((kHog1phos2*kHog1dephos*(Phosphatase/Vos))^2*(Hog1PP/Vos)*(4*Hog1Total - 3*(Hog1PP/Vos))))/(2*kHog1phos2*kHog1dephos*(Phosphatase/Vos))))*Vos;  // isVersionOf uniprot:P32485 kegg.compound:C00562
  // One of the putative upstream sensors
  substanceOnly species Sho1 in Vos = (Sho1Total - Sho1Pbs2P/Vos)*Vos;  // isVersionOf uniprot:P40073; isEncodedBy sgd:S000000920
  // Active scaffold complex (Sho1 branch). Initial condition set such that a steady state of Hog1 phosphorylation is maintained.
  substanceOnly species Sho1Pbs2P in Vos = piecewise(-(kHog1dephos*(Phosphatase/Vos)*(Hog1PP/Vos + sqrt(Hog1PP/Vos*(4*Hog1Total - 3*(Hog1PP/Vos))))/(4*kHog1phos2*(Hog1PP/Vos - Hog1Total))), (Sln1BranchActive == 1) && (Sho1BranchActive == 1), piecewise(-((kHog1phos2*kHog1dephos*(Phosphatase/Vos)*(Hog1PP/Vos) + sqrt((kHog1phos2*kHog1dephos*(Phosphatase/Vos))^2*(Hog1PP/Vos)*(4*Hog1Total - 3*(Hog1PP/Vos))))/(2*kHog1phos2^2*(Hog1PP/Vos - Hog1Total))), (Sln1BranchActive == 0) && (Sho1BranchActive == 1), 0))*Vos;  // hasPart uniprot:P40073 uniprot:P08018
  substanceOnly species $Hog1PPActive in Vos;  // isVersionOf uniprot:P32485
  // Extracellular glycerol, assumed to be 100 times lower than 〖Gly〗_in.
  substanceOnly species Glyex in Vex = Glyin/Vos/100*Vex;  // isVersionOf CHEBI:17754
  // Membrane bound open form of aquaglyceroporin Fps1 (assumed to be independent from volume change). Initially half of the channels is assumed to be open.
  substanceOnly species Fps1 in M = Fps1TotalIni/2*M;  // isVersionOf uniprot:P23900; isEncodedBy sgd:S000003966
  // Membrane bound closed form of aquaglyceroporin Fps1 (assumed to be independent from volume change) . Initially half of the channels is assumed to be closed.
  substanceOnly species Fps1P in M = Fps1TotalIni/2*M;  // isVersionOf uniprot:P23900; isEncodedBy sgd:S000003966

  // Parameters:
  // Gas constant.
  R = 8.314;
  // Temperature, corresponds to 30oC.
  T = 303.15;
  // Mole number
  mol = 6.022e23;
  // Osmotic coefficient for salt.
  phi = 0.93;
  // Factor converting concentrations in  to pressures in MPa.
  c2p = 1e-9;
  // Mixing time [s] of salt in the medium.
  tm = 10;
  // Hydraulic conductivity (estimate from data from (Eriksson, et al., 2007)).
  Lp = 0.013;
  // Initial turgor pressure (Schaber, et al., 2010)
  P0 = 0.61;
  // Membrane rigidity (Schaber, et al., 2010)
  eps = 14.3;
  // Minimal cell volume (as fraction of total) (Schaber, et al., 2010)
  minf = 0.41;
  // Initial osmolarity of the medium (Schaber, et al., 2010)
  ce_0 = 260000;
  // Initial total cell volume.
  V_0 = 50;
  // Solid or minimal volume of the cell.
  Vb = V_0*minf;
  // Fraction of activated Hog1 molecule in the nucleous upon maximal activation.
  maxHog1nucf = 0.8;
  // Non-turgid volume.
  VP_0 = V_0*exp(-P0/eps);
  // Total cell surface area.
  var Area;
  Hog1PPrelIniwt = 2.23;
  // Factor converting number of molecules in M concentrations per cell.
  N2uM = 1e21/(mol*Vos);
  // Initial total cellular osmolyte concentration.
  ci_0 = ce_0 + P0/(c2p*R*T);
  // Initial non-permeable cellular osmolyte concentration.
  cin_0 = ci_0 - Glyin/Vos;
  // Turgor pressure [MPa].
  var Turgor;
  // Linear activation function for the Sln1 branch with feedback.
  var ActivationSln1_nlfb;
  NaCl = 0.4;
  // Steady state activation of the Sln1 branch with feedback.
  ActivOffsetSln1_nlfb = -v2_k*(Phosphatase/Vos)*(Pbs2P/Vos)*(1 + (Hog1PP/Vos/v1_fb_Ki)^v1_fb_h)/(v1_fb_k*(Pbs2/Vos));
  kHog1phos1 = 42.63965;
  kHog1dephos = 1.78587;
  // Maximal Fps1 glycerol transport capacity.
  var ks;
  // Fps1 channel closure.
  var Fps1TransportCapacitty;
  var FitVrel;
  var FitHog1PPrel;
  var FitProteinrel;
  var FitGlyinrel;
  var Turgor2Osm;
  Fps1ClosureRate = 0.1283789;
  // Protein degradation rate.
  Protein_deg_k = v11_k*(RNA/Vos)/(Protein/Vos);
  var FitRNArel;
  // 〖6788f〗_n2μM: molecule numbers from http://yeastgfp.yeastgenome.org/
  Hog1Total = 6788*N2uM;
  // 〖2160f〗_n2μM: molecule numbers from http://yeastgfp.yeastgenome.org/
  Pbs2Total = 2160*N2uM;
  // RNA degradation rate.
  RNA_deg_k_MM = v9_k*(Hog1PP/Vos)/(v9_Km + Hog1PP/Vos)/(RNA/Vos);
  // 〖2330f〗_n2μM: molecule numbers from http://yeastgfp.yeastgenome.org/
  Sho1Total = 2330*N2uM;
  kHog1phos2 = 48.00039;
  Hog1PPrelIniSln1 = 2.23;
  Hog1PPrelIniSho1 = 2.23;
  // Extracellular osmolytically active concentration.
  var Osmex;
  // Intracellular osmolytically active concentration.
  var Osmin;
  // Initial osmotically active volume.
  Vos_0 = V_0*(1 - minf);
  A_0 = (36*pi)^(1/3)*V_0^(2/3);
  ts = 600;
  // Osmotic salt shock. Starts at time t_s and has a certain mixing time t_m.
  var cen;
  Glyex_0 = Glyin_0/100;
  Protein_0 = 807*N2uM;
  RNA_0 = 0.034;
  Glyin_0 = 180000;
  Hog1PP_0 = piecewise(Hog1Total*Hog1PPrelIniwt*maxHog1nucf/100, (Sln1BranchActive == 1) && (Sho1BranchActive == 1), piecewise(Hog1Total*Hog1PPrelIniSln1*maxHog1nucf/100, (Sln1BranchActive == 1) && (Sho1BranchActive == 0), Hog1Total*Hog1PPrelIniSho1*maxHog1nucf/100));
  // Steady state activation of the Sln1 branch with feedback.
  ActivOffsetSho1_nlfb = -v4_k1*(Sho1Pbs2P/Vos)*(1 + (Hog1PP/Vos/v3_fb_Ki)^v3_fb_h)/(v3_fb_k*(Pbs2/Vos)*(Sho1/Vos));
  // Linear activation function for the Sln1 branch with feedback.
  var ActivationSho1_nlfb;
  Sho1BranchActive = 1;
  // Linear activation function for the Sln1 branch.
  Sln1BranchActive = 1;
  // 〖907f〗_n2μM: molecule numbers from http://yeastgfp.yeastgenome.org/
  Fps1TotalIni = 907*N2uM;
  var Fps1TotalTrans;
  // Hill parameter of the turgor-activate Fps1 closure.
  TurgorActiv_h = 2;
  var TurgorActivation;
  var TurgorDeactivation;
  v16_5_k = v15_5_k*(Fps1/M)*TurgorDeactivation/(Fps1P/M);
  v16_6_k = v15_5_k*(Fps1/M)*TurgorDeactivation*(1 + (Hog1PP/Vos/v16_6_Ki)^v16_6_h)/(Fps1P/M);
  v16_7_k = v15_5_k*(Fps1/M)*TurgorDeactivation/(Fps1P/M*TurgorActivation);
  Hog1Activity = 0.001;
  tinh = 600;
  var Hog1Inhibition;
  Inhibition = 0;
  Fps1Delta = 1;
  v2_k = 0.607124;
  v1_fb_Ki = 0.00940584;
  v1_fb_h = 0.345701;
  v1_fb_k = 0.075474;
  v11_k = 9.06781e-5;
  v9_k = 18.1824;
  v9_Km = 0.506878;
  v4_k1 = 0.00226722;
  v3_fb_Ki = 0.297524;
  v3_fb_h = 2.0793;
  v3_fb_k = 0.00459138;
  v15_5_k = 0.00529124;
  v16_6_Ki = 0.0811033;
  v16_6_h = 0.628719;
  v13_k1 = 680.818;
  v13_k2 = 46.8363;
  v13_Km = 0.420741;

  // Assignment rules:
  V := Vb + Vos;
  Area := (36*pi)^(1/3)*V^(2/3);
  Turgor := piecewise(eps*ln(V/VP_0), V > VP_0, 0);
  ActivationSln1_nlfb := piecewise((A_0 - Area)/A_0 - ActivOffsetSln1_nlfb, (A_0 - Area)/A_0 > ActivOffsetSln1_nlfb, 0);
  ks := v13_k1*Protein_0*(1 + v13_k2*Hog1PP_0)/(v13_Km + Protein_0*(1 + v13_k2*Hog1PP_0))*Vos_0/(0.5*A_0*(Glyin_0 - Glyex_0));
  Fps1TransportCapacitty := Fps1/M/Fps1TotalIni;
  FitVrel := 100*V/V_0;
  FitHog1PPrel := 100*(Hog1PP/Vos)*Vos/(maxHog1nucf*Hog1Total*Vos_0);
  FitProteinrel := 19.9*(Protein/Vos)*Vos/(Protein_0*Vos_0);
  FitGlyinrel := 17*(Glyin/Vos)*Vos/(Glyin_0*Vos_0);
  Turgor2Osm := Turgor/(R*T*c2p);
  FitRNArel := 3.4*(RNA/Vos)*Vos/(RNA_0*Vos_0);
  Osmin := Glyin/Vos + cin_0*Vos_0/Vos;
  cen := piecewise(ce_0 - Glyex_0 + (1 - exp((ts - time)/tm))*2*phi*NaCl*10^6, time > ts, ce_0 - Glyex_0);
  Osmex := cen + Glyex/Vex;
  ActivationSho1_nlfb := piecewise((A_0 - Area)/A_0 - ActivOffsetSho1_nlfb, (A_0 - Area)/A_0 > ActivOffsetSho1_nlfb, 0);
  Fps1TotalTrans := Fps1/M + Fps1P/M;
  TurgorActivation := Turgor^TurgorActiv_h/(P0^TurgorActiv_h + Turgor^TurgorActiv_h);
  TurgorDeactivation := 1 - Turgor^TurgorActiv_h/(P0^TurgorActiv_h + Turgor^TurgorActiv_h);
  Hog1Inhibition := piecewise(piecewise(Hog1Activity, time > tinh, 1), Inhibition == 1, 1);
  Hog1PPActive := Hog1Inhibition*(Hog1PP/Vos)*Vos;

  // Rate rules:
  Vos' = -Lp*Area*(Turgor + c2p*R*T*(Osmex - Osmin));

  // Reactions:
  // Simple cell surface area dependent linear activation of Pbs2 through the Sln1 branch, with transient inhibition by activated Hog1.
  v1_fb: Pbs2 => Pbs2P; Vos*function_1(Sln1BranchActive, v1_fb_k, ActivationSln1_nlfb, Pbs2/Vos, Hog1PPActive/Vos, v1_fb_h, v1_fb_Ki);  // modifiers: Hog1PPActive; isVersionOf GO:0016310
  // Constitutive phosphatase dependent deactivation.
  v2: Pbs2P => Pbs2; Vos*Modified_mass_action_irrev(v2_k, Phosphatase/Vos, Pbs2P/Vos);  // modifiers: Phosphatase; isVersionOf GO:0016311
  // Linear phosphorylation of Hog1 by either the scaffold complex (Sho1-branch) or activated Pbs2 (Sln1-branch).
  v5: Hog1 => Hog1P; Vos*mod_MA_OR_irrev(kHog1phos1, Pbs2P/Vos, Hog1/Vos, kHog1phos2, Sho1Pbs2P/Vos);  // modifiers: Pbs2P, Sho1Pbs2P; isVersionOf GO:0016310
  // Constitutive phosphatase dependent de-phosphorylation.
  v6: Hog1P => Hog1; Vos*Modified_mass_action_irrev(kHog1dephos, Phosphatase/Vos, Hog1P/Vos);  // modifiers: Phosphatase; isVersionOf GO:0016311
  // Protein/enzyme production/synthesis
  v11: => Protein; Vos*Modified_constant_flux_irrev(v11_k, RNA/Vos);  // modifiers: RNA; isVersionOf GO:0006412
  // Protein/enzyme degradation
  v12: Protein => ; Protein_deg_k*Protein;  // isVersionOf GO:0030163
  // Glycerol production. As glycerol concentration also involves other proteins and cofactors that are potentially limiting a saturation kinetic is assumed. In addition, effective enzyme concentration can be enhanced as a function of activated Hog1.
  v13: => Glyin; Vos*function_5(v13_k1, Protein/Vos, v13_k2, Hog1PPActive/Vos, v13_Km);  // modifiers: Protein, Hog1PPActive; isVersionOf GO:0006114
  // Gradient driven glycerol flow out of the cell, where k_tr characterises the state of the aquaglyceroporin channel Fps1 and k_s the maximal transport capacity of the channel.
  v14: Glyin -> Glyex; transport_rev(Area, Glyex/Vex, Glyin/Vos, Fps1TransportCapacitty, ks);  // isVersionOf GO:0015793
  // Gene transcription. Hog1 mediated transcription also involves other proteins that are potentially limiting a saturation kinetic is assumed.
  v9: => RNA; Vos*mod_constat_flux_MM_irrev(v9_k, Hog1PPActive/Vos, v9_Km);  // modifiers: Hog1PPActive; isVersionOf GO:0006351
  // mRNA degradation
  v10: RNA => ; RNA_deg_k_MM*RNA;  // isVersionOf GO:0006402
  // Linear phosphorylation of Hog1 by either the scaffold complex (Sho1-branch) or activated Pbs2 (Sln1-branch).
  v7: Hog1P => Hog1PP; Vos*mod_MA_OR_irrev(kHog1phos1, Pbs2P/Vos, Hog1P/Vos, kHog1phos2, Sho1Pbs2P/Vos);  // modifiers: Pbs2P, Sho1Pbs2P; isVersionOf GO:0016310
  // Constitutive phosphatase dependent de-phosphorylation.
  v8: Hog1PP => Hog1P; Vos*Modified_mass_action_irrev(kHog1dephos, Phosphatase/Vos, Hog1PP/Vos);  // modifiers: Phosphatase; isVersionOf GO:0016311
  // Constitutive dissociation of the scaffold complex.
  v4: Sho1Pbs2P => Sho1 + Pbs2; v4_k1*Sho1Pbs2P;  // isVersionOf GO:0043241
  // Simple cell surface area dependent binding of Pbs2 to Sho1. The complex is supposed to be the active form. With transient inhibition by activated Hog1.
  v3_fb: Pbs2 + Sho1 => Sho1Pbs2P; Vos*function_8(Sho1BranchActive, v3_fb_k, ActivationSho1_nlfb, Pbs2/Vos, Sho1/Vos, Hog1PPActive/Vos, v3_fb_Ki, v3_fb_h);  // modifiers: Hog1PPActive; isVersionOf GO:0006461
  // Turgor dependent closure of Fps1, in conjunction with v16_5, v16_6, v16_7, v16_8.
  v15_5: Fps1 => Fps1P; M*_3_param_mass_action_irrev(Fps1Delta, v15_5_k, TurgorDeactivation, Fps1/M);  // isVersionOf GO:0016310
  // Activated Hog1 inhibited channel opening, in conjunction with v15_5.
  v16_6: Fps1P => Fps1; M*_1_para_inh_Mass_action_rrev(Fps1Delta, v16_6_k, Fps1P/M, Hog1PPActive/Vos, v16_6_Ki, v16_6_h);  // modifiers: Hog1PPActive; isVersionOf GO:0016311

  // Unit definitions:
  unit substance = 1e-6 mole;
end
