// SBML level 2 version 4

function EMM(St, Et, Km, kcat)
  0.5*kcat*(St + Et + Km - sqrt((St + Et + Km)^2 - 4*St*Et));
end

function Gamma(v, u, J, K)
  v - u + v*J + u*K;
end

function fGK(v, u, J, K)
  piecewise(0, (v == 0) && (u == 0), 2*u*K/(Gamma(v, u, J, K) + sqrt(Gamma(v, u, J, K)^2 - 4*(v - u)*u*K)));
end

model MODEL1302180000()
  // Erguler2013 - Unfolded protein stress response
  // The model investigates the mechanism by which UPR (unfolded protein response) outcome switches between survival and death.
  // This model is described in the article:
  // A mathematical model of the unfolded protein stress response reveals the decision mechanism for recovery, adaptation and apoptosis.
  // Erguler K, Pieri M, Deltas C.
  // BMC Syst Biol. 2013 Feb 21;7(1):16.
  // Abstract:
  // BACKGROUND: The unfolded protein response (UPR) is a major signalling cascade acting in the quality control ofprotein folding in the endoplasmic reticulum (ER). The cascade is known to play an accessory rolein a range of genetic and environmental disorders including neurodegenerative and cardiovasculardiseases, diabetes and kidney diseases. The three major receptors of the ER stress involved withthe UPR, i.e. IRE1a, PERK and ATF6, signal through a complex web of pathways to convey anappropriate response. The emerging behaviour ranges from adaptive to maladaptive depending on theseverity of unfolded protein accumulation in the ER; however, the decision mechanism for the switchand its timing have so far been poorly understood.
  // RESULTS: Here, we propose a mechanism by which the UPR outcome switches between survival and death.We compose a mathematical model integrating the three signalling branches, and perform a comprehensivebifurcation analysis to investigate possible responses to stimuli. The analysis reveals threedistinct states of behaviour, low, high and intermediate activity, associated with stress adaptation, tolerance,and the initiation of apoptosis. The decision to adapt or destruct can, therefore, be understoodas a dynamic process where the balance between the stress and the folding capacity of the ER playsa pivotal role in managing the delivery of the most appropriate response. The model demonstratesfor the first time that the UPR is capable of generating oscillations in translation attenuation and theapoptotic signals, and this is supplemented with a Bayesian sensitivity analysis identifying a set ofparameters controlling this behaviour.
  // CONCLUSIONS: This work contributes largely to the understanding of one of the most ubiquitous signalling pathwaysinvolved in protein folding quality control in the metazoan ER. The insights gained have direct consequenceson the management of many UPR-related diseases, revealing, in addition, an extended listof candidate disease modifiers. Demonstration of stress adaptation sheds light to how preconditioningmight be beneficial in manifesting the UPR outcome to prevent untimely apoptosis, and paves the wayto novel approaches for the treatment of many UPR-related conditions.
  // In the paper, PERKA refers to the amount of phosphorylated PERK monomer. However, it refers to the active complex in the model. The complex with the model parameterization is formed of 4 monomers (n=4). So, the value of PERKA should be multiplied by 4, in order to generate the figures in the paper (eg. Figure 12).
  // An additional parameter (tmr=10)) is used in the model. This parameter is not mentioned in the paper. The model values of kf(=10) and kr(=1) are not consistent with that of the paper (kf=100, kr=10, in the paper). However, this is corrected by the introduction of "tmr" in the model, which is multiplied with kf and kr to get the resulting values.
  // The term "tmr" was missing in the kinetic laws of the reactions reu7 and reu8, in the original model. This has been corrected as per the author's request.
  // This model is hosted on BioModels Database and identified by: MODEL1302180000 .
  // To cite BioModels Database, please use: BioModels Database: An enhanced, curated and annotated resource for published quantitative kinetic models .
  // To the extent possible under law, all copyright and related or neighbouring rights to this encoded model have been dedicated to the public domain worldwide. Please refer to CC0 Public Domain Dedication for more information.
  // biomodels.db:MODEL1302180000
  // biomodels.db:BIOMD0000000446
  // isDescribedBy pubmed:23433609
  // hasTaxon taxonomy:131567
  // isVersionOf GO:0030968
  // hasProperty mamo:MAMO_0000046

  // Compartments:
  compartment ERlumen = 1 volume;
  compartment cytoplasm = 1 volume;
  compartment Golgi = 1 volume;
  compartment mitochondria = 1 volume;

  // Species:
  substanceOnly species UFPT in ERlumen = 0;
  substanceOnly species BiUFP in ERlumen = 0;
  substanceOnly species BiRE1 in ERlumen = 0;
  substanceOnly species BiATF in ERlumen = 0;
  substanceOnly species BiPER in ERlumen = 0;
  substanceOnly species IRE1A in ERlumen = 0;
  substanceOnly species PERKA in ERlumen = 0;
  substanceOnly species mXbp1u in cytoplasm = 0;
  substanceOnly species mXbp1s in cytoplasm = 0;
  substanceOnly species Xbp1s in cytoplasm = 0;  // uniprot:P17861
  substanceOnly species mBiPT in cytoplasm = 0;
  substanceOnly species BiPT in ERlumen = 0;
  substanceOnly species ATF6T in ERlumen = 0;
  substanceOnly species ATF6GB in Golgi = 0;
  substanceOnly species ATF6p50 in cytoplasm = 0;
  substanceOnly species mWFS1 in cytoplasm = 0;
  substanceOnly species WFS1 in ERlumen = 0;  // uniprot:O76024
  substanceOnly species ATF4 in cytoplasm = 0;  // uniprot:P18848
  substanceOnly species mCHOP in cytoplasm = 0;
  substanceOnly species CHOP in cytoplasm = 0;  // uniprot:P35638
  substanceOnly species mGADD34 in cytoplasm = 0;
  substanceOnly species GADD34 in cytoplasm = 0;  // uniprot:O75807
  substanceOnly species BCL2T in mitochondria = 0;
  substanceOnly species BAXmT in mitochondria = 0;
  substanceOnly species BH3T in cytoplasm = 0;
  substanceOnly species BAXmBCL2 in mitochondria = 0;
  substanceOnly species BH3BCL2 in mitochondria = 0;

  // Parameters:
  UFP has substance;
  BiP has substance;  // uniprot:P11021
  IRE1 has substance;  // uniprot:O75460
  PERK has substance;  // uniprot:Q9NZJ5
  ATF6 has substance;  // uniprot:Q99941 uniprot:P18850
  eIF2a has substance;  // uniprot:Q9BY44
  spliceRate has rate;
  BCL2 has substance;
  BH3 has substance;
  BAXm has substance;
  tmr = 10 dimensionless;
  IRE1T = 1 substance;
  PERKT = 1 substance;
  eIF2aT = 1 substance;
  CReP = 0.1 substance;  // uniprot:Q5SWA1
  kf = 10 rate2;
  kr = 1 rate1;
  n = 4 dimensionless;
  nh = 2 dimensionless;
  extATT = 0 dimensionless;
  extPERK = 0 substance1;
  basalXBP = 1 substance;
  basalBiP = 1 substance;
  krcXU = 5 substance;
  krcBiP = 5 substance;
  krcWFS = 1 substance;
  krcCHOP = 1 substance;
  krcGADD34 = 1 substance;
  kmXbp = 10 dimensionless;
  kmAtfsXBP = 10 dimensionless;
  kmAtfsBiP = 1 dimensionless;
  kmAtff = 0.05 dimensionless;
  kmChop = 0.05 dimensionless;
  kmAtfs = 0.1 dimensionless;
  ksplice = 10 rate1;
  krcSplice = 1 substance;
  trcXU = 1 rate;
  trcBiP = 1 rate;
  trcWFS = 1 rate;
  trcCHOP = 1 rate;
  trcGADD34 = 1 rate;
  ktrUFP = 1 rate1;
  ktrXS = 1 rate1;
  ktrBiP = 1 rate1;
  ktrATF6 = 1 rate1;
  ktrWFS = 1 rate1;
  ktrATF4 = 1 rate1;
  ktrCHOP = 1 rate1;
  ktrGADD34 = 1 rate1;
  kdmXU = 1 rate1;
  kdmXS = 1 rate1;
  kdmBiP = 1 rate1;
  kdmWFS = 1 rate1;
  kdmCHOP = 1 rate1;
  kdmGADD34 = 1 rate1;
  kdUFP = 0.1 rate1;
  kdXS = 0.1 rate1;
  kdBiP = 0.01 rate1;
  kdATF6 = 0.1 rate1;
  kdATF6GB = 0.1 rate1;
  kdATF6p50 = 0.1 rate1;
  kdWFS = 0.1 rate1;
  kdATF4 = 0.1 rate1;
  kdCHOP = 0.1 rate1;
  kdGADD34 = 0.1 rate1;
  mATF6T = 5 substance;
  mUFPT has substance;
  mATF4 = 1 substance;
  ktrans = 1 rate1;
  kcleave = 10 rate1;
  kphos = 5 rate1;
  kdephos = 0.5 rate1;
  kdeAW = 1 rate2;
  kbu = 0 rate2;
  switch = 0 dimensionless;
  kATF4 = 0.1 substance;
  J = 0.001 substance;
  K = 0.001 substance;
  kfbc = 10 rate;
  kdbc = 0.1 rate1;
  kmbc = 0.03 substance1;
  kstr = 0.2 dimensionless;
  BAXT = 100 substance;
  kfx = 1 rate1;
  kfxp = 3 rate2;
  kbx = 2 rate1;
  kasx = 90 rate2;
  kdsx = 0.05 rate1;
  ks3 = 0.1 rate;
  ks3p = 0.6 rate1;
  kd3 = 0.01 rate1;
  kas3 = 10 rate2;
  kds3 = 0.01 rate1;
  kff = 10 rate3;

  // Assignment rules:
  UFP := UFPT - BiUFP;
  BiP := BiPT - BiRE1 - BiATF - BiPER - BiUFP;
  IRE1 := IRE1T - BiRE1 - n*IRE1A;
  PERK := PERKT - BiPER - n*PERKA;
  ATF6 := ATF6T - BiATF;
  spliceRate := EMM(mXbp1u, 0.5*n*IRE1A, krcSplice, ksplice);
  eIF2a := eIF2aT*fGK(kphos*0.5*n*PERKA, kdephos*(GADD34 + CReP), J/eIF2aT, K/eIF2aT);
  BCL2 := BCL2T - BH3BCL2 - BAXmBCL2;
  BH3 := BH3T - BH3BCL2;
  BAXm := BAXmT - BAXmBCL2;
  mUFPT := 13;

  // Reactions:
  re2: => UFPT; ktrUFP*mUFPT*piecewise(eIF2a/eIF2aT, extATT == 1, 1);
  re3: UFPT => ; kdUFP*UFPT;
  re4: UFPT => ; kbu*BiUFP*UFPT;  // modifiers: BiUFP
  reu1: => BiUFP; tmr*kf*BiP*UFP;
  reu2: BiUFP => ; tmr*kr*BiUFP;
  reu3: => BiRE1; tmr*kf*BiP*IRE1;
  reu4: BiRE1 => ; tmr*kr*BiRE1;
  reu5: => BiATF; tmr*kf*BiP*ATF6;
  reu6: BiATF => ; tmr*kr*BiATF;
  reu7: => BiPER; tmr*kf*BiP*PERK;
  reu8: BiPER => ; kr*tmr*BiPER;
  reu9: => IRE1A; tmr*kff*IRE1^n;
  reu10: IRE1A => ; tmr*kr*IRE1A;
  reu11: => PERKA; tmr*kff*piecewise(UFP, switch == 1, 1)*PERK^n;
  reu12: PERKA => ; tmr*kr*PERKA/(1 + extPERK*UFP);
  re5: => ATF6T; ktrATF6*mATF6T;
  re6: ATF6T => ; kdATF6*ATF6T;
  re8: ATF6T => ATF6GB; ktrans*ATF6;
  rew1: ATF6T => ; kdeAW*WFS1*ATF6T;  // modifiers: WFS1
  re9: ATF6GB => ; kdATF6GB*ATF6GB;
  re10: ATF6GB => ATF6p50; kcleave*ATF6GB;
  re11: ATF6p50 => ; kdATF6p50*ATF6p50;
  rew2: => mWFS1; trcWFS*ATF6p50/(krcWFS + ATF6p50);  // modifiers: ATF6p50
  rew3: mWFS1 => ; kdmWFS*mWFS1;
  rew4: => WFS1; ktrWFS*mWFS1;  // modifiers: mWFS1
  rew5: WFS1 => ; kdWFS*WFS1;
  re12: => mXbp1u; trcXU*(basalXBP + kmAtfsXBP*ATF6p50)/(krcXU + basalXBP + kmAtfsXBP*ATF6p50);  // modifiers: ATF6p50
  re13: mXbp1u => ; kdmXU*mXbp1u;
  re14: mXbp1u => mXbp1s; spliceRate;
  re15: mXbp1s => ; kdmXS*mXbp1s;
  re16: => Xbp1s; ktrXS*mXbp1s;  // modifiers: mXbp1s
  re17: Xbp1s => ; kdXS*Xbp1s;
  re18: => mBiPT; trcBiP*(basalBiP + kmXbp*Xbp1s + kmAtfsBiP*ATF6p50)/(krcBiP + basalBiP + kmXbp*Xbp1s + kmAtfsBiP*ATF6p50);  // modifiers: Xbp1s, ATF6p50
  re19: mBiPT => ; kdmBiP*mBiPT;
  re20: => BiPT; ktrBiP*mBiPT;  // modifiers: mBiPT
  re21: BiPT => ; kdBiP*BiPT;
  re23: => ATF4; ktrATF4*mATF4/(1 + (eIF2a/kATF4)^nh);
  re24: ATF4 => ; kdATF4*ATF4;
  re25: => mCHOP; trcCHOP*(kmAtff*ATF4 + kmAtfs*ATF6p50)/(krcCHOP + kmAtff*ATF4 + kmAtfs*ATF6p50);  // modifiers: ATF4, ATF6p50
  re26: mCHOP => ; kdmCHOP*mCHOP;
  re27: => CHOP; ktrCHOP*mCHOP;  // modifiers: mCHOP
  re28: CHOP => ; kdCHOP*CHOP;
  re29: => mGADD34; trcGADD34*kmChop*CHOP/(krcGADD34 + kmChop*CHOP);  // modifiers: CHOP
  re30: mGADD34 => ; kdmGADD34*mGADD34;
  re31: => GADD34; ktrGADD34*mGADD34;  // modifiers: mGADD34
  re32: GADD34 => ; kdGADD34*GADD34;
  rea1: => BCL2T; kfbc/(1 + kmbc*CHOP);  // modifiers: CHOP
  rea2: BCL2T => ; kdbc*BCL2T;
  rea3: => BAXmT; kfx*BAXT;
  rea4: => BAXmT; kfxp*BH3*BAXT;
  rea5: BAXmT => ; kfx*BAXmT;
  rea6: BAXmT => ; kfxp*BH3*BAXmT;
  rea7: BAXmT => ; kbx*BAXmT;
  rea8: => BH3T; ks3;
  rea9: => BH3T; ks3p*kstr*CHOP;  // modifiers: CHOP
  rea10: BH3T => ; kd3*BH3T;
  rea11: => BAXmBCL2; kasx*BAXm*BCL2;
  rea12: BAXmBCL2 => ; kdsx*BAXmBCL2;
  rea13: BAXmBCL2 => ; kbx*BAXmBCL2;
  rea14: => BH3BCL2; kas3*BH3*BCL2;
  rea15: BH3BCL2 => ; kds3*BH3BCL2;
  rea16: BH3BCL2 => ; kd3*BH3BCL2;

  // Unit definitions:
  unit substance = mole; substance is "acu";
  unit volume = litre;
  unit time = second; time is "atu";
  unit rate = mole / second; rate is "aru = acu.atu^-1";
  unit rate2 = 1 / (mole * second); rate2 is "aru2 = acu^-1.atu^-1";
  unit rate1 = 1 / second; rate1 is "aru1 = atu^-1";
  unit substance1 = 1 / mole; substance1 is "acu1 = acu^-1";
  unit rate3 = 1 / (mole^3 * second); rate3 is "aru3 = acu^-3.atu^-1";
end
