// SBML level 2 version 4

model PRR_model()
  // Amara2013 - PCNA ubiquitylation in the activation of PRR pathway
  // Mechanistic model of the Post-Replication Repair (PRR), the pathway involved in the bypass of DNA lesions induced by sunlight exposure and UV radiation. PRR acts through two different mechanisms, activated by mono- and poly-ubiquitylation of the DNA sliding clamp, called Proliferating Cell Nuclear Antigen (PCNA). This model has been defined according to the stochastic formulation of chemical kinetics [Gillespie DT, J Phys Chem 1977, 81(25):2340-2361], which requires to specify the set of molecular species occurring in the pathway and their respective interactions, formally described as a set of biochemical reactions. The volume considered for this system is 1.666667e-17L; this value can be used to convert the model into the deterministic formulation.
  // biomodels.db:MODEL1211260000
  // biomodels.db:BIOMD0000000475
  // isDescribedBy pubmed:23514624
  // hasTaxon taxonomy:4932
  // isVersionOf GO:0006301
  // hasProperty mamo:MAMO_0000046

  // Compartments:
  compartment compartment_1 = 1;  // GO:0005623

  // Species:
  species L in compartment_1 = 1001;  // isVersionOf GO:0035861
  species PCNA in compartment_1 = 7480;  // uniprot:P15873
  species PCNAon in compartment_1 = 0;  // isVersionOf uniprot:P15873
  species Rad18_Rad18 in compartment_1 = 0; Rad18_Rad18 is "Rad18:Rad18";  // hasPart uniprot:P10862
  species Rad18 in compartment_1 = 206;  // isVersionOf uniprot:P10862
  species Rad6 in compartment_1 = 194;  // isVersionOf uniprot:P06104
  species Rad6U in compartment_1 = 0;  // isVersionOf uniprot:P06104; hasProperty GO:0006513
  species U in compartment_1 = 8698;  // isVersionOf uniprot:P0CG63
  species Rad18_Rad18_PCNAon in compartment_1 = 0; Rad18_Rad18_PCNAon is "Rad18:Rad18:PCNAon";  // hasPart uniprot:P10862 uniprot:P15873
  species Rad18_Rad18_PCNAon_Rad6U in compartment_1 = 0; Rad18_Rad18_PCNAon_Rad6U is "Rad18:Rad18:PCNAon:Rad6U";  // hasPart uniprot:P10862 uniprot:P15873 uniprot:P06104; hasProperty GO:0006513
  species Rad18_Rad18_PCNAonU in compartment_1 = 0; Rad18_Rad18_PCNAonU is "Rad18:Rad18:PCNAonU";  // hasPart uniprot:P10862 uniprot:P15873; hasProperty GO:0006513
  species PCNAonU in compartment_1 = 0;  // isVersionOf uniprot:P15873; hasProperty GO:0006513
  species Rad5 in compartment_1 = 1520;  // isVersionOf uniprot:P32849
  species Rad5_PCNAonU in compartment_1 = 0; Rad5_PCNAonU is "Rad5:PCNAonU";  // hasPart uniprot:P32849 uniprot:P15873; hasProperty GO:0006513
  species Ubc13U_Mms2 in compartment_1 = 0; Ubc13U_Mms2 is "Ubc13U:Mms2";  // hasPart uniprot:P52490 uniprot:P53152; hasProperty GO:0006513
  species Ubc13U_Mms2_Rad5_PCNAonU in compartment_1 = 0; Ubc13U_Mms2_Rad5_PCNAonU is "Ubc13U:Mms2:Rad5:PCNAonU";  // hasPart uniprot:P52490 uniprot:P53152 uniprot:P32849 uniprot:P15873; isPropertyOf MOD:01148
  species Rad5_PCNAonU_U in compartment_1 = 0; Rad5_PCNAonU_U is "Rad5:PCNAonU:U";  // hasPart uniprot:P32849 uniprot:P15873; hasProperty MOD:01148
  species Ubc13_Mms2 in compartment_1 = 193; Ubc13_Mms2 is "Ubc13:Mms2";  // hasPart uniprot:P53152 uniprot:P52490
  species PCNAonU_U in compartment_1 = 0; PCNAonU_U is "PCNAonU:U";  // hasPart uniprot:P15873 uniprot:P0CG63; hasProperty MOD:01148
  species Ubc13U_Mms2_Rad5_PCNAonU_U in compartment_1 = 0; Ubc13U_Mms2_Rad5_PCNAonU_U is "Ubc13U:Mms2:Rad5:PCNAonU:U";  // hasPart uniprot:P15873 uniprot:P0CG63 uniprot:P53152 uniprot:P52490; hasProperty GO:0000209
  species Rad5_PCNAonU_U_U in compartment_1 = 0; Rad5_PCNAonU_U_U is "Rad5:PCNAonU:U:U";  // hasPart uniprot:P32849 uniprot:P15873; hasProperty GO:0000209
  species PCNAonU_U_U in compartment_1 = 0; PCNAonU_U_U is "PCNAonU:U:U";  // hasProperty GO:0000209; isVersionOf uniprot:P15873
  species PCNAoff in compartment_1 = 0;  // isVersionOf uniprot:P15873

  // Parameters:
  var PCNA_sum;

  // Assignment rules:
  PCNA_sum := PCNAonU + PCNAonU_U + PCNAonU_U_U + Rad18_Rad18_PCNAonU + Rad5_PCNAonU + Rad5_PCNAonU_U + Rad5_PCNAonU_U_U + Ubc13U_Mms2_Rad5_PCNAonU_U + Ubc13U_Mms2_Rad5_PCNAonU;

  // Reactions:
  r01: PCNA + L => PCNAon; compartment_1*r01_k1*PCNA*L;  // isVersionOf GO:0016567
    r01_k1 = 1.5e-8;
  r02: 2 Rad18 => Rad18_Rad18; compartment_1*r02_k1*Rad18^2;  // hasProperty GO:0042803
    r02_k1 = 0.01;
  r03: Rad18_Rad18 => 2 Rad18; compartment_1*r03_k1*Rad18_Rad18;  // isVersionOf GO:0043241
    r03_k1 = 1000;
  r04: Rad6 + U => Rad6U; compartment_1*r04_k1*Rad6*U;  // isVersionOf GO:0016567
    r04_k1 = 2.5e-7;
  r05: PCNAon + Rad18_Rad18 => Rad18_Rad18_PCNAon; compartment_1*r05_k1*PCNAon*Rad18_Rad18;  // isVersionOf GO:0006461
    r05_k1 = 100000;
  r06: Rad18_Rad18_PCNAon => PCNAon + Rad18_Rad18; compartment_1*r06_k1*Rad18_Rad18_PCNAon;  // isVersionOf GO:0043241
    r06_k1 = 1000;
  r07: Rad6U + Rad18_Rad18_PCNAon => Rad18_Rad18_PCNAon_Rad6U; compartment_1*r07_k1*Rad6U*Rad18_Rad18_PCNAon;  // isVersionOf GO:0006461
    r07_k1 = 0.0351;
  r08: Rad18_Rad18_PCNAon_Rad6U => Rad6U + Rad18_Rad18_PCNAon; compartment_1*r08_k1*Rad18_Rad18_PCNAon_Rad6U;  // isVersionOf GO:0043241
    r08_k1 = 0.01;
  r09: Rad18_Rad18_PCNAon_Rad6U => Rad6 + Rad18_Rad18_PCNAonU; compartment_1*r09_k1*Rad18_Rad18_PCNAon_Rad6U;  // isVersionOf GO:0043241
    r09_k1 = 0.01;
  r10: Rad18_Rad18_PCNAonU => Rad18_Rad18 + PCNAonU; compartment_1*r10_k1*Rad18_Rad18_PCNAonU;  // isVersionOf GO:0043241
    r10_k1 = 1;
  r11: U + Ubc13_Mms2 => Ubc13U_Mms2; compartment_1*r11_k1*U*Ubc13_Mms2;  // isVersionOf GO:0016567
    r11_k1 = 100000;
  r12: PCNAonU + Rad5 => Rad5_PCNAonU; compartment_1*r12_k1*PCNAonU*Rad5;  // isVersionOf GO:0006461
    r12_k1 = 5e-6;
  r13: Rad5_PCNAonU => PCNAonU + Rad5; compartment_1*r13_k1*Rad5_PCNAonU;  // isVersionOf GO:0043241
    r13_k1 = 0.005;
  r14: Rad5_PCNAonU + Ubc13U_Mms2 => Ubc13U_Mms2_Rad5_PCNAonU; compartment_1*r14_k1*Rad5_PCNAonU*Ubc13U_Mms2;  // isVersionOf GO:0006461
    r14_k1 = 0.078;
  r15: Ubc13U_Mms2_Rad5_PCNAonU => Rad5_PCNAonU + Ubc13U_Mms2; compartment_1*r15_k1*Ubc13U_Mms2_Rad5_PCNAonU;  // isVersionOf GO:0043241
    r15_k1 = 1e-10;
  r16: Ubc13U_Mms2_Rad5_PCNAonU => Ubc13_Mms2 + Rad5_PCNAonU_U; compartment_1*r16_k1*Ubc13U_Mms2_Rad5_PCNAonU;
    r16_k1 = 0.05;
  r17: Rad5_PCNAonU_U => Rad5 + PCNAonU_U; compartment_1*r17_k1*Rad5_PCNAonU_U;  // isVersionOf GO:0043241
    r17_k1 = 7.5e-6;
  r18: Rad5 + PCNAonU_U => Rad5_PCNAonU_U; compartment_1*r18_k1*Rad5*PCNAonU_U;  // isVersionOf GO:0006461
    r18_k1 = 5e-6;
  r19: Ubc13U_Mms2 + Rad5_PCNAonU_U => Ubc13U_Mms2_Rad5_PCNAonU_U; compartment_1*r19_k1*Ubc13U_Mms2*Rad5_PCNAonU_U;  // isVersionOf GO:0006461
    r19_k1 = 0.078;
  r20: Ubc13U_Mms2_Rad5_PCNAonU_U => Ubc13U_Mms2 + Rad5_PCNAonU_U; compartment_1*r20_k1*Ubc13U_Mms2_Rad5_PCNAonU_U;  // isVersionOf GO:0043241
    r20_k1 = 1e-10;
  r21: Ubc13U_Mms2_Rad5_PCNAonU_U => Ubc13_Mms2 + Rad5_PCNAonU_U_U; compartment_1*r21_k1*Ubc13U_Mms2_Rad5_PCNAonU_U;  // isVersionOf GO:0043241
    r21_k1 = 0.005;
  r22: Rad5_PCNAonU_U_U => Rad5 + PCNAonU_U_U; compartment_1*r22_k1*Rad5_PCNAonU_U_U;  // isVersionOf GO:0043241
    r22_k1 = 0.005;
  r23: PCNAonU => U + PCNAoff; compartment_1*r23_k1*PCNAonU;  // isVersionOf GO:0016579
    r23_k1 = 3e-8;
  r24: PCNAonU_U => 2 U + PCNAoff; compartment_1*r24_k1*PCNAonU_U;  // isVersionOf GO:0016579
    r24_k1 = 0.0008;
  r25: PCNAonU_U_U => 3 U + PCNAoff; compartment_1*r25_k1*PCNAonU_U_U;  // isVersionOf GO:0016579
    r25_k1 = 0.005;

  // Unit definitions:
  unit volume = dimensionless;
  unit substance = dimensionless;
  unit per_second = 1 / second;
end
