// SBML level 2 version 4

model MODEL1407230000()
  // Ouyang2014 - photomorphogenic UV-B signalling network
  // This model is described in the article:
  // Coordinated photomorphogenic UV-B signaling network captured by mathematical modeling.
  // Ouyang X, Huang X, Jin X, Chen Z, Yang P, Ge H, Li S, Deng XW.
  // Proc. Natl. Acad. Sci. U.S.A. 2014 Aug; 111(31): 11539-11544
  // Abstract:
  // Long-wavelength and low-fluence UV-B light is an informational signal known to induce photomorphogenic development in plants. Using the model plant Arabidopsis thaliana, a variety of factors involved in UV-B-specific signaling have been experimentally characterized over the past decade, including the UV-B light receptor UV resistance locus 8; the positive regulators constitutive photomorphogenesis 1 and elongated hypocotyl 5; and the negative regulators cullin4, repressor of UV-B photomorphogenesis 1 (RUP1), and RUP2. Individual genetic and molecular studies have revealed that these proteins function in either positive or negative regulatory capacities for the sufficient and balanced transduction of photomorphogenic UV-B signal. Less is known, however, regarding how these signaling events are systematically linked. In our study, we use a systems biology approach to investigate the dynamic behaviors and correlations of multiple signaling components involved in Arabidopsis UV-B-induced photomorphogenesis. We define a mathematical representation of photomorphogenic UV-B signaling at a temporal scale. Supplemented with experimental validation, our computational modeling demonstrates the functional interaction that occurs among different protein complexes in early and prolonged response to photomorphogenic UV-B.
  // This model is hosted on BioModels Database and identified by: BIOMD0000000545.
  // To cite BioModels Database, please use: BioModels Database: An enhanced, curated and annotated resource for published quantitative kinetic models.
  // To the extent possible under law, all copyright and related or neighbouring rights to this encoded model have been dedicated to the public domain worldwide. Please refer to CC0 Public Domain Dedication for more information.
  // biomodels.db:MODEL1407230000
  // biomodels.db:BIOMD0000000545
  // isDescribedBy pubmed:25049395
  // hasTaxon taxonomy:3702
  // isVersionOf GO:0009640
  // hasProperty mamo:MAMO_0000046

  // Compartments:
  compartment Hypctol = 1;  // isVersionOf BTO:0000613

  // Species:
  substanceOnly species CS in Hypctol = 0.2;  // substance in mole; hasPart uniprot:Q9SYX2 uniprot:P43254
  substanceOnly species CD in Hypctol = 10;  // substance in mole; hasPart uniprot:Q8LGH4 uniprot:Q9M086
  substanceOnly species CDCS in Hypctol = 2;  // substance in mole; hasPart uniprot:P43254 uniprot:Q9SYX2 uniprot:Q9M086 uniprot:Q8LGH4
  substanceOnly species UVR8M in Hypctol = 0;  // substance in mole; isVersionOf uniprot:Q9FN03
  substanceOnly species UCS in Hypctol = 0;  // substance in mole; hasPart uniprot:Q9SYX2 uniprot:P43254 uniprot:Q9FN03
  substanceOnly species UVR8D in Hypctol = 20;  // substance in mole; isVersionOf uniprot:Q9FN03
  substanceOnly species RUP in Hypctol = 0;  // substance in mole; isVersionOf uniprot:Q9LTJ6
  substanceOnly species UR in Hypctol = 0;  // substance in mole; hasPart uniprot:Q9LTJ6 uniprot:Q9FFA7
  substanceOnly species UVR8_M in Hypctol = 0;  // substance in mole; isVersionOf uniprot:Q9FN03
  species COP1 in Hypctol = 4.2/Hypctol;  // isVersionOf uniprot:P43254
  species HY5 in Hypctol = 0.25/Hypctol;  // isVersionOf uniprot:O24646
  species $FHY3 in Hypctol = 5/Hypctol;  // isVersionOf uniprot:Q9LIE5
  species DWD in Hypctol = 20/Hypctol;  // isVersionOf interpro:IPR001680
  species CDW in Hypctol = 0;  // hasPart uniprot:Q8LGH4 uniprot:Q9M086 interpro:IPR001680

  // Parameters:
  ks1 = 0.23;
  ks2 = 4.0526;
  kdr1 = 0.1;
  kdr2 = 0.2118;
  k1 = 0.0043;
  k2 = 161.62;
  ka1 = 0.0372;
  ka2 = 0.0611;
  ka3 = 4.7207;
  kd1 = 94.3524;
  kd2 = 50.6973;
  kd3 = 0.5508;
  ks3 = 0.4397;
  kdr3 = 1.246;
  UV = 1;
  ka4 = 10.1285;
  kd4 = 1.1999;
  n1 = 3;
  n2 = 2;
  n3 = 3.5;
  kdr3a = 0.9735;
  kdr3b = 0.406;
  ksr = 0.7537;

  // Assignment rules:
  UM_Total := 2*UCS + UVR8M + UR;
  COP1_Total := 2*UCS + 2*CDCS + CS;

  // Reactions:
  r1: => CS; ks1*(1 + UV*n3*(HY5 + FHY3)) - kdr1*(1 + n1*UV)*CS;  // modifiers: HY5, FHY3
  r2: => RUP; ks2*(1 + UV*UCS) - kdr2*RUP;  // modifiers: UCS
  r3: 2 UVR8M => UVR8D; k1*UVR8M^2;
  r4: 2 CS + 2 UVR8M -> UCS; ka1*CS^2*UVR8M^2 - kd1*UCS;
  r5: 2 CS + CD -> CDCS; ka2*CS^2*CD - kd2*CDCS;
  r6: UVR8M + RUP => UR; ka3*UVR8M*RUP;
  r7: 2 UR => UVR8D + 2 RUP; kd3*UR^2;
  r8: UVR8D => 2 UVR8M; k2*UVR8D;
  r9: => HY5; ks3*(1 + n2*UV) - kdr3*(CDCS/(kdr3a + CDCS) + CDW/(kdr3b + CDW) - UCS/(ksr + UCS))*HY5;  // modifiers: CDCS, CDW, UCS
  r10: CD + DWD -> CDW; ka4*CD*DWD - kd4*CDW;
end
