// SBML level 3 version 1
// dcterms:bibliographicCitation: http://identifiers.org/biomodels.db/MODEL1406230000 http://identifiers.org/pubmed/20410284

function Function_for_re1_1(beta_a, default, Ep, V)
  beta_a*Ep*V*default;
end

function Function_for_re7_0(pi_a, Eps)
  pi_a*Eps;
end

function Function_for_re3_0(rho_E, Ep)
  rho_E*Ep;
end

model Miao2010___Innate_and_adaptive_immune_responses_to_primary_Influenza_A_Virus_infection()
  // Miao2010 - Innate and adaptive immune responses to primary Influenza A Virus infection_1_1
  // Model 2 of the Miao et. al. 2010 is curated. Model 1 is attached as additional file.
  // This model is hosted on BioModels Database and identified by: BIOMD0000000546.
  // To cite BioModels Database, please use: BioModels-15 Years of Sharing Computational Models in Life Science.
  // To the extent possible under law, all copyright and related or neighbouring rights to this encoded model have been dedicated to the public domain worldwide. Please refer to CC0 Public Domain Dedication for more information.
  // hasTaxon taxonomy:132504
  // hasTaxon taxonomy:39107
  // isDerivedFrom biomodels.db:BIOMD0000000546 biomodels.db:MODEL1405150000 DOID:8469 GO:0002250 GO:0045087 taxonomy:132504
  // isDerivedFrom biomodels.db:MODEL1406230000
  // isDerivedFrom DOID:8469 biomodels.db:MODEL1405150000 biomodels.db:BIOMD0000000546 GO:0045087 GO:0002250 taxonomy:132504
  // isDerivedFrom biomodels.db:MODEL1406230000
  // model units - substance: substance, time: time, volume: volume, area: area, length: length, extent: substance

  // Compartments:
  compartment default = 1 volume;  // isVersionOf FMA:7195

  // Species:
  // Initial no. of uninfected and infectible epithelial cells per lung
  species Ep in default = 580000;  // isVersionOf FMA:66768
  // This entity is refered as Ep* in the paper. Infected epithelial cells per lung.
  species Eps in default = 0;  // isVersionOf FMA:66768
  // Infective viral titer (EID50/ml)
  species V in default = 1000;  // isVersionOf taxonomy:132504

  // Parameters:
  // Net growth rate of uninfected epithelial cells (per day)
  rho_E = 6.2e-8 unit_0;
  // alpha x the infection rate of uninfected epithelial cells ml*per(EID50*day)
  beta_a = 1e-6 unit_0;
  // Death rate of infected epithelial cells (per day)
  delta_Es = 0.6 unit_0;
  pi_a = 100 unit_0;
  // Virus clearance rate (reduction of infectious viral titer) (per day)
  c_V = 4.2 unit_0;

  // Reactions:
  re1: Ep => Eps; default*Function_for_re1_1(beta_a, default, Ep, V); re1 is "re1 Viral Infection of epithelial cells";  // modifiers: V
  re3: => Ep; default*Function_for_re3_0(rho_E, Ep); re3 is "re3 Growth of uninfected epithelial cells";
  re5: Eps => ; default*delta_Es*Eps; re5 is "re5 Death of infected epithelial cells";
  re6_Viral_Clearance: V => ; default*c_V*V;
  re7: => V; default*Function_for_re7_0(pi_a, Eps); re7 is "re7 Production of virus from infected epithelial cells";  // modifiers: Eps

  // Unit definitions:
  unit length = metre;
  unit area = metre^2;
  unit volume = litre;
  unit time = 86400 second;
  unit substance = mole;
  unit unit_0 = mole; unit_0 is "mol";
end
