// SBML level 2 version 4

function _2p_modified_mass_action_irrev(S, M, k, ko)
  k*ko*M*S;
end
_2p_modified_mass_action_irrev is "2p modified mass action (irrev)";

function _2p_modified_constant_flux_irrev(M, k, ko)
  k*ko*M;
end
_2p_modified_constant_flux_irrev is "2p modified constant flux (irrev)";

function Mixed_Hill(Substrate, k, Mod1, Mod, k1, kb)
  Substrate*(k*Mod1 + k1*Mod + kb);
end

function _2p_2sub(k, ko, sub, sub2)
  k*ko*sub*sub2;
end

function corrected_modified_diffusion(V, Mod, k, Ex, In)
  (36*pi)^(1/3)*V^(2/3)*Mod*k*(Ex - In);
end

function corrected_mass_action(V, k, Sub)
  (36*pi)^(1/3)*V^(2/3)*k*Sub;
end

function function_4(ko, Mod, k, V, Sub)
  ko*Mod*k*(36*pi)^(1/3)*V^(2/3)*Sub;
end
function_4 is "corrected 2p modified mass action";

function Rate_Law_for_v20(V, Mod, Vmax, Sub, Km)
  (36*pi)^(1/3)*V^(2/3)*Mod*Vmax*Sub/(Km + Sub);
end

model MODEL1403280000()
  // Talemi2014 - Arsenic toxicity and detoxification mechanisms in yeast
  // The model implements arsenite (AsIII) transport regulation, its distribution within main cellular AsIII pools and detoxification. The intracellular As pools considered are free AsIII (AsIIIin), protein-bound AsIII (AsIIIprot), glutathione conjugated AsIII (AsGS3) and vacuolar sequestered AsIII (vAsGS3).
  // This model is described in the article:
  // Mathematical modelling of arsenic transport, distribution and detoxification processes in yeast.
  // Talemi SR, Jacobson T, Garla V, Navarrete C, Wagner A, Tamás MJ, Schaber J.
  // Mol. Microbiol. 2014 Jun; 92(6): 1343-1356
  // Abstract:
  // Arsenic has a dual role as causative and curative agent of human disease. Therefore, there is considerable interest in elucidating arsenic toxicity and detoxification mechanisms. By an ensemble modelling approach, we identified a best parsimonious mathematical model which recapitulates and predicts intracellular arsenic dynamics for different conditions and mutants, thereby providing novel insights into arsenic toxicity and detoxification mechanisms in yeast, which could partly be confirmed experimentally by dedicated experiments. Specifically, our analyses suggest that: (i) arsenic is mainly protein-bound during short-term (acute) exposure, whereas glutathione-conjugated arsenic dominates during long-term (chronic) exposure, (ii) arsenic is not stably retained, but can leave the vacuole via an export mechanism, and (iii) Fps1 is controlled by Hog1-dependent and Hog1-independent mechanisms during arsenite stress. Our results challenge glutathione depletion as a key mechanism for arsenic toxicity and instead suggest that (iv) increased glutathione biosynthesis protects the proteome against the damaging effects of arsenic and that (v) widespread protein inactivation contributes to the toxicity of this metalloid. Our work in yeast may prove useful to elucidate similar mechanisms in higher eukaryotes and have implications for the use of arsenic in medical therapy.
  // This model is hosted on BioModels Database and identified by: BIOMD0000000547.
  // To cite BioModels Database, please use: BioModels Database: An enhanced, curated and annotated resource for published quantitative kinetic models.
  // To the extent possible under law, all copyright and related or neighbouring rights to this encoded model have been dedicated to the public domain worldwide. Please refer to CC0 Public Domain Dedication for more information.
  // biomodels.db:MODEL1403280000
  // biomodels.db:BIOMD0000000547
  // isDescribedBy pubmed:24798644
  // isVersionOf GO:0046685
  // hasTaxon taxonomy:4932
  // hasProperty mamo:MAMO_0000046

  // Compartments:
  compartment Medium = 5e-11;
  compartment Cell = 5e-14;
  compartment Vac = 0.4*Cell;
  compartment Cell_vac = 0.6*Cell; Cell_vac is "Cell-vac";

  // Species:
  substanceOnly species $AsIIIex in Medium;  // isVersionOf CHEBI:29242; occursIn GO:0005576
  substanceOnly species Ycf1 in Cell = piecewise(0.013151, v12_ko > 0, 0.013151*Ycf1_increase)*Cell;  // uniprot:P39109
  substanceOnly species Hog1PP in Cell = piecewise(Hog1/Cell*(AsIIIin/Cell_vac)*v4_k/v5_k1, v4_ko > 0, 0)*Cell;  // uniprot:P32485; hasProperty PATO:0002220
  substanceOnly species Hog1 in Cell = piecewise(0.167/(AsIIIin/Cell_vac*v4_k/v5_k1 + 1), v4_ko > 0, 0.167)*Cell;  // uniprot:P32485
  substanceOnly species Fps1P in Cell = Fps1/Cell*(v6_k*(AsIIIin/Cell_vac) + v6_k1*(Hog1PP/Cell) + v6_kb)/v7_k1*Cell;  // uniprot:P23900; hasProperty PATO:0002220
  substanceOnly species Fps1 in Cell = 0.03/((v6_k*(AsIIIin/Cell_vac) + v6_k1*(Hog1PP/Cell) + v6_kb)/v7_k1 + 1)*Cell;  // uniprot:P23900
  substanceOnly species Acr3 in Cell = piecewise(Fps1/Cell*v1_k*(AsIIIex/Medium - AsIIIin/Cell_vac)/(v14_Vmax*(AsIIIin/Cell_vac)/(v14_Km + AsIIIin/Cell_vac)), v12_ko > 0, 0)*Cell;  // uniprot:Q06598
  substanceOnly species vAsGS3 in Vac = piecewise(v10_k*(Ycf1/Cell)*(AsGS3/Cell_vac)/v11_k, v10_ko > 0, 0)*Vac;  // isVersionOf CHEBI:29242; hasProperty GO:0044437
  substanceOnly species AsGS3 in Cell_vac = v8_k*GSH_damping_factor*(AsIIIin/Cell_vac)*(GSH/Cell_vac)/v9_k1*Cell_vac;  // isVersionOf CHEBI:29242
  substanceOnly species AsIIIin in Cell_vac = piecewise(D_AsIIIin_initial, v12_ko > 0, 100)*Cell_vac;  // isVersionOf CHEBI:29242; hasProperty GO:0005622
  substanceOnly species AsIIIProt in Cell_vac = v2_k1*(AsIIIin/Cell_vac)/v3_k1*Cell_vac;  // hasVersion CHEBI:29242; hasPart CHEBI:36080
  substanceOnly species GSH in Cell_vac = piecewise(GSH_wt*GSH_damping_factor, v12_ko > 0, piecewise(GSH_wt*GSH_Acr3, v4_ko > 0, GSH_wt*GSH_Acr3Hog1D))*Cell_vac;  // CHEBI:16856

  // Parameters:
  AsIIIex_initial = 100;
  AsIIIex_shock = 1000;
  AsIIIex_t1 = 0;
  AsIIex_t2 = 3600;
  AsIIIex_tm = 30;
  var Asngpermil_tot;
  Asmolweight = 74.9216;
  var Asngpermil_in;
  var Asngpermil_pro;
  var Asngpermil_GS3;
  var Asngpermil_vac;
  var Hog1PPfit;
  var Fps1Pfit;
  Fps1PPmax = 0.0299643;
  var k18;
  var k20;
  D_AsIIIin_initial = 13.1549;
  var Hog1_SUM;
  GSH_wt = 1600;
  GSH_Acr3Hog1D = 5.99924;
  GSH_Acr3 = 2.82037;
  var GSH_damping_factor;
  ko_8 = 1; ko_8 is "ko-8";
  Ycf1_increase = 20;
  v12_ko = 1;
  v4_k = 0.0757274;
  v5_k1 = 161.334;
  v4_ko = 1;
  v6_k = 0.000257134;
  v6_k1 = 1102.15;
  v6_kb = 0.0730991;
  v7_k1 = 0.0719168;
  v1_k = 0.00215551;
  v14_Vmax = 1;
  v14_Km = 5.16159e-6;
  v10_k = 3.49703e-6;
  v11_k = 1.92773e-7;
  v10_ko = 1;
  v8_k = 0.202797;
  v9_k1 = 6.1432;
  v2_k1 = 0.00880734;
  v3_k1 = 0.000656918;
  v13_k1 = 9.01422e-13;
  Initial_for_Cell_vac = Cell_vac; Initial_for_Cell_vac is "Initial for Cell-vac";
  Initial_for_AsIIIin = AsIIIin;
  Initial_for_Acr3 = Acr3;
  Initial_for_Fps1 = Fps1;
  Initial_for_AsIIIex = AsIIIex;
  Initial_for_Vac = Vac;
  Initial_for_Fps1PPmax = Fps1PPmax;
  Initial_for_ko_8 = ko_8; Initial_for_ko_8 is "Initial for ko-8";

  // Assignment rules:
  Asngpermil_tot := (AsIIIin/Cell_vac + AsIIIProt/Cell_vac + AsGS3/Cell_vac)*Initial_for_Cell_vac*Asmolweight*10^9 + vAsGS3/Vac*Initial_for_Vac*Asmolweight*10^9;
  Asngpermil_in := AsIIIin/Cell_vac*Initial_for_Cell_vac*Asmolweight*10^9;
  Asngpermil_pro := AsIIIProt/Cell_vac*Initial_for_Cell_vac*Asmolweight*10^9;
  Asngpermil_GS3 := AsGS3/Cell_vac*Initial_for_Cell_vac*Asmolweight*10^9;
  AsIIIex := piecewise(AsIIIex_initial, time < AsIIIex_t1, piecewise((AsIIIex_initial + AsIIIex_shock)*exp((AsIIex_t2 - time)/AsIIIex_tm), time > AsIIex_t2, AsIIIex_initial + AsIIIex_shock*(1 - exp((AsIIIex_t1 - time)/AsIIIex_tm))))*Medium;
  Asngpermil_vac := vAsGS3/Vac*Initial_for_Vac*Asmolweight*10^9;
  Fps1Pfit := 100*(Fps1P/Cell)/Initial_for_Fps1PPmax;
  k18 := v13_k1*Initial_for_Acr3/Initial_for_AsIIIin;
  k20 := piecewise(v1_k*Initial_for_Fps1*(Initial_for_AsIIIex - Initial_for_AsIIIin)/(Initial_for_Acr3*Initial_for_AsIIIin), v12_ko > 0, 0);
  Hog1_SUM := Hog1/Cell + Hog1PP/Cell;
  Hog1PPfit := 100*(Hog1PP/Cell)/Hog1_SUM;
  GSH_damping_factor := piecewise(1, Initial_for_ko_8 > 0, 0.2175);
  Asngpermil_ex := AsIIIex/Medium*Cell*Asmolweight*10^9;

  // Reactions:
  v1: $AsIIIex -> AsIIIin; corrected_modified_diffusion(Cell, Fps1/Cell, v1_k, AsIIIex/Medium, AsIIIin/Cell_vac);  // modifiers: Fps1
  v4: Hog1 => Hog1PP; Cell*_2p_modified_mass_action_irrev(Hog1/Cell, AsIIIin/Cell_vac, v4_k, v4_ko);  // modifiers: AsIIIin
  v5: Hog1PP => Hog1; v5_k1*Hog1PP;
  v7: Fps1P => Fps1; v7_k1*Fps1P;
  v2: AsIIIin => AsIIIProt; v2_k1*AsIIIin;
  v3: AsIIIProt => AsIIIin; v3_k1*AsIIIProt;
  v8: AsIIIin + GSH => AsGS3; Cell_vac*_2p_2sub(v8_k, GSH_damping_factor, AsIIIin/Cell_vac, GSH/Cell_vac);
  v10: AsGS3 => vAsGS3; function_4(v10_ko, Ycf1/Cell, v10_k, Vac, AsGS3/Cell_vac);  // modifiers: Ycf1
  v12: => Acr3; Cell*_2p_modified_constant_flux_irrev(AsIIIin/Cell_vac, k18, v12_ko);  // modifiers: AsIIIin
  v13: Acr3 => ; v13_k1*Acr3;
  v14: AsIIIin => $AsIIIex; Rate_Law_for_v20(Cell, Acr3/Cell, v14_Vmax, AsIIIin/Cell_vac, v14_Km);  // modifiers: Acr3
  v6: Fps1 => Fps1P; Cell*Mixed_Hill(Fps1/Cell, v6_k, AsIIIin/Cell_vac, Hog1PP/Cell, v6_k1, v6_kb);  // modifiers: AsIIIin, Hog1PP
  v9: AsGS3 => AsIIIin + GSH; v9_k1*AsGS3;
  v11: vAsGS3 => AsGS3; corrected_mass_action(Vac, v11_k, vAsGS3/Vac);

  // Unit definitions:
  unit substance = 1e-6 mole;
end
