// SBML level 2 version 4

model MODEL1410300001()
  // Reiterer2013 - pseudophosphatase STYX role in ERK signalling
  // This model is described in the article:
  // Pseudophosphatase STYX modulates cell-fate decisions and cell migration by spatiotemporal regulation of ERK1/2.
  // Reiterer V, Fey D, Kolch W, Kholodenko BN, Farhan H.
  // Proc. Natl. Acad. Sci. U.S.A. 2013 Jul; 110(31): E2934-43
  // Abstract:
  // Serine/threonine/tyrosine-interacting protein (STYX) is a catalytically inactive member of the dual-specificity phosphatases (DUSPs) family. Whereas the role of DUSPs in cellular signaling is well explored, the function of STYX is still unknown. Here, we identify STYX as a spatial regulator of ERK signaling. We used predictive-model simulation to test several hypotheses for possible modes of STYX action. We show that STYX localizes to the nucleus, competes with nuclear DUSP4 for binding to ERK, and acts as a nuclear anchor that regulates ERK nuclear export. Depletion of STYX increases ERK activity in both cytosol and nucleus. Importantly, depletion of STYX causes an ERK-dependent fragmentation of the Golgi apparatus and inhibits Golgi polarization and directional cell migration. Finally, we show that overexpression of STYX reduces ERK1/2 activation, thereby blocking PC12 cell differentiation. Overall, our results identify STYX as an important regulator of ERK1/2 signaling critical for cell migration and PC12 cell differentiation.
  // This model is hosted on BioModels Database and identified by: BIOMD0000000557.
  // To cite BioModels Database, please use: BioModels Database: An enhanced, curated and annotated resource for published quantitative kinetic models.
  // To the extent possible under law, all copyright and related or neighbouring rights to this encoded model have been dedicated to the public domain worldwide. Please refer to CC0 Public Domain Dedication for more information.
  // biomodels.db:MODEL1410300001
  // biomodels.db:BIOMD0000000557
  // isDescribedBy pubmed:23847209
  // isVersionOf GO:0070372
  // occursIn BTO:0000567
  // hasTaxon taxonomy:9606

  // Compartments:
  compartment cytosol = 0.94;  // isVersionOf GO:0005829
  compartment nucleus = 0.22;  // isVersionOf GO:0005634

  // Species:
  species ERKc in cytosol = 572.5;  // isVersionOf uniprot:P27361
  species pERKc in cytosol = 0;  // isVersionOf uniprot:P27361
  species ppERKc in cytosol = 0;  // isVersionOf uniprot:P27361
  species ERK_ppMEKc in cytosol = 0;  // hasPart uniprot:P27361 uniprot:Q02750
  species pERK_ppMEKc in cytosol = 0;  // hasPart uniprot:P27361 uniprot:Q02750
  species DUSPc in cytosol = 100;  // isVersionOf uniprot:Q13115
  species pERK_DUSPc in cytosol = 0;  // isVersionOf uniprot:P27361 uniprot:Q13115
  species ppERK_DUSPc in cytosol = 0;  // isVersionOf uniprot:P27361 uniprot:Q13115
  species ERKn in nucleus = 1630.9;  // isVersionOf uniprot:P27361
  species pERKn in nucleus = 0;  // isVersionOf uniprot:P27361
  species ppERKn in nucleus = 0;  // isVersionOf uniprot:P27361
  species pERK_DUSPn in nucleus = 0;  // hasPart uniprot:P27361 uniprot:Q13115
  species ppERK_DUSPn in nucleus = 0;  // hasPart uniprot:P27361 uniprot:Q13115
  species STYXn in nucleus = 3000;  // isVersionOf uniprot:Q8WUJ0
  species ERK_STYXn in nucleus = 0;  // hasPart uniprot:P27361 uniprot:Q8WUJ0
  species pERK_STYXn in nucleus = 0;  // hasPart uniprot:P27361 uniprot:Q8WUJ0
  species ppERK_STYXn in nucleus = 0;  // hasPart uniprot:P27361 uniprot:Q8WUJ0
  species duspn in nucleus = 1;  // isVersionOf uniprot:Q13115
  species DUSPn in nucleus = 10;  // isVersionOf uniprot:Q13115
  species u_ppMEKc_tot in cytosol;  // isVersionOf uniprot:Q02750
  species ppMEKc_tot in cytosol;  // isVersionOf uniprot:Q02750
  species ERKc_obs in cytosol;  // isVersionOf uniprot:P27361
  species pERKc_obs in cytosol;  // isVersionOf uniprot:P27361
  species ppERKc_obs in cytosol;  // isVersionOf uniprot:P27361
  species ERK_ppMEKc_obs in cytosol;  // hasPart uniprot:P27361 uniprot:Q02750

  // Parameters:
  k_ERKin = 0.144;
  k_ERKout = 1.08;
  k_pERKin = 0.144;
  k_pERKout = 1.08;
  k_ppERKin = 0.66;
  k_ppERKout = 0.78;
  k1_ES = 1;
  k2_ES = 60;
  k1_pES = 1;
  k2_pES = 60;
  k1_ppES = 1;
  k2_ppES = 60;
  k1_ERKc = 1;
  k2_ERKc = 350;
  k3_ERKc = 13.2;
  kd1_ppERKc = 1;
  kd2_ppERKc = 60;
  kd3_ppERKc = 0.388;
  kd1_pERKc = 1;
  kd2_pERKc = 160;
  kd3_pERKc = 0.432;
  kd1_ERKc = 0;
  kd2_ERKc = 5160;
  k1_ERKn = 1;
  k2_ERKn = 350;
  k3_ERKn = 13.2;
  kd1_ppERKn = 1;
  kd2_ppERKn = 60;
  kd3_ppERKn = 38.88;
  kd1_pERKn = 1;
  kd2_pERKn = 160;
  kd3_pERKn = 43.2;
  kd1_ERKn = 0;
  kd2_ERKn = 160;
  k_ppMEKc_tot = 100;
  actCompl = 1e-9;
  duspn_basal = 1;
  duspn_ind = 20;
  Kduspn = 1000;
  Tduspn = 10;
  v2 = 10;
  TDUSPn = 45;
  scale_cytERK_tot = 1;
  scale_nucERK_tot = 1;
  scale_cellERK_tot = 1;
  scale_cytppERK_tot = 1;
  scale_nucppERK_tot = 1;
  scale_cellppERK_tot = 0.01938613;
  scale_tDUSPn = 1;
  scale_tERK_STYXn = 1;

  // Assignment rules:
  ppMEKc_tot := u_ppMEKc_tot*k_ppMEKc_tot;
  ERKc_obs := ERKc;
  pERKc_obs := pERKc;
  ppERKc_obs := ppERKc;
  ERK_ppMEKc_obs := ERK_ppMEKc;
  u_ppMEKc_tot := piecewise(0, time < -1, 0, time < 0, 1, time < 120, 1);

  // Reactions:
  reaction_1: ERKc -> ERK_ppMEKc; k1_ERKc*ERKc*(ppMEKc_tot*cytosol - ERK_ppMEKc*cytosol - pERK_ppMEKc)*cytosol - k2_ERKc*ERK_ppMEKc*cytosol;  // modifiers: ppMEKc_tot, pERK_ppMEKc
  reaction_2: ERK_ppMEKc => pERKc; k3_ERKc*ERK_ppMEKc*cytosol;
  reaction_3: pERKc -> pERK_ppMEKc; k1_ERKc*pERKc*(ppMEKc_tot*cytosol - pERK_ppMEKc*cytosol - ERK_ppMEKc)*cytosol - k2_ERKc*pERK_ppMEKc*cytosol;  // modifiers: ppMEKc_tot, ERK_ppMEKc
  reaction_4: pERK_ppMEKc => ppERKc; k3_ERKc*pERK_ppMEKc*cytosol;
  reaction_5: ERKc => ERKn; k_ERKin*ERKc*cytosol - k_ERKout*ERKn*nucleus;
  reaction_6: pERKc => pERKn; k_pERKin*pERKc*cytosol - k_pERKout*pERKn*nucleus;
  reaction_7: ppERKc => ppERKn; k_ppERKin*ppERKc*cytosol - k_ppERKout*ppERKn*nucleus;
  reaction_8: ppERKc + DUSPc -> ppERK_DUSPc; (kd1_ppERKc*ppERKc*DUSPc/0.94*cytosol - kd2_ppERKc*ppERK_DUSPc)*cytosol;
  reaction_9: ppERK_DUSPc => pERKc + DUSPc; kd3_ppERKc*ppERK_DUSPc*cytosol;
  reaction_10: pERKc + DUSPc -> pERK_DUSPc; (kd1_pERKc*pERKc*DUSPc/0.94*cytosol - kd2_pERKc*pERK_DUSPc)*cytosol;
  reaction_11: pERK_DUSPc => ERKc + DUSPc; kd3_pERKc*pERK_DUSPc*cytosol;
  reaction_12: ppERKn + DUSPn -> ppERK_DUSPn; (kd1_ppERKn*ppERKn*DUSPn/0.22*nucleus - kd2_ppERKn*ppERK_DUSPn)*nucleus;
  reaction_13: ppERK_DUSPn => pERKn + DUSPn; kd3_ppERKn*ppERK_DUSPn*nucleus;
  reaction_14: pERKn + DUSPn -> pERK_DUSPn; (kd1_pERKn*pERKn*DUSPn/0.22*nucleus - kd2_pERKn*pERK_DUSPn)*nucleus;
  reaction_15: pERK_DUSPn => ERKn + DUSPn; kd3_pERKn*pERK_DUSPn*nucleus;
  reaction_16: => duspn; duspn_basal*(1 + duspn_ind*ppERKn^2/(ppERKn^2*nucleus + Kduspn^2))*0.693/Tduspn;  // modifiers: ppERKn
  reaction_17: duspn => ; duspn*0.693/Tduspn*nucleus;
  reaction_18: => DUSPn; v2*duspn/0.22*0.693/TDUSPn*nucleus;  // modifiers: duspn
  reaction_19: DUSPn => ; DUSPn*0.693/TDUSPn*nucleus;
  reaction_20: ERKn + STYXn -> ERK_STYXn; (k1_ES*ERKn*STYXn/0.22*nucleus - k2_ES*ERK_STYXn)*nucleus;
  reaction_21: pERKn + STYXn -> pERK_STYXn; (k1_pES*pERKn*STYXn/0.22*nucleus - k2_pES*pERK_STYXn)*nucleus;
  reaction_22: ppERKn + STYXn -> ppERK_STYXn; (k1_ppES*ppERKn*STYXn/0.22*nucleus - k2_ppES*ppERK_STYXn)*nucleus;
end
