// SBML level 2 version 4

model MODEL1412010000()
  // Ouzounoglou2014 - Modeling of alpha-synuclein effects on neuronal homeostasis
  // This model is described in the article:
  // In silico modeling of the effects of alpha-synuclein oligomerization on dopaminergic neuronal homeostasis.
  // Ouzounoglou E, Kalamatianos D, Emmanouilidou E, Xilouri M, Stefanis L, Vekrellis K, Manolakos ES.
  // BMC Syst Biol 2014; 8: 54
  // Abstract:
  // BACKGROUND: Alpha-synuclein (ASYN) is central in Parkinson's disease (PD) pathogenesis. Converging pieces of evidence suggest that the levels of ASYN expression play a critical role in both familial and sporadic Parkinson's disease. ASYN fibrils are the main component of inclusions called Lewy Bodies (LBs) which are found mainly in the surviving neurons of the substantia nigra. Despite the accumulated knowledge regarding the involvement of ASYN in molecular mechanisms underlying the development of PD, there is much information missing which prevents understanding the causes of the disease and how to stop its progression. RESULTS: Using a Systems Biology approach, we develop a biomolecular reactions model that describes the intracellular ASYN dynamics in relation to overexpression, post-translational modification, oligomerization and degradation of the protein. Especially for the proteolysis of ASYN, the model takes into account the biological knowledge regarding the contribution of Chaperone Mediated Autophagy (CMA), macro-autophagic and proteasome pathways in the protein's degradation. Importantly, inhibitory phenomena, caused by ASYN, concerning CMA (more specifically the lysosomal-associated membrane protein 2a, abbreviated as Lamp2a receptor, which is the rate limiting step of CMA) and the proteasome are carefully modeled. The model is validated by simulation studies of known experimental overexpression data from SH-SY5Y cells and the unknown model parameters are estimated either computationally or by experimental fitting. The calibrated model is then tested under three hypothetical intervention scenarios and in all cases predicts increased cell viability that agrees with experimental evidence. The biomodel has been annotated and is made available in SBML format. CONCLUSIONS: The mathematical model presented here successfully simulates the dynamic phenomena of ASYN overexpression and oligomerization and predicts the biological system's behavior in a number of scenarios not used for model calibration. It allows, for the first time, to qualitatively estimate the protein levels that are capable of deregulating proteolytic homeostasis. In addition, it can help form new hypotheses for intervention that could be tested experimentally.
  // Note: The model contains reactions of species located in different compartments. If the model is applied using volume sizes unequal to one, an extension of the model might be reasonable to guarantee mass conservation.
  // This model is hosted on BioModels Database and identified by: BIOMD0000000559.
  // To cite BioModels Database, please use: BioModels Database: An enhanced, curated and annotated resource for published quantitative kinetic models.
  // To the extent possible under law, all copyright and related or neighbouring rights to this encoded model have been dedicated to the public domain worldwide. Please refer to CC0 Public Domain Dedication for more information.
  // biomodels.db:MODEL1412010000
  // biomodels.db:BIOMD0000000559
  // isDescribedBy pubmed:24885905
  // isVersionOf GO:0006914 GO:0030163 GO:0042053 GO:0070841
  // hasTaxon taxonomy:9606
  // hasProperty mamo:MAMO_0000046

  // Compartments:
  compartment Lysosome = 1;  // GO:0005764
  compartment M_autophagy_OtherLysDegrPath = 1; M_autophagy_OtherLysDegrPath is "M/autophagy&OtherLysDegrPath";  // GO:0005776
  compartment Cytosol = 1;  // GO:0005829

  // Species:
  substanceOnly species Lamp2a in Lysosome = 200;  // uniprot:P13473
  substanceOnly species WTasyn_Lysosome in Lysosome = 0;  // isVersionOf uniprot:P37840
  substanceOnly species WTasyn2_Lysosome in Lysosome = 0;  // isVersionOf uniprot:P37840
  substanceOnly species WTasyndegr in Lysosome = 0;  // isVersionOf uniprot:P37840
  substanceOnly species WTasyn2degr in Lysosome = 0;  // isVersionOf uniprot:P37840
  substanceOnly species WTasyn2merCMADegr_Lysosome in Lysosome = 0;  // hasPart uniprot:P13473; hasPart uniprot:P37840
  substanceOnly species WTasynCMADegr in Lysosome = 0;  // hasPart uniprot:P13473; hasPart uniprot:P37840
  substanceOnly species DopModWTasyn2merOnLamp in Lysosome = 0;  // hasPart uniprot:P13473; hasPart CHEBI:18243; hasPart uniprot:P37840
  substanceOnly species DopModWTasyn3merOnLamp in Lysosome = 0;  // hasPart CHEBI:18243; hasPart uniprot:P13473; hasPart uniprot:P37840
  substanceOnly species DopModWTasyn4merOnLamp in Lysosome = 0;  // hasPart CHEBI:18243; hasPart uniprot:P37840; hasPart uniprot:P13473
  substanceOnly species DopModWTasyn7merOnLamp in Lysosome = 0;  // hasPart uniprot:P13473; hasPart CHEBI:18243; hasPart uniprot:P37840
  substanceOnly species DopModWTasyn6merOnLamp in Lysosome = 0;  // hasPart uniprot:P37840; hasPart CHEBI:18243; hasPart uniprot:P13473
  substanceOnly species DopModWTasyn5merOnLamp in Lysosome = 0;  // hasPart uniprot:P13473; hasPart CHEBI:18243; hasPart uniprot:P37840
  substanceOnly species DopModWTasyn8merOnLamp in Lysosome = 0;  // hasPart uniprot:P37840; hasPart CHEBI:18243; hasPart uniprot:P13473
  substanceOnly species DopModWTasyn9merOnLamp in Lysosome = 0;  // hasPart uniprot:P13473; hasPart uniprot:P37840; hasPart CHEBI:18243
  substanceOnly species WTasyn3merOnLamp in Lysosome = 0;  // hasPart uniprot:P13473; hasPart uniprot:P37840
  substanceOnly species WTasyn4merOnLamp in Lysosome = 0;  // hasPart uniprot:P37840; hasPart uniprot:P13473
  substanceOnly species WTasyn5merOnLamp in Lysosome = 0;  // hasPart uniprot:P37840; hasPart uniprot:P13473
  substanceOnly species WTasyn6merOnLamp in Lysosome = 0;  // hasPart uniprot:P13473; hasPart uniprot:P37840
  substanceOnly species WTasyn7merOnLamp in Lysosome = 0;  // hasPart uniprot:P13473; hasPart uniprot:P37840
  substanceOnly species WTasyn8merOnLamp in Lysosome = 0;  // hasPart uniprot:P37840; hasPart uniprot:P13473
  substanceOnly species WTasyn9merOnLamp in Lysosome = 0;  // hasPart uniprot:P37840; hasPart uniprot:P13473
  substanceOnly species DopModWTasynOnLamp in Lysosome = 0;  // hasPart uniprot:P13473; hasPart uniprot:P37840; hasPart CHEBI:18243
  substanceOnly species WTasyn2merM_Adegr in M_autophagy_OtherLysDegrPath = 0; WTasyn2merM_Adegr is "WTasyn2merM/Adegr";  // isVersionOf uniprot:P37840
  substanceOnly species WTasyn3merM_Adegr in M_autophagy_OtherLysDegrPath = 0; WTasyn3merM_Adegr is "WTasyn3merM/Adegr";  // isVersionOf uniprot:P37840
  substanceOnly species WTasyn4merM_Adegrr in M_autophagy_OtherLysDegrPath = 0; WTasyn4merM_Adegrr is "WTasyn4merM/Adegrr";  // isVersionOf uniprot:P37840
  substanceOnly species WTasyn5merM_Adegr in M_autophagy_OtherLysDegrPath = 0; WTasyn5merM_Adegr is "WTasyn5merM/Adegr";  // isVersionOf uniprot:P37840
  substanceOnly species WTasyn6merM_Adegr in M_autophagy_OtherLysDegrPath = 0; WTasyn6merM_Adegr is "WTasyn6merM/Adegr";  // isVersionOf uniprot:P37840
  substanceOnly species WTasyn7merM_Adegr in M_autophagy_OtherLysDegrPath = 0; WTasyn7merM_Adegr is "WTasyn7merM/Adegr";  // isVersionOf uniprot:P37840
  substanceOnly species WTasyn8merM_Adegr in M_autophagy_OtherLysDegrPath = 0; WTasyn8merM_Adegr is "WTasyn8merM/Adegr";  // isVersionOf uniprot:P37840
  substanceOnly species DopModWTasyn2merM_Adegr in M_autophagy_OtherLysDegrPath = 0; DopModWTasyn2merM_Adegr is "DopModWTasyn2merM/Adegr";  // hasVersion uniprot:P37840; hasVersion CHEBI:18243
  substanceOnly species DopModWTasyn3merM_Adegr in M_autophagy_OtherLysDegrPath = 0; DopModWTasyn3merM_Adegr is "DopModWTasyn3merM/Adegr";  // hasVersion CHEBI:18243; hasVersion uniprot:P37840
  substanceOnly species DopModWTasyn4merM_Adegr in M_autophagy_OtherLysDegrPath = 0; DopModWTasyn4merM_Adegr is "DopModWTasyn4merM/Adegr";  // hasVersion CHEBI:18243; hasVersion uniprot:P37840
  substanceOnly species DopModWTasyn6merM_Adegr in M_autophagy_OtherLysDegrPath = 0; DopModWTasyn6merM_Adegr is "DopModWTasyn6merM/Adegr";  // hasVersion CHEBI:18243; hasVersion uniprot:P37840
  substanceOnly species DopModWTasyn8merM_Adegr in M_autophagy_OtherLysDegrPath = 0; DopModWTasyn8merM_Adegr is "DopModWTasyn8merM/Adegr";  // hasVersion uniprot:P37840; hasVersion CHEBI:18243
  substanceOnly species WTasyn4_M_autophagy_OtherLysDegrPath in M_autophagy_OtherLysDegrPath = 0;  // uniprot:P37840
  substanceOnly species WTasyn5_M_autophagy_OtherLysDegrPath in M_autophagy_OtherLysDegrPath = 0;  // uniprot:P37840
  substanceOnly species WTasyn6_M_autophagy_OtherLysDegrPath in M_autophagy_OtherLysDegrPath = 0;  // uniprot:P37840
  substanceOnly species WTasyn3_M_autophagy_OtherLysDegrPath in M_autophagy_OtherLysDegrPath = 0;  // uniprot:P37840
  substanceOnly species WTasyn2_M_autophagy_OtherLysDegrPath in M_autophagy_OtherLysDegrPath = 0;  // uniprot:P37840
  substanceOnly species WTasyn7_M_autophagy_OtherLysDegrPath in M_autophagy_OtherLysDegrPath = 0;  // uniprot:P37840
  substanceOnly species WTasyn8_M_autophagy_OtherLysDegrPath in M_autophagy_OtherLysDegrPath = 0;  // uniprot:P37840
  substanceOnly species DopModWTasyn7merM_Adegr in M_autophagy_OtherLysDegrPath = 0; DopModWTasyn7merM_Adegr is "DopModWTasyn7merM/Adegr";  // hasVersion CHEBI:18243; hasVersion uniprot:P37840
  substanceOnly species DopModWTasyn8_M_autophagy_OtherLysDegrPath in M_autophagy_OtherLysDegrPath = 0;  // hasPart CHEBI:18243; hasPart uniprot:P37840
  substanceOnly species DopModWTasyn7_M_autophagy_OtherLysDegrPath in M_autophagy_OtherLysDegrPath = 0;  // hasPart CHEBI:18243; hasPart uniprot:P37840
  substanceOnly species DopModWTasyn6_M_autophagy_OtherLysDegrPath in M_autophagy_OtherLysDegrPath = 0;  // hasPart CHEBI:18243; hasPart uniprot:P37840
  substanceOnly species DopModWTasyn5_M_autophagy_OtherLysDegrPath in M_autophagy_OtherLysDegrPath = 0;  // hasPart uniprot:P37840; hasPart CHEBI:18243
  substanceOnly species DopModWTasyn4_M_autophagy_OtherLysDegrPath in M_autophagy_OtherLysDegrPath = 0;  // hasPart CHEBI:18243; hasPart uniprot:P37840
  substanceOnly species DopModWTasyn3_M_autophagy_OtherLysDegrPath in M_autophagy_OtherLysDegrPath = 0;  // hasPart CHEBI:18243; hasPart uniprot:P37840
  substanceOnly species WTasyn_M_autophagy_OtherLysDegrPath in M_autophagy_OtherLysDegrPath = 0;  // uniprot:P37840
  substanceOnly species DopModWTasyn_M_autophagy_OtherLysDegrPath in M_autophagy_OtherLysDegrPath = 0;  // hasPart uniprot:P37840; hasPart CHEBI:18243
  substanceOnly species DopModWTasyn2_M_autophagy_OtherLysDegrPath in M_autophagy_OtherLysDegrPath = 0;  // hasVersion CHEBI:18243; hasVersion uniprot:P37840
  substanceOnly species DopModWTasyn5_Cytosol in Cytosol = 8;  // hasPart uniprot:P37840; hasPart CHEBI:18243
  substanceOnly species DopModWTasyn4_Cytosol in Cytosol = 8;  // hasPart CHEBI:18243; hasPart uniprot:P37840
  substanceOnly species $SOURCE in Cytosol = 1;  // isVersionOf GO:0006351; isVersionOf GO:0006412
  substanceOnly species DopModWTasyn3_Cytosol in Cytosol = 8;  // hasPart CHEBI:18243; hasPart uniprot:P37840
  substanceOnly species DopModWTasyn2_Cytosol in Cytosol = 0;  // hasPart uniprot:P37840; hasPart CHEBI:18243
  substanceOnly species DopModWTasyn_Cytosol in Cytosol = 953;  // hasPart uniprot:P37840
  substanceOnly species WTasyn_Cytosol in Cytosol = 1650;  // uniprot:P37840
  substanceOnly species WTasyn2_Cytosol in Cytosol = 22;  // hasPart uniprot:P37840
  substanceOnly species WTasyn3_Cytosol in Cytosol = 8;  // hasPart uniprot:P37840
  substanceOnly species DopModWTasyn6_Cytosol in Cytosol = 8;  // hasPart uniprot:P37840; hasPart CHEBI:18243
  substanceOnly species Dopamine in Cytosol = 750;  // CHEBI:18243
  substanceOnly species WTasyn5_Cytosol in Cytosol = 8;  // hasPart uniprot:P37840
  substanceOnly species WTasyn4_Cytosol in Cytosol = 8;  // hasPart uniprot:P37840
  substanceOnly species DopModWTasyn7_Cytosol in Cytosol = 8;  // hasPart uniprot:P37840; hasPart CHEBI:18243
  substanceOnly species DopModWTasyn8_Cytosol in Cytosol = 8;  // hasPart uniprot:P37840; hasPart CHEBI:18243
  substanceOnly species DopModWTasyn9 in Cytosol = 8;  // hasPart CHEBI:18243; hasPart uniprot:P37840
  substanceOnly species WTasyn9 in Cytosol = 8;  // hasPart uniprot:P37840
  substanceOnly species WTasyn8_Cytosol in Cytosol = 8;  // hasPart uniprot:P37840
  substanceOnly species WTasyn7_Cytosol in Cytosol = 8;  // hasPart uniprot:P37840
  substanceOnly species WTasyn6_Cytosol in Cytosol = 8;  // hasPart uniprot:P37840
  substanceOnly species HigherWTasynSPC in Cytosol = 0;  // hasPart uniprot:P37840
  substanceOnly species Proteasome in Cytosol = 1500;  // isVersionOf GO:0000502
  substanceOnly species Dopamine_degraded in Cytosol = 0;  // isVersionOf CHEBI:18243
  substanceOnly species ProtWTasyn3 in Cytosol = 0;  // hasPart GO:0000502; hasPart uniprot:P37840
  substanceOnly species ProtWTasyn4 in Cytosol = 0;  // hasPart uniprot:P37840; hasPart GO:0000502
  substanceOnly species ProtWTasyn5 in Cytosol = 0;  // hasPart uniprot:P37840; hasPart GO:0000502
  substanceOnly species ProtWTasyn6 in Cytosol = 0;  // hasPart uniprot:P37840; hasPart GO:0000502
  substanceOnly species ProtWTasyn7 in Cytosol = 0;  // hasPart uniprot:P37840; hasPart GO:0000502
  substanceOnly species ProtWTasyn8 in Cytosol = 0;  // hasPart uniprot:P37840; hasPart GO:0000502
  substanceOnly species ProtWTasyn9 in Cytosol = 0;  // hasPart GO:0000502; hasPart uniprot:P37840
  substanceOnly species ProtDopModWTasyn3 in Cytosol = 0;  // hasPart CHEBI:18243; hasPart uniprot:P37840; hasPart GO:0000502
  substanceOnly species ProtDopModWTasyn4 in Cytosol = 0;  // hasPart uniprot:P37840; hasPart GO:0000502; hasPart CHEBI:18243
  substanceOnly species ProtDopModWTasyn5 in Cytosol = 0;  // hasPart uniprot:P37840; hasPart CHEBI:18243; hasPart GO:0000502
  substanceOnly species ProtDopModWTasyn6 in Cytosol = 0;  // hasPart CHEBI:18243; hasPart GO:0000502; hasPart uniprot:P37840
  substanceOnly species ProtDopModWTasyn7 in Cytosol = 0;  // hasPart uniprot:P37840; hasPart CHEBI:18243; hasPart GO:0000502
  substanceOnly species ProtDopModWTasyn8 in Cytosol = 0;  // hasPart uniprot:P37840; hasPart GO:0000502; hasPart CHEBI:18243
  substanceOnly species ProtDopModWTasyn9 in Cytosol = 0;  // hasPart CHEBI:18243; hasPart uniprot:P37840; hasPart GO:0000502
  substanceOnly species ProtWTasynHigherSPC in Cytosol = 0;  // hasPart uniprot:P37840; hasPart GO:0000502

  // Parameters:
  k_DisRate = 4.999534e-7;
  k_2merForm = 1.462941e-9;
  k_DopModWTasynLampBind = 7.6715997e-9;
  k_LampFreeWTasyn = 0.0003044572;
  k_OligAutophagUptake = 2.39034347e-8;
  k_OligomerForm = 3.350497e-8;
  k_ProteasomeBind = 3.424694e-9;
  k_ProtOligDegr = 0.000370096;
  k_WTasyn1_2merBindOnLamp = 6.865455e-7;
  k_WTOligBindOnLamp = 4e-6;
  k_M_autophagyDegr = 0.1;

  // Assignment rules:
  Total_Cytosolic_WTASYN_Dimer := DopModWTasyn2_Cytosol*Cytosol + WTasyn2_Cytosol*Cytosol;
  Total_Cytosolic_WTASYN_Monomer := WTasyn_Cytosol*Cytosol + DopModWTasyn_Cytosol*Cytosol;
  Total_Cytosolic_WTASYN_Oligomers := DopModWTasyn3_Cytosol*Cytosol + DopModWTasyn4_Cytosol*Cytosol + DopModWTasyn5_Cytosol*Cytosol + DopModWTasyn6_Cytosol*Cytosol + DopModWTasyn7_Cytosol*Cytosol + DopModWTasyn8_Cytosol*Cytosol + DopModWTasyn9*Cytosol + WTasyn3_Cytosol*Cytosol + WTasyn4_Cytosol*Cytosol + WTasyn5_Cytosol*Cytosol + WTasyn6_Cytosol*Cytosol + WTasyn7_Cytosol*Cytosol + WTasyn8_Cytosol*Cytosol + WTasyn9*Cytosol;

  // Reactions:
  WTasynSynthesis: $SOURCE => WTasyn_Cytosol; Cytosol*WTasynSynthesis_k1*SOURCE;  // isVersionOf GO:0006412; isVersionOf GO:0006351
    WTasynSynthesis_k1 = 0.0294219;
  DopProduction: $SOURCE => Dopamine; Cytosol*DopProduction_k1*SOURCE;  // isVersionOf GO:0042416
    DopProduction_k1 = 0.0791823;
  _2merForm: 2 WTasyn_Cytosol => WTasyn2_Cytosol; Cytosol*k_2merForm*WTasyn_Cytosol^2;  // isVersionOf GO:0051259
  WTasynDopModification: WTasyn_Cytosol + Dopamine => DopModWTasyn_Cytosol; Cytosol*WTasynDopModification_k1*WTasyn_Cytosol*Dopamine;  // isVersionOf GO:0006461; isVersionOf GO:0032460
    WTasynDopModification_k1 = 6.74768e-7;
  WTasynLampBind: WTasyn_Cytosol + Lamp2a => WTasyndegr; k_WTasyn1_2merBindOnLamp*WTasyn_Cytosol*Lamp2a;  // isVersionOf GO:0006622; isVersionOf GO:0005102
  AutophagosomeUptakeWTasyn2mer: WTasyn2_Cytosol => WTasyn2_M_autophagy_OtherLysDegrPath; k_OligAutophagUptake*WTasyn2_Cytosol;  // isVersionOf GO:0016236
  _3merForm: WTasyn2_Cytosol + WTasyn_Cytosol => WTasyn3_Cytosol; Cytosol*k_OligomerForm*WTasyn2_Cytosol*WTasyn_Cytosol;  // isVersionOf GO:0051259
  WTasyn2LampBind: WTasyn2_Cytosol + Lamp2a => WTasyn2degr; k_WTasyn1_2merBindOnLamp*WTasyn2_Cytosol*Lamp2a;  // isVersionOf GO:0006622; isVersionOf GO:0005102
  AutophagosomeUptakeWTasyn3mer: WTasyn3_Cytosol => WTasyn3_M_autophagy_OtherLysDegrPath; k_OligAutophagUptake*WTasyn3_Cytosol;  // isVersionOf GO:0016236
  _4merForm: WTasyn3_Cytosol + WTasyn_Cytosol => WTasyn4_Cytosol; Cytosol*k_OligomerForm*WTasyn3_Cytosol*WTasyn_Cytosol;  // isVersionOf GO:0051529
  _3merProtBind: WTasyn3_Cytosol + Proteasome => ProtWTasyn3; Cytosol*k_ProteasomeBind*WTasyn3_Cytosol*Proteasome;  // isVersionOf GO:1901799; isVersionOf GO:0070628; isVersionOf GO:0010498
  AutophagosomeUptakeWTasyn4mer: WTasyn4_Cytosol => WTasyn4_M_autophagy_OtherLysDegrPath; k_OligAutophagUptake*WTasyn4_Cytosol;  // isVersionOf GO:0016236
  _5merForm: WTasyn4_Cytosol + WTasyn_Cytosol => WTasyn5_Cytosol; Cytosol*k_OligomerForm*WTasyn4_Cytosol*WTasyn_Cytosol;  // isVersionOf GO:0051259
  _4merProtBind: WTasyn4_Cytosol + Proteasome => ProtWTasyn4; Cytosol*k_ProteasomeBind*WTasyn4_Cytosol*Proteasome;  // isVersionOf GO:0070628; isVersionOf GO:1901799; isVersionOf GO:0010498
  AutophagosomeUptakeWTasyn5mer: WTasyn5_Cytosol => WTasyn5_M_autophagy_OtherLysDegrPath; k_OligAutophagUptake*WTasyn5_Cytosol;  // isVersionOf GO:0016236
  _6merForm: WTasyn5_Cytosol + WTasyn_Cytosol => WTasyn6_Cytosol; Cytosol*k_OligomerForm*WTasyn5_Cytosol*WTasyn_Cytosol;  // hasVersion GO:0051259
  _5merProtBind: WTasyn5_Cytosol + Proteasome => ProtWTasyn5; Cytosol*k_ProteasomeBind*WTasyn5_Cytosol*Proteasome;  // isVersionOf GO:0010498; isVersionOf GO:0070628; isVersionOf GO:1901799
  WTasyn5merBindOnLamp: WTasyn5_Cytosol + Lamp2a => WTasyn5merOnLamp; k_WTOligBindOnLamp*WTasyn5_Cytosol*Lamp2a;  // isVersionOf GO:0005102
  AutophagosomeUptakeWTasyn6mer: WTasyn6_Cytosol => WTasyn6_M_autophagy_OtherLysDegrPath; k_OligAutophagUptake*WTasyn6_Cytosol;  // isVersionOf GO:0016236
  _7merForm: WTasyn6_Cytosol + WTasyn_Cytosol => WTasyn7_Cytosol; Cytosol*k_OligomerForm*WTasyn6_Cytosol*WTasyn_Cytosol;  // isVersionOf GO:0051259
  _6merProtBind: WTasyn6_Cytosol + Proteasome => ProtWTasyn6; Cytosol*k_ProteasomeBind*WTasyn6_Cytosol*Proteasome;  // isVersionOf GO:0070628; isVersionOf GO:0010498; isVersionOf GO:1901799
  AutophagosomeUptakeWTasyn7mer: WTasyn7_Cytosol => WTasyn7_M_autophagy_OtherLysDegrPath; k_OligAutophagUptake*WTasyn7_Cytosol;  // isVersionOf GO:0016236
  _8merForm: WTasyn7_Cytosol + WTasyn_Cytosol => WTasyn8_Cytosol; Cytosol*k_OligomerForm*WTasyn7_Cytosol*WTasyn_Cytosol;  // isVersionOf GO:0051259
  _7merProtBind: WTasyn7_Cytosol + Proteasome => ProtWTasyn7; Cytosol*k_ProteasomeBind*WTasyn7_Cytosol*Proteasome;  // isVersionOf GO:0070628; isVersionOf GO:0010498; isVersionOf GO:1901799
  WTasyn7merBindOnLamp: WTasyn7_Cytosol + Lamp2a => WTasyn7merOnLamp; k_WTOligBindOnLamp*WTasyn7_Cytosol*Lamp2a;  // isVersionOf GO:0005102
  AutophagosomeUptakeWTasyn8mer: WTasyn8_Cytosol => WTasyn8_M_autophagy_OtherLysDegrPath; k_OligAutophagUptake*WTasyn8_Cytosol;  // isVersionOf GO:0016236
  _9merForm: WTasyn8_Cytosol + WTasyn_Cytosol => WTasyn9; Cytosol*k_OligomerForm*WTasyn8_Cytosol*WTasyn_Cytosol;  // isVersionOf GO:0051259
  _8merProtBind: WTasyn8_Cytosol + Proteasome => ProtWTasyn8; Cytosol*k_ProteasomeBind*WTasyn8_Cytosol*Proteasome;  // isVersionOf GO:0010498; isVersionOf GO:0070628; isVersionOf GO:1901799
  _9merProtBind: WTasyn9 + Proteasome => ProtWTasyn9; Cytosol*k_ProteasomeBind*WTasyn9*Proteasome;  // isVersionOf GO:0010498; isVersionOf GO:0070628; isVersionOf GO:1901799
  WTasyn9merBindOnLamp: WTasyn9 + Lamp2a => WTasyn9merOnLamp; k_WTOligBindOnLamp*WTasyn9*Lamp2a;  // isVersionOf GO:0005102
  DopamineDegr: Dopamine => Dopamine_degraded; Cytosol*DopamineDegr_k1*Dopamine;  // isVersionOf GO:0042240
    DopamineDegr_k1 = 0.00679501;
  DopMod2merForm: 2 DopModWTasyn_Cytosol => DopModWTasyn2_Cytosol; Cytosol*k_2merForm*DopModWTasyn_Cytosol^2;  // isVersionOf GO:0035786
  DopWTasyn2merFormOnLamp: DopModWTasyn_Cytosol + DopModWTasynOnLamp => DopModWTasyn2merOnLamp; k_2merForm*DopModWTasyn_Cytosol*DopModWTasynOnLamp;  // isVersionOf GO:0035786
  DopWTasyn7merFormOnLamp: DopModWTasyn_Cytosol + DopModWTasyn6merOnLamp => DopModWTasyn7merOnLamp; k_OligomerForm*DopModWTasyn_Cytosol*DopModWTasyn6merOnLamp;  // isVersionOf GO:0035786
  DopWTasyn8merFormOnLamp: DopModWTasyn_Cytosol + DopModWTasyn7merOnLamp => DopModWTasyn8merOnLamp; k_OligomerForm*DopModWTasyn_Cytosol*DopModWTasyn7merOnLamp;  // isVersionOf GO:0035786
  DopWTasyn9merFormOnLamp: DopModWTasyn_Cytosol + DopModWTasyn8merOnLamp => DopModWTasyn9merOnLamp; k_OligomerForm*DopModWTasyn_Cytosol*DopModWTasyn8merOnLamp;  // isVersionOf GO:0035786
  WTasynLysosUptake: WTasyndegr => Lamp2a + WTasyn_Lysosome; Lysosome*WTasynLysosUptake_k1*WTasyndegr;  // isVersionOf GO:0006914
    WTasynLysosUptake_k1 = 0.00999558;
  WTasyn2LysosUptake: WTasyn2degr => Lamp2a + WTasyn2_Lysosome; Lysosome*WTasyn2LysosUptake_k1*WTasyn2degr;  // isVersionOf GO:0006914
    WTasyn2LysosUptake_k1 = 0.00995312;
  M_autophagyWTasyn4Degr: WTasyn4_M_autophagy_OtherLysDegrPath => WTasyn4merM_Adegrr; M_autophagy_OtherLysDegrPath*k_M_autophagyDegr*WTasyn4_M_autophagy_OtherLysDegrPath; M_autophagyWTasyn4Degr is "M/autophagyWTasyn4Degr";  // isVersionOf GO:0016236
  M_autophagyWTasyn8Degr: WTasyn8_M_autophagy_OtherLysDegrPath => WTasyn8merM_Adegr; M_autophagy_OtherLysDegrPath*k_M_autophagyDegr*WTasyn8_M_autophagy_OtherLysDegrPath; M_autophagyWTasyn8Degr is "M/autophagyWTasyn8Degr";  // isVersionOf GO:0016236
  M_autophagyWTasyn3Degr: WTasyn3_M_autophagy_OtherLysDegrPath => WTasyn3merM_Adegr; M_autophagy_OtherLysDegrPath*k_M_autophagyDegr*WTasyn3_M_autophagy_OtherLysDegrPath; M_autophagyWTasyn3Degr is "M/autophagyWTasyn3Degr";  // isVersionOf GO:0016236
  M_autophagyWTasyn2Degr: WTasyn2_M_autophagy_OtherLysDegrPath => WTasyn2merM_Adegr; M_autophagy_OtherLysDegrPath*k_M_autophagyDegr*WTasyn2_M_autophagy_OtherLysDegrPath; M_autophagyWTasyn2Degr is "M/autophagyWTasyn2Degr";  // isVersionOf GO:0016236
  M_autophagyWTasyn7Degr: WTasyn7_M_autophagy_OtherLysDegrPath => WTasyn7merM_Adegr; M_autophagy_OtherLysDegrPath*k_M_autophagyDegr*WTasyn7_M_autophagy_OtherLysDegrPath; M_autophagyWTasyn7Degr is "M/autophagyWTasyn7Degr";  // isVersionOf GO:0016236
  M_autophagyWTasyn5Degr: WTasyn5_M_autophagy_OtherLysDegrPath => WTasyn5merM_Adegr; M_autophagy_OtherLysDegrPath*k_M_autophagyDegr*WTasyn5_M_autophagy_OtherLysDegrPath; M_autophagyWTasyn5Degr is "M/autophagyWTasyn5Degr";  // isVersionOf GO:0016236
  M_autophagyWTasyn6Degr: WTasyn6_M_autophagy_OtherLysDegrPath => WTasyn6merM_Adegr; M_autophagy_OtherLysDegrPath*k_M_autophagyDegr*WTasyn6_M_autophagy_OtherLysDegrPath; M_autophagyWTasyn6Degr is "M/autophagyWTasyn6Degr";  // isVersionOf GO:0016236
  AggregForm: WTasyn9 + WTasyn_Cytosol => HigherWTasynSPC; Cytosol*k_OligomerForm*WTasyn9*WTasyn_Cytosol;  // isVersionOf GO:0070841
  DopModAutophagosomeUptake2mer: DopModWTasyn2_Cytosol => DopModWTasyn2_M_autophagy_OtherLysDegrPath; k_OligAutophagUptake*DopModWTasyn2_Cytosol;  // isVersionOf GO:0016236
  DopMod3merForm: DopModWTasyn2_Cytosol + DopModWTasyn_Cytosol => DopModWTasyn3_Cytosol; Cytosol*k_OligomerForm*DopModWTasyn2_Cytosol*DopModWTasyn_Cytosol;  // isVersionOf GO:0035786
  DopModAutophagosomeUptake3mer: DopModWTasyn3_Cytosol => DopModWTasyn3_M_autophagy_OtherLysDegrPath; k_OligAutophagUptake*DopModWTasyn3_Cytosol;  // isVersionOf GO:0016236
  DopMod4merForm: DopModWTasyn3_Cytosol + DopModWTasyn_Cytosol => DopModWTasyn4_Cytosol; Cytosol*k_OligomerForm*DopModWTasyn3_Cytosol*DopModWTasyn_Cytosol;  // isVersionOf GO:0035786
  DopMod3merProtBind: DopModWTasyn3_Cytosol + Proteasome => ProtDopModWTasyn3; Cytosol*k_ProteasomeBind*DopModWTasyn3_Cytosol*Proteasome;  // isVersionOf GO:1901799; isVersionOf GO:0010498; isVersionOf GO:0070628
  DopModAutophagosomeUptake4mer: DopModWTasyn4_Cytosol => DopModWTasyn4_M_autophagy_OtherLysDegrPath; k_OligAutophagUptake*DopModWTasyn4_Cytosol;  // isVersionOf GO:0016236
  DopMod5merForm: DopModWTasyn4_Cytosol + DopModWTasyn_Cytosol => DopModWTasyn5_Cytosol; Cytosol*k_OligomerForm*DopModWTasyn4_Cytosol*DopModWTasyn_Cytosol;  // isVersionOf GO:0035786
  DopMod4merProtBind: DopModWTasyn4_Cytosol + Proteasome => ProtDopModWTasyn4; Cytosol*k_ProteasomeBind*DopModWTasyn4_Cytosol*Proteasome;  // isVersionOf GO:1901799; isVersionOf GO:0010498; isVersionOf GO:0070628
  DopModAutophagosomeUptake5mer: DopModWTasyn5_Cytosol => DopModWTasyn5_M_autophagy_OtherLysDegrPath; k_OligAutophagUptake*DopModWTasyn5_Cytosol;  // isVersionOf GO:0016236
  DopMod6merForm: DopModWTasyn5_Cytosol + DopModWTasyn_Cytosol => DopModWTasyn6_Cytosol; Cytosol*k_OligomerForm*DopModWTasyn5_Cytosol*DopModWTasyn_Cytosol;  // isVersionOf GO:0035786
  DopMod5merProtBind: DopModWTasyn5_Cytosol + Proteasome => ProtDopModWTasyn5; Cytosol*k_ProteasomeBind*DopModWTasyn5_Cytosol*Proteasome;  // isVersionOf GO:0010498; isVersionOf GO:0070628; isVersionOf GO:1901799
  DopModAutophagosomeUptake6mer: DopModWTasyn6_Cytosol => DopModWTasyn6_M_autophagy_OtherLysDegrPath; k_OligAutophagUptake*DopModWTasyn6_Cytosol;  // isVersionOf GO:0016236
  DopMod7merForm: DopModWTasyn6_Cytosol + DopModWTasyn_Cytosol => DopModWTasyn7_Cytosol; Cytosol*k_OligomerForm*DopModWTasyn6_Cytosol*DopModWTasyn_Cytosol;  // isVersionOf GO:0035786
  DopMod6merProtBind: DopModWTasyn6_Cytosol + Proteasome => ProtDopModWTasyn6; Cytosol*k_ProteasomeBind*DopModWTasyn6_Cytosol*Proteasome;  // isVersionOf GO:0070628; isVersionOf GO:1901799; isVersionOf GO:0010498
  DopModAutophagosomeUptake7mer: DopModWTasyn7_Cytosol => DopModWTasyn7_M_autophagy_OtherLysDegrPath; k_OligAutophagUptake*DopModWTasyn7_Cytosol;  // isVersionOf GO:0016236
  DopMod8merForm: DopModWTasyn7_Cytosol + DopModWTasyn_Cytosol => DopModWTasyn8_Cytosol; Cytosol*k_OligomerForm*DopModWTasyn7_Cytosol*DopModWTasyn_Cytosol;  // isVersionOf GO:0035786
  DopMod7merProtBind: DopModWTasyn7_Cytosol + Proteasome => ProtDopModWTasyn7; Cytosol*k_ProteasomeBind*DopModWTasyn7_Cytosol*Proteasome;  // isVersionOf GO:0010498; isVersionOf GO:1901799; isVersionOf GO:0070628
  DopModAutophagosomeUptake8mer: DopModWTasyn8_Cytosol => DopModWTasyn8_M_autophagy_OtherLysDegrPath; k_OligAutophagUptake*DopModWTasyn8_Cytosol;  // isVersionOf GO:0016236
  DopMod9merForm: DopModWTasyn8_Cytosol + DopModWTasyn_Cytosol => DopModWTasyn9; Cytosol*k_OligomerForm*DopModWTasyn8_Cytosol*DopModWTasyn_Cytosol;  // isVersionOf GO:0035786
  DopMod8merProtBind: DopModWTasyn8_Cytosol + Proteasome => ProtDopModWTasyn8; Cytosol*k_ProteasomeBind*DopModWTasyn8_Cytosol*Proteasome;  // isVersionOf GO:1901799; isVersionOf GO:0010498; isVersionOf GO:0070628
  DopMod9merProtBind: DopModWTasyn9 + Proteasome => ProtDopModWTasyn9; Cytosol*k_ProteasomeBind*DopModWTasyn9*Proteasome;  // isVersionOf GO:1901799; isVersionOf GO:0070628; isVersionOf GO:0010498
  WTasyn2merCMADegr: WTasyn2_Lysosome => WTasyn2merCMADegr_Lysosome; Lysosome*WTasyn2merCMADegr_k1*WTasyn2_Lysosome;  // isVersionOf GO:0006914
    WTasyn2merCMADegr_k1 = 0.1;
  WTasyn1merCMADegr: WTasyn_Lysosome => WTasynCMADegr; Lysosome*WTasyn1merCMADegr_k1*WTasyn_Lysosome;  // isVersionOf GO:0006914
    WTasyn1merCMADegr_k1 = 0.1;
  LampFree9merWT: WTasyn9merOnLamp => WTasyn9 + Lamp2a; k_LampFreeWTasyn*WTasyn9merOnLamp;  // isVersionOf GO:0032984
  DopWTasyn3merFormOnLamp: DopModWTasyn2merOnLamp + DopModWTasyn_Cytosol => DopModWTasyn3merOnLamp; k_OligomerForm*DopModWTasyn2merOnLamp*DopModWTasyn_Cytosol;  // isVersionOf GO:0035786
  DopWTasyn4merFormOnLamp: DopModWTasyn3merOnLamp + DopModWTasyn_Cytosol => DopModWTasyn4merOnLamp; k_OligomerForm*DopModWTasyn3merOnLamp*DopModWTasyn_Cytosol;  // isVersionOf GO:0035786
  DopWTasyn5merFormOnLamp: DopModWTasyn4merOnLamp + DopModWTasyn_Cytosol => DopModWTasyn5merOnLamp; k_OligomerForm*DopModWTasyn4merOnLamp*DopModWTasyn_Cytosol;  // isVersionOf GO:0035786
  DopWTasyn6merFormOnLamp: DopModWTasyn5merOnLamp + DopModWTasyn_Cytosol => DopModWTasyn6merOnLamp; k_OligomerForm*DopModWTasyn5merOnLamp*DopModWTasyn_Cytosol;  // isVersionOf GO:0035786
  LampFree3merWT: WTasyn3merOnLamp => WTasyn3_Cytosol + Lamp2a; k_LampFreeWTasyn*WTasyn3merOnLamp;  // isVersionOf GO:0032984
  LampFree4merWT: WTasyn4merOnLamp => WTasyn4_Cytosol + Lamp2a; k_LampFreeWTasyn*WTasyn4merOnLamp;  // isVersionOf GO:0032984
  LampFree5merWT: WTasyn5merOnLamp => WTasyn5_Cytosol + Lamp2a; k_LampFreeWTasyn*WTasyn5merOnLamp;  // isVersionOf GO:0032984
  LampFree6merWT: WTasyn6merOnLamp => WTasyn6_Cytosol + Lamp2a; k_LampFreeWTasyn*WTasyn6merOnLamp;  // isVersionOf GO:0032984
  LampFree7merWT: WTasyn7merOnLamp => WTasyn7_Cytosol + Lamp2a; k_LampFreeWTasyn*WTasyn7merOnLamp;  // isVersionOf GO:0032984
  LampFree8merWT: WTasyn8merOnLamp => WTasyn8_Cytosol + Lamp2a; k_LampFreeWTasyn*WTasyn8merOnLamp;  // isVersionOf GO:0032984
  WTasyn8merBindOnLamp: WTasyn8merOnLamp + WTasyn8_Cytosol => Lamp2a; k_WTOligBindOnLamp*WTasyn8merOnLamp*WTasyn8_Cytosol;  // isVersionOf GO:0005102
  WTasyn3merBindOnLamp: Lamp2a + WTasyn3_Cytosol => WTasyn3merOnLamp; k_WTOligBindOnLamp*Lamp2a*WTasyn3_Cytosol;  // isVersionOf GO:0005102
  WTasyn4merBindOnLamp: Lamp2a + WTasyn4_Cytosol => WTasyn4merOnLamp; k_WTOligBindOnLamp*Lamp2a*WTasyn4_Cytosol;  // isVersionOf GO:0005102
  WTasyn6merBindOnLamp: Lamp2a + WTasyn6_Cytosol => WTasyn6merOnLamp; k_WTOligBindOnLamp*Lamp2a*WTasyn6_Cytosol;  // isVersionOf GO:0005102
  DopModWTasynCMAInhibition: Lamp2a + DopModWTasyn_Cytosol => DopModWTasynOnLamp; k_DopModWTasynLampBind*Lamp2a*DopModWTasyn_Cytosol;  // isVersionOf GO:0005102
  M_autophagyDopModWTasyn4Degr: DopModWTasyn4_M_autophagy_OtherLysDegrPath => DopModWTasyn4merM_Adegr; M_autophagy_OtherLysDegrPath*k_M_autophagyDegr*DopModWTasyn4_M_autophagy_OtherLysDegrPath; M_autophagyDopModWTasyn4Degr is "M/autophagyDopModWTasyn4Degr";  // isVersionOf GO:0016236
  M_autophagyDopModWTasyn3Degr: DopModWTasyn3_M_autophagy_OtherLysDegrPath => DopModWTasyn3merM_Adegr; M_autophagy_OtherLysDegrPath*k_M_autophagyDegr*DopModWTasyn3_M_autophagy_OtherLysDegrPath; M_autophagyDopModWTasyn3Degr is "M/autophagyDopModWTasyn3Degr";  // isVersionOf GO:0016236
  M_autophagyDopModWTasyn2Degr: DopModWTasyn2_M_autophagy_OtherLysDegrPath => DopModWTasyn2merM_Adegr; M_autophagy_OtherLysDegrPath*k_M_autophagyDegr*DopModWTasyn2_M_autophagy_OtherLysDegrPath; M_autophagyDopModWTasyn2Degr is "M/autophagyDopModWTasyn2Degr";  // isVersionOf GO:0016236
  M_autophagyDopModWTasyn5Degr: DopModWTasyn5_M_autophagy_OtherLysDegrPath => DopModWTasyn6merM_Adegr; M_autophagy_OtherLysDegrPath*k_M_autophagyDegr*DopModWTasyn5_M_autophagy_OtherLysDegrPath; M_autophagyDopModWTasyn5Degr is "M/autophagyDopModWTasyn5Degr";  // isVersionOf GO:0016236
  M_autophagyDopModWTasyn6Degr: DopModWTasyn6_M_autophagy_OtherLysDegrPath => DopModWTasyn7merM_Adegr; M_autophagy_OtherLysDegrPath*k_M_autophagyDegr*DopModWTasyn6_M_autophagy_OtherLysDegrPath; M_autophagyDopModWTasyn6Degr is "M/autophagyDopModWTasyn6Degr";  // isVersionOf GO:0016236
  M_autophagyDopModWTasyn7Degr: DopModWTasyn7_M_autophagy_OtherLysDegrPath => DopModWTasyn7merM_Adegr; M_autophagy_OtherLysDegrPath*k_M_autophagyDegr*DopModWTasyn7_M_autophagy_OtherLysDegrPath; M_autophagyDopModWTasyn7Degr is "M/autophagyDopModWTasyn7Degr";  // isVersionOf GO:0016236
  M_autophagyDopModWTasyn8Degr: DopModWTasyn8_M_autophagy_OtherLysDegrPath => DopModWTasyn8merM_Adegr; M_autophagy_OtherLysDegrPath*k_M_autophagyDegr*DopModWTasyn8_M_autophagy_OtherLysDegrPath; M_autophagyDopModWTasyn8Degr is "M/autophagyDopModWTasyn8Degr";  // isVersionOf GO:0016236
  WTasyn2merFormOnLamp: WTasyn_Cytosol + WTasyndegr => WTasyn2degr; k_2merForm*WTasyn_Cytosol*WTasyndegr;  // isVersionOf GO:0016236
  WTasyn3merFormOnLamp: WTasyn_Cytosol + WTasyn2degr => WTasyn3merOnLamp; k_OligomerForm*WTasyn_Cytosol*WTasyn2degr;  // isVersionOf GO:0016236
  WTasyn4merFormOnLamp: WTasyn_Cytosol + WTasyn3merOnLamp => WTasyn4merOnLamp; k_OligomerForm*WTasyn_Cytosol*WTasyn3merOnLamp;  // isVersionOf GO:0016236
  WTasyn5merFormOnLamp: WTasyn_Cytosol + WTasyn4merOnLamp => WTasyn5merOnLamp; k_OligomerForm*WTasyn_Cytosol*WTasyn4merOnLamp;  // isVersionOf GO:0016236
  WTasyn6merFormOnLamp: WTasyn5merOnLamp + WTasyn_Cytosol => WTasyn6merOnLamp; k_OligomerForm*WTasyn5merOnLamp*WTasyn_Cytosol;  // isVersionOf GO:0016236
  WTasyn7merFormOnLamp: WTasyn6merOnLamp + WTasyn_Cytosol => WTasyn7merOnLamp; k_OligomerForm*WTasyn6merOnLamp*WTasyn_Cytosol;  // isVersionOf GO:0016236
  WTasyn8merFormOnLamp: WTasyn_Cytosol + WTasyn7merOnLamp => WTasyn8merOnLamp; k_OligomerForm*WTasyn_Cytosol*WTasyn7merOnLamp;  // isVersionOf GO:0016236
  WTasyn9merFormOnLamp: WTasyn_Cytosol + WTasyn8merOnLamp => WTasyn9merOnLamp; k_OligomerForm*WTasyn_Cytosol*WTasyn8merOnLamp;  // isVersionOf GO:0016236
  ProtFree3merWT: ProtWTasyn3 => Proteasome; Cytosol*k_ProtOligDegr*ProtWTasyn3;  // isVersionOf GO:0010498
  ProtFree4merWT: ProtWTasyn4 => Proteasome; Cytosol*k_ProtOligDegr*ProtWTasyn4;  // isVersionOf GO:0010498
  ProtFree5merWT: ProtWTasyn5 => Proteasome; Cytosol*k_ProtOligDegr*ProtWTasyn5;  // isVersionOf GO:0010498
  ProtFree6merWT: ProtWTasyn6 => Proteasome; Cytosol*k_ProtOligDegr*ProtWTasyn6;  // isVersionOf GO:0010498
  ProtFree7merWT: ProtWTasyn7 => Proteasome; Cytosol*k_ProtOligDegr*ProtWTasyn7;  // isVersionOf GO:0010498
  ProtFree8merWT: ProtWTasyn8 => Proteasome; Cytosol*k_ProtOligDegr*ProtWTasyn8;  // isVersionOf GO:0010498
  ProtFree9merWT: ProtWTasyn9 => Proteasome; Cytosol*k_ProtOligDegr*ProtWTasyn9;  // isVersionOf GO:0010498
  ProtFree3merDopWT: ProtDopModWTasyn3 => Proteasome; Cytosol*k_ProtOligDegr*ProtDopModWTasyn3;  // isVersionOf GO:0010498
  ProtFree4merDopWT: ProtDopModWTasyn4 => Proteasome; Cytosol*k_ProtOligDegr*ProtDopModWTasyn4;  // isVersionOf GO:0010498
  ProtFree5merDopWT: ProtDopModWTasyn5 => Proteasome; Cytosol*k_ProtOligDegr*ProtDopModWTasyn5;  // isVersionOf GO:0010498
  ProtFree6merDopWT: ProtDopModWTasyn6 => Proteasome; Cytosol*k_ProtOligDegr*ProtDopModWTasyn6;  // isVersionOf GO:0010498
  ProtFree7merDopWT: ProtDopModWTasyn7 => Proteasome; Cytosol*k_ProtOligDegr*ProtDopModWTasyn7;  // isVersionOf GO:0010498
  ProtFree8merDopWT: ProtDopModWTasyn8 => Proteasome; Cytosol*k_ProtOligDegr*ProtDopModWTasyn8;  // isVersionOf GO:0010498
  ProtFree9merDopWT: ProtDopModWTasyn9 => Proteasome; Cytosol*k_ProtOligDegr*ProtDopModWTasyn9;  // isVersionOf GO:0010498
  WTasynHigherPSCprotInh: HigherWTasynSPC + Proteasome => ProtWTasynHigherSPC; Cytosol*k_ProteasomeBind*HigherWTasynSPC*Proteasome;  // isVersionOf GO:0070628; isVersionOf GO:1901799
  DopMod9merDis: DopModWTasyn9 => DopModWTasyn8_Cytosol + DopModWTasyn_Cytosol; Cytosol*k_DisRate*DopModWTasyn9;  // isVersionOf GO:0043241
  DopMod8merDis: DopModWTasyn8_Cytosol => DopModWTasyn7_Cytosol + DopModWTasyn_Cytosol; Cytosol*k_DisRate*DopModWTasyn8_Cytosol;  // isVersionOf GO:0043241
  DopMod7merDis: DopModWTasyn7_Cytosol => DopModWTasyn6_Cytosol + DopModWTasyn_Cytosol; Cytosol*k_DisRate*DopModWTasyn7_Cytosol;  // isVersionOf GO:0043241
  DopMod6merDis: DopModWTasyn6_Cytosol => DopModWTasyn5_Cytosol + DopModWTasyn_Cytosol; Cytosol*k_DisRate*DopModWTasyn6_Cytosol;  // isVersionOf GO:0043241
  DopMod4merDis: DopModWTasyn4_Cytosol => DopModWTasyn3_Cytosol + DopModWTasyn_Cytosol; Cytosol*k_DisRate*DopModWTasyn4_Cytosol;  // isVersionOf GO:0043241
  DopMod5merDis: DopModWTasyn5_Cytosol => DopModWTasyn4_Cytosol + DopModWTasyn_Cytosol; Cytosol*k_DisRate*DopModWTasyn5_Cytosol;  // isVersionOf GO:0043241
  DopMod3merDis: DopModWTasyn3_Cytosol => DopModWTasyn2_Cytosol + DopModWTasyn_Cytosol; Cytosol*k_DisRate*DopModWTasyn3_Cytosol;  // isVersionOf GO:0043241
  DopMod2merDis: DopModWTasyn2_Cytosol => 2 DopModWTasyn_Cytosol; Cytosol*k_DisRate*DopModWTasyn2_Cytosol;  // isVersionOf GO:0043241
  _9merDis: WTasyn9 => WTasyn_Cytosol + WTasyn8_Cytosol; Cytosol*k_DisRate*WTasyn9;  // isVersionOf GO:0043241
  _8merDis: WTasyn8_Cytosol => WTasyn7_Cytosol + WTasyn_Cytosol; Cytosol*k_DisRate*WTasyn8_Cytosol;  // isVersionOf GO:0043241
  _7merDis: WTasyn7_Cytosol => WTasyn6_Cytosol + WTasyn_Cytosol; Cytosol*k_DisRate*WTasyn7_Cytosol;  // isVersionOf GO:0043241
  _6merDis: WTasyn6_Cytosol => WTasyn_Cytosol + WTasyn5_Cytosol; Cytosol*k_DisRate*WTasyn6_Cytosol;  // isVersionOf GO:0043241
  _5merDis: WTasyn5_Cytosol => WTasyn4_Cytosol + WTasyn_Cytosol; Cytosol*k_DisRate*WTasyn5_Cytosol;  // isVersionOf GO:0043241
  _4merDis: WTasyn4_Cytosol => WTasyn3_Cytosol + WTasyn_Cytosol; Cytosol*k_DisRate*WTasyn4_Cytosol;  // isVersionOf GO:0043241
  _3merDis: WTasyn3_Cytosol => WTasyn2_Cytosol + WTasyn_Cytosol; Cytosol*k_DisRate*WTasyn3_Cytosol;  // isVersionOf GO:0043241
  _2merDis: WTasyn2_Cytosol => 2 WTasyn_Cytosol; Cytosol*k_DisRate*WTasyn2_Cytosol;  // isVersionOf GO:0043241
  AggregGrowth: HigherWTasynSPC + WTasyn_Cytosol => HigherWTasynSPC; Cytosol*AggregGrowth_k1*HigherWTasynSPC*WTasyn_Cytosol;  // isVersionOf GO:0070841
    AggregGrowth_k1 = 4.90556e-7;
  AutophagosomeUptakeWTasyn: WTasyn_Cytosol => WTasyn_M_autophagy_OtherLysDegrPath; k_OligAutophagUptake*WTasyn_Cytosol;  // isVersionOf GO:0016236
  M_autophagyWTasyn1Degr: WTasyn_M_autophagy_OtherLysDegrPath => WTasyn2merM_Adegr; M_autophagy_OtherLysDegrPath*k_M_autophagyDegr*WTasyn_M_autophagy_OtherLysDegrPath; M_autophagyWTasyn1Degr is "M/autophagyWTasyn1Degr";  // isVersionOf GO:0016236
  DopModAutophagosomeUptake: DopModWTasyn_Cytosol => DopModWTasyn_M_autophagy_OtherLysDegrPath; k_OligAutophagUptake*DopModWTasyn_Cytosol;  // isVersionOf GO:0016236
  M_autophagyDopModWTasyn1Degr: DopModWTasyn_M_autophagy_OtherLysDegrPath => DopModWTasyn2merM_Adegr; M_autophagy_OtherLysDegrPath*k_M_autophagyDegr*DopModWTasyn_M_autophagy_OtherLysDegrPath; M_autophagyDopModWTasyn1Degr is "M/autophagyDopModWTasyn1Degr";  // isVersionOf GO:0016236

  // Unit definitions:
  unit volume = dimensionless;
  unit substance = item;
end
