// SBML level 2 version 4

function RUNIFORM(a, b)
  (a + b)/2;
end

model ASC_GSH_pathway()
  // Valero2016 - Ascorbate-Glutathione cycle in chloroplasts under light/dark conditions
  // This model is described in the article:
  // Modeling the ascorbate-glutathione cycle in chloroplasts under light/dark conditions.
  // Valero E, Macià H, De la Fuente IM, Hernández JA, González-Sánchez MI, García-Carmona F.
  // BMC Syst Biol 2016; 10(1): 11
  // Abstract:
  // Light/dark cycles are probably the most important environmental signals that regulate plant development. Light is essential for photosynthesis, but an excess, in combination with the unavoidable presence of atmospheric oxygen inside the chloroplast, leads to excessive reactive oxygen species production. Among the defense mechanisms that activate plants to cope with environmental stress situations, it is worth noting the ascorbate-glutathione cycle, a complex metabolic pathway in which a variety of photochemical, chemical and enzymatic steps are involved.We herein studied the dynamic behavior of this pathway under light/dark conditions and for several consecutive days. For this purpose, a mathematical model was developed including a variable electron source with a rate law proportional to the intensity of solar irradiance during the photoperiod, and which is continuously turned off at night and on again the next day. The model is defined by a nonlinear system of ordinary differential equations with an on/off time-dependent input, including a parameter to simulate the fact that the photoperiod length is not constant throughout the year, and which takes into account the particular experimental kinetics of each enzyme involved in the pathway. Unlike previous models, which have only provided steady-state solutions, the present model is able to simulate diurnal fluctuations in the metabolite concentrations, fluxes and enzymatic rates involved in the network.The obtained results are broadly consistent with experimental observations and highlight the key role played by ascorbate recycling for plants to adapt to their surrounding environment. This approach provides a new strategy to in vivo studies to analyze plant defense mechanisms against oxidative stress induced by external changes, which can also be extrapolated to other complex metabolic pathways to constitute a useful tool to the scientific community in general.
  // This model is hosted on BioModels Database and identified by: BIOMD0000000580.
  // To cite BioModels Database, please use: BioModels Database: An enhanced, curated and annotated resource for published quantitative kinetic models.
  // To the extent possible under law, all copyright and related or neighbouring rights to this encoded model have been dedicated to the public domain worldwide. Please refer to CC0 Public Domain Dedication for more information.
  // biomodels.db:MODEL1503250002
  // biomodels.db:BIOMD0000000589
  // isDescribedBy pubmed:26797294
  // hasTaxon taxonomy:3193
  // isVersionOf GO:0009628 GO:0033355
  // hasProperty mamo:MAMO_0000046

  // Compartments:
  compartment c = 1;  // isVersionOf GO:0005623

  // Species:
  species $NADPH in c = 110;  // isVersionOf CHEBI:16474
  // se ha cambiado las concentraciones iniciales de NADPplus y NADPF
  species $NADPplus in c = 40.00001;  // isVersionOf CHEBI:18009
  species $GSH in c = 4000;  // CHEBI:16856
  species $GSSG in c = 0;  // isVersionOf CHEBI:16856 PATO:0002223
  species $ASC in c = 10000;  // isVersionOf CHEBI:22651
  species $DHA in c = 0;  // isVersionOf CHEBI:17242
  species $MDA in c = 0;  // isVersionOf CHEBI:16504
  species $H2O2 in c = 0;  // CHEBI:16240
  species $APX in c = 40;  // hasProperty ec-code:1.11.1.11
  species $CoI in c = 0;  // isVersionOf CHEBI:63248
  species $CoII in c = 0;  // isVersionOf CHEBI:63248
  species $APXi in c = 0;  // hasProperty ec-code:1.11.1.11 PATO:0002355
  species $O2neg in c = 0;  // isVersionOf CHEBI:29356

  // Parameters:
  k12 = 2200;
  k4 = 2520;
  k3 = 0.01;
  kSOD = 720000;
  SOD = 50;
  kcatDHAR = 511200;
  DHAR = 1.7;
  K = 500;
  KMDHA = 70; KMDHA is "KM_DHAR_DHA";
  KMGSH = 2500; KMGSH is "KM_DHAR_GSH";
  k1 = 1800;
  k13 = 15000;
  k2APX = 180000;
  k3APX = 7560;
  k4APX = 2520;
  k5APX = 1;
  k6 = 720;
  k5 = 0.0072;
  k1APX = 43200;
  k2 = 720;
  GR = 1.4;
  kcatGR = 2142000;
  KMNADPH = 3; KMNADPH is "KM-GR_NADPH";
  KMGSSG = 200; KMGSSG is "KM_GR_GSSG";
  k11 = 30000;
  a1 = RUNIFORM(min, max);
  b = 11;
  c_0 = 4.712389;
  a2 = RUNIFORM(min, max);
  incr = 0.25;
  a3 = RUNIFORM(min, max);
  a4 = RUNIFORM(min, max);
  a5 = RUNIFORM(min, max);
  a6 = RUNIFORM(min, max);
  a7 = RUNIFORM(min, max);
  a8 = RUNIFORM(min, max);
  a9 = RUNIFORM(min, max);
  a10 = RUNIFORM(min, max);
  a11 = RUNIFORM(min, max);
  a12 = RUNIFORM(min, max);
  a13 = RUNIFORM(min, max);
  a14 = RUNIFORM(min, max);
  a0 = RUNIFORM(min, max);
  kN_cte = 0.005;
  a15 = RUNIFORM(min, max);
  min = 3500000;
  max = 4500000;
  MDAR = 0;
  kcatMDAR = 1080000;
  KMNADPH2 = 23; KMNADPH2 is "KM-MDAR_NADPH";
  KMMDA = 1.4; KMMDA is "KM_MDAR_MDA";
  Initial_for_APX = APX;

  // Assignment rules:
  vGR := kcatGR*GR*NADPH*GSSG/(KMNADPH*GSSG + KMGSSG*NADPH + NADPH*GSSG);
  vDHAR := kcatDHAR*DHAR*DHA*GSH/(K + KMDHA*GSH + KMGSH*DHA + DHA*GSH);
  vSOD := kSOD*SOD*O2neg;
  c13 := k13*MDA/(k11 + 2*k12*NADPplus + k13*MDA);
  c11 := k11/(k11 + 2*k12*NADPplus + k13*MDA);
  c12 := 2*k12*NADPplus/(k11 + 2*k12*NADPplus + k13*MDA);
  i := floor(time/24);
  ai := piecewise(a0, i == 0, piecewise(a1, i == 1, piecewise(a2, i == 2, piecewise(a3, i == 3, piecewise(a4, i == 4, piecewise(a5, i == 5, piecewise(a6, i == 6, piecewise(a7, i == 7, piecewise(a8, i == 8, piecewise(a9, i == 9, piecewise(a10, i == 10, piecewise(a11, i == 11, piecewise(a12, i == 12, piecewise(a13, i == 13, piecewise(a14, i == 14, a15)))))))))))))));
  F1 := piecewise(ai + ai*sin(2*pi*(time - i*24)/(b + incr*i) + c_0), (time >= i*24) && (time <= i*24 + b + incr*i), 0);
  F12 := c12*F1;
  kN := kN_cte*F12;
  F13 := c13*F1;
  F11 := c11*F1;
  FN := kN*NADPH;
  vAPX := k2APX*CoI*ASC + k3APX*CoII*ASC;
  vMDAR := kcatMDAR*MDAR*NADPH*MDA/(KMNADPH2*MDA + KMMDA*NADPH + NADPH*MDA);

  // Rate rules:
  NADPH' = -vGR - kN*NADPH + F12*0.5 - vMDAR;
  NADPplus' = vGR + kN*NADPH - F12*0.5 + vMDAR;
  GSH' = 2*(vGR - vDHAR - k4*O2neg*GSH - k3*DHA*GSH);
  GSSG' = -vGR + vDHAR + k4*O2neg*GSH + k3*DHA*GSH;
  ASC' = vDHAR + k1*MDA^2 + k3*DHA*GSH + F13 - k2APX*ASC*CoI - k3APX*ASC*CoII - k6*O2neg*ASC - 2*k5*H2O2*ASC + 2*vMDAR;
  DHA' = -vDHAR + k1*MDA^2 - k3*DHA*GSH;
  MDA' = k2APX*ASC*CoI + k3APX*ASC*CoII - 2*k1*MDA^2 + k6*O2neg*ASC + 2*k5*H2O2*ASC - F13 - 2*vMDAR;
  H2O2' = vSOD - k1APX*H2O2*APX - k4APX*H2O2*CoI + k2*O2neg^2 + k6*O2neg*ASC + k4*O2neg*GSH - k5*H2O2*ASC;
  APX' = -k1APX*H2O2*APX + k3APX*ASC*CoII + k5APX*(Initial_for_APX - APX - CoI - CoII);
  CoI' = k1APX*H2O2*APX - k2APX*ASC*CoI - k4APX*H2O2*CoI;
  CoII' = k2APX*ASC*CoI - k3APX*ASC*CoII;
  APXi' = k4APX*H2O2*CoI;
  O2neg' = -2*vSOD + F11 - 2*k2*O2neg^2 - k6*O2neg*ASC - k4*O2neg*GSH;

  // Unit definitions:
  unit time = 3600 second;
  unit substance = 1e-6 mole;
end
