// SBML level 2 version 4

function function_8(KD_R7_B, kf_B_7, R7Bp, R7, Bp)
  kf_B_7*(Bp*R7 - KD_R7_B*R7Bp);
end
function_8 is "Mass action (reversible with KD)_12_1";

function function_5(KD_R7_B, kf_B_7, Be, R7, R7Be)
  kf_B_7*(Be*R7 - KD_R7_B*R7Be);
end
function_5 is "Mass action (reversible with KD)_10";

function function_14(KD_C7_B, kf_L12_7, KD_R7_B, Nav, Vcell, KD_R7_L12, nmol_to_mol, L12, C7Bp, R7Bp)
  kf_L12_7*(nmol_to_mol/(Nav*Vcell))*(L12*R7Bp - KD_R7_L12*KD_C7_B*(Nav*Vcell/nmol_to_mol)/KD_R7_B*C7Bp);
end
function_14 is "Mass action (reversible with KD)_5_4";

function function_13(KD_C7_B, kf_L12_7, KD_R7_B, Nav, Vcell, KD_R7_L12, nmol_to_mol, L12, R7Be, C7Be)
  kf_L12_7*(nmol_to_mol/(Nav*Vcell))*(L12*R7Be - KD_R7_L12*KD_C7_B*(Nav*Vcell/nmol_to_mol)/KD_R7_B*C7Be);
end
function_13 is "Mass action (reversible with KD)_5_3";

function function_9(kf_L12_4, Nav, Vcell, KD_R4_L12, nmol_to_mol, L12, R4, C4)
  kf_L12_4*(nmol_to_mol/(Nav*Vcell))*(R4*L12 - KD_R4_L12*(Nav*Vcell/nmol_to_mol)*C4);
end
function_9 is "Mass action (reversible with KD)_1_1";

function function_11(kf_L12_4, KD_R4_B, Nav, Vcell, KD_R4_L12, nmol_to_mol, KD_C4_B, L12, R4Be, C4Be)
  kf_L12_4*(nmol_to_mol/(Nav*Vcell))*(L12*R4Be - KD_R4_L12*KD_C4_B*(Nav*Vcell/nmol_to_mol)/KD_R4_B*C4Be);
end
function_11 is "Mass action (reversible with KD)_5_1";

function function_4(kf_B_4, KD_C4_B, Bp, C4, C4Bp)
  kf_B_4*(Bp*C4 - KD_C4_B*C4Bp);
end
function_4 is "Mass action (reversible with KD)_9";

function function_2(KD_R4_B, kf_B_4, R4, R4Bp, Bp)
  kf_B_4*(Bp*R4 - KD_R4_B*R4Bp);
end
function_2 is "Mass action (reversible with KD)_7";

function function_1(KD_R4_B, kf_B_4, R4, R4Be, Be)
  kf_B_4*(Be*R4 - KD_R4_B*R4Be);
end
function_1 is "Mass action (reversible with KD)_6";

function function_10(kf_L12_7, Nav, Vcell, KD_R7_L12, nmol_to_mol, L12, R7, C7)
  kf_L12_7*(nmol_to_mol/(Nav*Vcell))*(R7*L12 - KD_R7_L12*(Nav*Vcell/nmol_to_mol)*C7);
end
function_10 is "Mass action (reversible with KD)_1_2";

function function_6(KD_C7_B, kf_B_7, Be, C7Be, C7)
  kf_B_7*(Be*C7 - KD_C7_B*C7Be);
end
function_6 is "Mass action (reversible with KD)_12";

function function_3(kf_B_4, KD_C4_B, Be, C4, C4Be)
  kf_B_4*(Be*C4 - KD_C4_B*C4Be);
end
function_3 is "Mass action (reversible with KD)_8";

function function_12(kf_L12_4, KD_R4_B, Nav, Vcell, KD_R4_L12, nmol_to_mol, KD_C4_B, L12, R4Bp, C4Bp)
  kf_L12_4*(nmol_to_mol/(Nav*Vcell))*(L12*R4Bp - KD_R4_L12*KD_C4_B*(Nav*Vcell/nmol_to_mol)/KD_R4_B*C4Bp);
end
function_12 is "Mass action (reversible with KD)_5_2";

function function_7(KD_C7_B, kf_B_7, C7Bp, Bp, C7)
  kf_B_7*(Bp*C7 - KD_C7_B*C7Bp);
end
function_7 is "Mass action (reversible with KD)_13";

model Coggins2014___CXCL12_dependent_recruitment_of_beta_arrestin()
  // Coggins2014 - CXCL12 dependent recruitment of beta arrestin
  // biomodels.db:MODEL1408060000
  // biomodels.db:BIOMD0000000599
  // isDescribedBy pubmed:24896823
  // isVersionOf GO:0038160 GO:0038146
  // hasTaxon taxonomy:9606
  // hasProperty mamo:MAMO_0000046

  // Compartments:
  compartment Intracellular = 1;

  // Species:
  // Be (is) human Beta-arrestin-2. It is not labelled. Be in the model is endogenous.
  species Be in Intracellular = 328437.2;  // uniprot:P32121
  // Bp is human Beta-arrestin-2 tagged with C-terminal of click beetle luciferase. Used (has part) Beta-arrestin-2 , and (has part) click beetle luciferase (potentially use (has version)?).
  species Bp in Intracellular = 492655.9;  // hasPart uniprot:P32121; hasPart uniprot:Q718F0
  // Complex of:
  // -R4 is Complementation receptor (human) CXCR4, with N-terminus of click beetle luciferase, amino acids 395-542.
  // -L12 is human CXCL12, Stromal cell-derived factor-1. This is not labelled.
  species C4 in Intracellular = 0;  // hasPart uniprot:P48061; hasPart uniprot:P61073; hasPart uniprot:Q718F0
  // Complex of:
  // -R4 is Complementation receptor (human) CXCR4, with N-terminus of click beetle luciferase, amino acids 395-542.
  // -L12 is human CXCL12, Stromal cell-derived factor-1. This is not labelled.
  // -Be is human Beta-arrestin-2. It is not labelled. Be in the model is endogenous.
  species C4Be in Intracellular = 0;  // hasPart uniprot:Q718F0; hasPart uniprot:P48061; hasPart uniprot:P32121; hasPart uniprot:P61073
  // Intracellular complex (after dissociation of endogenous Beta-arrestin-2) of:
  // -R4 is Complementation receptor (human) CXCR4, with N-terminus of click beetle luciferase, amino acids 395-542.
  // -L12 is human CXCL12, Stromal cell-derived factor-1. This is not labelled.
  species C4Beii in Intracellular = 0;  // hasPart uniprot:P48061; hasPart uniprot:P61073; hasPart uniprot:Q718F0
  // Complex of:
  // -R4 is Complementation receptor (human) CXCR4, with N-terminus of click beetle luciferase, amino acids 395-542.
  // -L12 is human CXCL12, Stromal cell-derived factor-1. This is not labelled.
  // -Bp is human Beta-arrestin-2 tagged with C-terminal of click beetle luciferase.
  species C4Bp in Intracellular = 0;  // hasPart uniprot:P61073; hasPart uniprot:P32121; hasPart uniprot:P48061; hasPart uniprot:Q718F0
  // Intracellular Complex of:
  // -R4 is Complementation receptor (human) CXCR4, with N-terminus of click beetle luciferase, amino acids 395-542.
  // -L12 is human CXCL12, Stromal cell-derived factor-1. This is not labelled.
  // -Bp is human Beta-arrestin-2 tagged with C-terminal of click beetle luciferase.
  species C4Bpi in Intracellular = 0;  // hasPart uniprot:P61073; hasPart uniprot:Q718F0; hasPart uniprot:P32121; hasPart uniprot:P48061
  // Complex of:
  // -R7 is Complementation receptor (human) CXCR7, with N-terminus of click beetle luciferase, amino acids 2-413.
  // -L12 is human CXCL12, Stromal cell-derived factor-1. This is not labelled.
  species C7 in Intracellular = 0;  // hasPart uniprot:P25106; hasPart uniprot:P48061; hasPart uniprot:Q718F0
  // Intracellular Complex of:
  // -R7 is Complementation receptor (human) CXCR7, with N-terminus of click beetle luciferase, amino acids 2-413.
  // -L12 is human CXCL12, Stromal cell-derived factor-1. This is not labelled.
  // -Be is human Beta-arrestin-2. It is not labelled. Be in the model is endogenous.
  species C7Bei in Intracellular = 0;  // hasPart uniprot:P25106; hasPart uniprot:P32121; hasPart uniprot:P48061; hasPart uniprot:Q718F0
  // Intracellular Complex (after traficking to late endosomes) of:
  // -R7 is Complementation receptor (human) CXCR7, with N-terminus of click beetle luciferase, amino acids 2-413.
  // -L12 is human CXCL12, Stromal cell-derived factor-1. This is not labelled.
  // -Be is human Beta-arrestin-2. It is not labelled. Be in the model is endogenous.
  species C7Beii in Intracellular = 0;  // hasPart uniprot:P48061; hasPart uniprot:P32121; hasPart uniprot:Q718F0; hasPart uniprot:P25106
  // Complex of:
  // -R7 is Complementation receptor (human) CXCR7, with N-terminus of click beetle luciferase, amino acids 2-413.
  // -L12 is human CXCL12, Stromal cell-derived factor-1. This is not labelled.
  // -Bp is human Beta-arrestin-2 tagged with C-terminal of click beetle luciferase.
  species C7Bp in Intracellular = 0;  // hasPart uniprot:P32121; hasPart uniprot:P48061; hasPart uniprot:Q718F0; hasPart uniprot:P25106
  // Intracellular Complex of:
  // -R7 is Complementation receptor (human) CXCR7, with N-terminus of click beetle luciferase, amino acids 2-413.
  // -L12 is human CXCL12, Stromal cell-derived factor-1. This is not labelled.
  // -Bp is human Beta-arrestin-2 tagged with C-terminal of click beetle luciferase.
  species C7Bpi in Intracellular = 0;  // hasPart uniprot:P25106; hasPart uniprot:Q718F0; hasPart uniprot:P48061; hasPart uniprot:P32121
  // Intracellular
  // -L12 is human CXCL12, Stromal cell-derived factor-1. It is not labelled.
  species L12i in Intracellular = 0;  // uniprot:P48061
  // Complementation receptor (human) CXCR4, with N-terminus of click beetle luciferase, amino acids 395-542.
  // -(Has Part) of human CXCR4 since it is CXCR4, and (Has Part) of click beetle luciferase (potentially use (has version)?).
  species R4 in Intracellular = 133540;  // hasPart uniprot:P61073; hasPart uniprot:Q718F0
  // Complex of:
  // -R4 is Complementation receptor (human) CXCR4, with N-terminus of click beetle luciferase, amino acids 395-542.
  // -Be (is) human Beta-arrestin-2. It is not labelled. Be in the model is endogenous.
  species R4Be in Intracellular = 5434.486;  // hasPart uniprot:Q718F0; hasPart uniprot:P61073; hasPart uniprot:P32121
  // Intracellular Complex (after traficking to late endosomes) of:
  // -R7 is Complementation receptor (human) CXCR7, with N-terminus of click beetle luciferase, amino acids 2-413.
  // -L12 is human CXCL12, Stromal cell-derived factor-1. This is not labelled.
  // -Bp is human Beta-arrestin-2 tagged with C-terminal of click beetle luciferase.
  species C7Bpii in Intracellular = 0;  // hasPart uniprot:Q718F0; hasPart uniprot:P32121; hasPart uniprot:P48061; hasPart uniprot:P25106
  // Intracellular receptor (after dissociation of Beta-arrestin-2 tagged with C-terminal of click beetle luciferase) of:
  // -R7 is Complementation receptor (human) CXCR7, with N-terminus of click beetle luciferase, amino acids 2-413
  species R7Bpii in Intracellular = 345117.3;  // hasPart uniprot:Q718F0; hasPart uniprot:P25106
  // Complex of:
  // -R7 is Complementation receptor (human) CXCR7, with N-terminus of click beetle luciferase, amino acids 2-413.
  // -Bp is human Beta-arrestin-2 tagged with C-terminal of click beetle luciferase.
  species R7Bp in Intracellular = 97340.78;  // hasPart uniprot:P32121; hasPart uniprot:P25106; hasPart uniprot:Q718F0
  // Complementation receptor (human) CXCR7, with N-terminus of click beetle luciferase, amino acids 2-413.
  // -(Has Part) of human CXCR7 since it is CXCR7, and (Has Part) of click beetle luciferase (potentially use (has version)?).
  species R7 in Intracellular = 509483.8;  // hasPart uniprot:P25106; hasPart uniprot:Q718F0
  // Intracellular Complex (after dissociation of Beta-arrestin-2 tagged with C-terminal of click beetle luciferase) of:
  // -R4 is Complementation receptor (human) CXCR4, with N-terminus of click beetle luciferase, amino acids 395-542.
  // -L12 is human CXCL12, Stromal cell-derived factor-1. This is not labelled.
  species C4Bpii in Intracellular = 0;  // hasPart uniprot:P61073; hasPart uniprot:Q718F0; hasPart uniprot:P48061
  // Intracellular Complex of:
  // -R4 is Complementation receptor (human) CXCR4, with N-terminus of click beetle luciferase, amino acids 395-542.
  // -L12 is human CXCL12, Stromal cell-derived factor-1. This is not labelled.
  // -Be is human Beta-arrestin-2. It is not labelled. Be in the model is endogenous.
  species C4Bei in Intracellular = 0;  // hasPart uniprot:Q718F0; hasPart uniprot:P32121; hasPart uniprot:P61073; hasPart uniprot:P48061
  // Intracellular Complex of:
  // -R4 is Complementation receptor (human) CXCR4, with N-terminus of click beetle luciferase, amino acids 395-542.
  // -Bp is human Beta-arrestin-2 tagged with C-terminal of click beetle luciferase.
  species R4Bpi in Intracellular = 271724.3;  // hasPart uniprot:P61073; hasPart uniprot:P32121; hasPart uniprot:Q718F0
  // Complex of:
  // -R4 is Complementation receptor (human) CXCR4, with N-terminus of click beetle luciferase, amino acids 395-542.
  // -Bp is human Beta-arrestin-2 tagged with C-terminal of click beetle luciferase.
  species R4Bp in Intracellular = 8151.729;  // hasPart uniprot:P32121; hasPart uniprot:Q718F0; hasPart uniprot:P61073
  // Complex of:
  // -R7 is Complementation receptor (human) CXCR7, with N-terminus of click beetle luciferase, amino acids 2-413.
  // -Be is human Beta-arrestin-2. It is not labelled. Be in the model is endogenous.
  species R7Be in Intracellular = 64893.86;  // hasPart uniprot:P32121; hasPart uniprot:P25106; hasPart uniprot:Q718F0
  // Intracellular Complex of:
  // -R7 is Complementation receptor (human) CXCR7, with N-terminus of click beetle luciferase, amino acids 2-413.
  // -Be is human Beta-arrestin-2. It is not labelled. Be in the model is endogenous.
  species R7Bei in Intracellular = 101234.4;  // hasPart uniprot:Q718F0; hasPart uniprot:P32121; hasPart uniprot:P25106
  // Intracellular receptor (after dissociation of endogenous Beta-arrestin-2) of:
  // -R7 is Complementation receptor (human) CXCR7, with N-terminus of click beetle luciferase, amino acids 2-413
  species R7Beii in Intracellular = 230078.2;  // hasPart uniprot:P25106; hasPart uniprot:Q718F0
  // Complex of:
  // -R7 is Complementation receptor (human) CXCR7, with N-terminus of click beetle luciferase, amino acids 2-413.
  // -L12 is human CXCL12, Stromal cell-derived factor-1. This is not labelled.
  // -Be is human Beta-arrestin-2. It is not labelled. Be in the model is endogenous.
  species C7Be in Intracellular = 0;  // hasPart uniprot:P48061; hasPart uniprot:P32121; hasPart uniprot:P25106; hasPart uniprot:Q718F0
  // Intracellular Complex of:
  // -R4 is Complementation receptor (human) CXCR4, with N-terminus of click beetle luciferase, amino acids 395-542.
  // -Be (is) human Beta-arrestin-2. It is not labelled. Be in the model is endogenous.
  species R4Bei in Intracellular = 181149.5;  // hasPart uniprot:Q718F0; hasPart uniprot:P32121; hasPart uniprot:P61073
  // Intracellular Complex of:
  // -R7 is Complementation receptor (human) CXCR7, with N-terminus of click beetle luciferase, amino acids 2-413.
  // -Bp is human Beta-arrestin-2 tagged with C-terminal of click beetle luciferase.
  species R7Bpi in Intracellular = 151851.6;  // hasPart uniprot:Q718F0; hasPart uniprot:P25106; hasPart uniprot:P32121
  // L12 is human CXCL12, Stromal cell-derived factor-1. It is not labelled.
  species L12 in Intracellular = 116000000;  // uniprot:P48061

  // Parameters:
  kf_L12_4 = 0.0021; kf_L12_4 is "kf,L12,4";
  kf_L12_7 = 0.0014; kf_L12_7 is "kf,L12,7";
  kf_B_4 = 8.5e-9; kf_B_4 is "kf,B,4";
  kf_B_7 = 1.4e-8; kf_B_7 is "kf,B,7";
  KD_R4_L12 = 40; KD_R4_L12 is "KD,R4,L12";
  KD_R7_L12 = 0.84; KD_R7_L12 is "KD,R7,L12";
  KD_C4_B = 5100000; KD_C4_B is "KD,C4,B";
  KD_C7_B = 650000; KD_C7_B is "KD,C7,B";
  ke_R4B = 0.0023; ke_R4B is "ke,R4B";
  ke_R7B = 0.0039; ke_R7B is "ke,R7B";
  ke_C7Bi = 0.00055; ke_C7Bi is "ke,C7Bi";
  koff_B_4 = 0.00074; koff_B_4 is "koff,B,4";
  koff_B_7 = 0.0025; koff_B_7 is "koff,B,7";
  krec_R4Bi = 6.9e-5; krec_R4Bi is "krec,R4Bi";
  krec_R7Bii = 0.0011; krec_R7Bii is "krec,R7Bii";
  krec_C7Bii = 0.00028; krec_C7Bii is "krec,C7Bii";
  kdeg_C4Bii = 0.0001; kdeg_C4Bii is "kdeg,C4Bii";
  kdeg_L12i = 0.0001; kdeg_L12i is "kdeg,L12i";
  KD_R4_B = 7800000; KD_R4_B is "KD,R4,B";
  KD_R7_B = 2300000; KD_R7_B is "KD,R7,B";
  ke_C4B = 0.0047; ke_C4B is "ke,C4B";
  ke_C7B = 0.0021; ke_C7B is "ke,C7B";
  n4 = 40000;
  n7 = 40000;
  n47 = 40000;
  Nav = 6.02e23;
  Vwell = 7e-5;
  Vcell = 8.4e-12;
  nmol_to_mol = 1000000000;
  var _Beta; _Beta is "%Beta";
  var _CXCR4; _CXCR4 is "%CXCR4";
  var _CXCR7; _CXCR7 is "%CXCR7";
  Initial_for_Be = Be;
  Initial_for_Bp = Bp;
  Initial_for_C4 = C4;
  Initial_for_C7 = C7;
  Initial_for_R4 = R4;
  Initial_for_R7 = R7;

  // Assignment rules:
  Total4 := C4Bp + C4Bpi + R4Bp;
  Total7 := C7Bp + C7Bpi + C7Bpii + R7Bp + R7Bpi;
  _Beta := (Be + Bp)/(Initial_for_Be + Initial_for_Bp)*100;
  _CXCR4 := (C4 + R4)/(Initial_for_C4 + Initial_for_R4)*100;
  _CXCR7 := (C7 + R7)/(Initial_for_C7 + Initial_for_R7)*100;

  // Reactions:
  Be_binding_R4: Be + R4 -> R4Be; Intracellular*function_1(KD_R4_B, kf_B_4, R4, R4Be, Be);  // isVersionOf GO:1990763
  Bp_binding_R4: Bp + R4 -> R4Bp; Intracellular*function_2(KD_R4_B, kf_B_4, R4, R4Bp, Bp);  // isVersionOf GO:1990763
  Be_binding_C4: Be + C4 -> C4Be; Intracellular*function_3(kf_B_4, KD_C4_B, Be, C4, C4Be);  // isVersionOf GO:1990763
  Bp_binding_C4: Bp + C4 -> C4Bp; Intracellular*function_4(kf_B_4, KD_C4_B, Bp, C4, C4Bp);  // isVersionOf GO:1990763
  Be_binding_R7: Be + R7 -> R7Be; Intracellular*function_5(KD_R7_B, kf_B_7, Be, R7, R7Be);  // isVersionOf GO:1990763
  Bp_binding_R7: Bp + R7 -> R7Bp; Intracellular*function_8(KD_R7_B, kf_B_7, R7Bp, R7, Bp);  // isVersionOf GO:1990763
  Be_binding_C7: Be + C7 -> C7Be; Intracellular*function_6(KD_C7_B, kf_B_7, Be, C7Be, C7);  // isPartOf GO:1990763
  Bp_binding_C7: Bp + C7 -> C7Bp; Intracellular*function_7(KD_C7_B, kf_B_7, C7Bp, Bp, C7);  // isVersionOf GO:1990763
  Internalization_of_R4Be: R4Be => R4Bei + Be; Intracellular*ke_R4B*R4Be;  // isPartOf GO:0002031
  Internalization_of_R4Bp: R4Bp => R4Bpi + Bp; Intracellular*ke_R4B*R4Bp;  // isVersionOf GO:0002031
  Internalization_of_C4Be: C4Be => C4Bei + L12i; Intracellular*ke_C4B*C4Be;  // isVersionOf GO:0002031
  Internalization_of_C4Bp: C4Bp => C4Bpi + L12i; Intracellular*ke_C4B*C4Bp;  // isHomologTo GO:0002031
  Internalization_of_R7Be: R7Be => R7Bei; Intracellular*ke_R7B*R7Be;  // isVersionOf GO:0002031
  Internalization_of_R7Bp: R7Bp => R7Bpi; Intracellular*ke_R7B*R7Bp;  // isPartOf GO:0002031
  Internalization_of_C7Be: C7Be => C7Bei + L12i; Intracellular*ke_C7B*C7Be;  // isPartOf GO:0002031
  Internalization_of_C7Bp: C7Bp => C7Bpi + L12i; Intracellular*ke_C7B*C7Bp;  // isPartOf GO:0002031
  Dissocation_of_Be_from_C4Bei: C4Bei => C4Beii + Be; Intracellular*koff_B_4*C4Bei;  // isVersionOf GO:0043241
  Dissociation_of_Bp_from_C4Bpi: C4Bpi => C4Bpii + Bp; Intracellular*koff_B_4*C4Bpi;  // isVersionOf GO:0043241
  Dissociation_of_Be_from_R7Bei: R7Bei => R7Beii + Be; Intracellular*koff_B_7*R7Bei;  // isVersionOf GO:0043241
  Dissociation_of_Bp_from_R7Bpi: R7Bpi => R7Bpii + Bp; Intracellular*koff_B_7*R7Bpi;  // isVersionOf GO:0043241
  reaction_27: C7Bei => C7Beii; Intracellular*ke_C7Bi*C7Bei; reaction_27 is "Trafficking of C7Bei to late endosomes";  // isVersionOf GO:0045022
  reaction_28: C7Bpi => C7Bpii; Intracellular*ke_C7Bi*C7Bpi; reaction_28 is "Trafficking of C7Bpi to late endosomes";  // isVersionOf GO:0045022
  Recycling_of_R4Bei: R4Bei => R4; Intracellular*krec_R4Bi*R4Bei;  // isVersionOf GO:0001881
  Recycling_of_R4Bpi: R4Bpi => R4; Intracellular*krec_R4Bi*R4Bpi;  // isVersionOf GO:0001881
  Recycling_of_R7Beii: R7Beii => R7; Intracellular*krec_R7Bii*R7Beii;  // isVersionOf GO:0001881
  Recycling_of_R7Bpii: R7Bpii => R7; Intracellular*krec_R7Bii*R7Bpii;  // isVersionOf GO:0001881
  Recycling_of_C7Beii: C7Beii => R7 + Be; Intracellular*krec_C7Bii*C7Beii;  // isPartOf GO:0001881
  Recycling_of_C7Bpii: C7Bpii => R7 + Bp; Intracellular*krec_C7Bii*C7Bpii;  // isVersionOf GO:0001881
  Degradation_of_C4Beii: C4Beii => ; Intracellular*kdeg_C4Bii*C4Beii;  // isVersionOf GO:0030163
  Degradation_of_C4Bpii: C4Bpii => ; Intracellular*kdeg_C4Bii*C4Bpii;  // isVersionOf GO:0030163
  Degradation_of_L12i: L12i => ; Intracellular*kdeg_L12i*L12i;  // isVersionOf GO:0030163
  L12_binding_R4: L12 + R4 -> C4; Intracellular*function_9(kf_L12_4, Nav, Vcell, KD_R4_L12, nmol_to_mol, L12, R4, C4);  // isVersionOf GO:0031723; isVersionOf GO:0035716
  L12_binding_R7: L12 + R7 -> C7; Intracellular*function_10(kf_L12_7, Nav, Vcell, KD_R7_L12, nmol_to_mol, L12, R7, C7);  // isVersionOf GO:0035716
  L12_binding_R4Be: L12 + R4Be -> C4Be; Intracellular*function_11(kf_L12_4, KD_R4_B, Nav, Vcell, KD_R4_L12, nmol_to_mol, KD_C4_B, L12, R4Be, C4Be);  // isVersionOf GO:0031723; isVersionOf GO:0035716
  L12_binding_R4Bp: L12 + R4Bp -> C4Bp; Intracellular*function_12(kf_L12_4, KD_R4_B, Nav, Vcell, KD_R4_L12, nmol_to_mol, KD_C4_B, L12, R4Bp, C4Bp);  // isVersionOf GO:0031723; isVersionOf GO:0035716
  L12_binding_R7Be: L12 + R7Be -> C7Be; Intracellular*function_13(KD_C7_B, kf_L12_7, KD_R7_B, Nav, Vcell, KD_R7_L12, nmol_to_mol, L12, R7Be, C7Be);  // isVersionOf GO:0035716
  L12_binding_R7Bp: L12 + R7Bp -> C7Bp; Intracellular*function_14(KD_C7_B, kf_L12_7, KD_R7_B, Nav, Vcell, KD_R7_L12, nmol_to_mol, L12, C7Bp, R7Bp);  // isVersionOf GO:0035716

  // Unit definitions:
  unit volume = dimensionless;
  unit substance = item;
end
