// SBML level 3 version 1

function Function_for_R3(Compartment_, H1, K2s, S, V1s)
  Compartment_*V1s*(S^H1/(S^H1 + K2s^H1));
end

function Function_for_R4(Compartment_, H2, K3s, S, V2s)
  Compartment_*V2s*(S^H2/(S^H2 + K3s^H2));
end

function Function_for_R1(Compartment_, K1s, S, V1s)
  Compartment_*V1s*(S/(S + K1s));
end

function Function_for_R2(Compartment_, H1, K2s, S, V2s)
  Compartment_*V2s*(S^H1/(S^H1 + K2s^H1));
end

model MODEL1609120000()
  // Walsh2014 - Inhibition kinetics of DAPT on APP Cleavage
  // This model is described in the article:
  // Are improper kinetic models hampering drug development?
  // Walsh R.
  // PeerJ 2014; 2: e649
  // Abstract:
  // Reproducibility of biological data is a significant problem in research today. One potential contributor to this, which has received little attention, is the over complication of enzyme kinetic inhibition models. The over complication of inhibitory models stems from the common use of the inhibitory term (1 + [I]/Ki ), an equilibrium binding term that does not distinguish between inhibitor binding and inhibitory effect. Since its initial appearance in the literature, around a century ago, the perceived mechanistic methods used in its production have spurred countless inhibitory equations. These equations are overly complex and are seldom compared to each other, which has destroyed their usefulness resulting in the proliferation and regulatory acceptance of simpler models such as IC50s for drug characterization. However, empirical analysis of inhibitory data recognizing the clear distinctions between inhibitor binding and inhibitory effect can produce simple logical inhibition models. In contrast to the common divergent practice of generating new inhibitory models for every inhibitory situation that presents itself. The empirical approach to inhibition modeling presented here is broadly applicable allowing easy comparison and rational analysis of drug interactions. To demonstrate this, a simple kinetic model of DAPT, a compound that both activates and inhibits ?-secretase is examined using excel. The empirical kinetic method described here provides an improved way of probing disease mechanisms, expanding the investigation of possible therapeutic interventions.
  // This model is hosted on BioModels Database and identified by: BIOMD0000000617.
  // To cite BioModels Database, please use: BioModels Database: An enhanced, curated and annotated resource for published quantitative kinetic models.
  // To the extent possible under law, all copyright and related or neighbouring rights to this encoded model have been dedicated to the public domain worldwide. Please refer to CC0 Public Domain Dedication for more information.
  // biomodels.db:MODEL1609120000
  // biomodels.db:BIOMD0000000617
  // isDescribedBy pubmed:25374788
  // isVersionOf GO:0042987
  // hasTaxon taxonomy:9606
  // hasProperty mamo:MAMO_0000046
  // model units - substance: substance, time: time, volume: volume, area: area, length: length, extent: substance

  // Compartments:
  compartment default_compartment = 1 volume;
  compartment Compartment_ = 1 volume;

  // Species:
  // Rate of APP cleavage in the presence of DAPT
  species v in default_compartment = 1;  // hasVersion CHEBI:86193 uniprot:Q9NZ42

  // Parameters:
  // Substrate (APP)
  S = 61;  // isVersionOf uniprot:P05067
  // Hill Coefficient
  H1 = 1.71;
  // Hill Coefficient
  H2 = 2.69;
  // Substrate Binding Concentration
  K3s = 605.01;
  // Maximal Catalysis Rate
  V2 = 443.68;
  // Maximal Catalysis Rate
  V2i = 0;
  // Inhibitor (DAPT)
  Ii = 1000;  // CHEBI:86193
  // Hill Coefficient
  Hxx = 0.96;
  // Substrate Binding Concentration
  Kxx1 = 70.93;
  // Substrate Binding Concentration
  K2 = 225.49;
  // Substrate Binding Concentration
  K2i = 118.41;
  // Maximal Catalysis Rate
  V1 = 20.06;
  // Maximal Catalysis Rate
  V1is = 451.78;
  // Hill Coefficient
  Hx1 = 1.02;
  // Substrate Binding Concentration
  Kx1 = 30.18;
  // Hill Coefficient
  Hx2 = 2.69;
  // Substrate Binding Concentration
  Kx2 = 553.64;
  // Maximal Catalysis Rate
  V1ii = 0;
  // Substrate Binding Concentration
  K1 = 177.76;
  // Substrate Binding Concentration
  K1is = 29.52;
  // Substrate Binding Concentration
  K1ii = 34.05;
  // Maximal Catalysis Rate
  V3 = 0;

  // Assignment rules:
  K2s := K2 - (K2 - K2i)*(Ii^Hxx/(Ii^Hxx + Kxx1^Hxx));
  V1s := V1 - (V1 - V1is)*(Ii^Hx1/(Ii^Hx1 + Kx1^Hx1)) + (V1 - V1is)*(Ii^Hx2/(Ii^Hx2 + Kx2^Hx2)) - (V1 - V1ii)*(Ii^Hx2/(Ii^Hx2 + Kx2^Hx2));
  K1s := K1 - (K1 - K1is)*(Ii^Hx1/(Ii^Hx1 + Kx1^Hx1)) + (K1 - K1is)*(Ii^Hx2/(Ii^Hx2 + Kx2^Hx2)) - (K1 - K1ii)*(Ii^Hx2/(Ii^Hx2 + Kx2^Hx2));
  V2s := V2 - (V2 - V2i)*(Ii^Hxx/(Ii^Hxx + Kxx1^Hxx));

  // Reactions:
  R1: => v; default_compartment*Function_for_R1(Compartment_, K1s, S, V1s);
  R2: => v; default_compartment*Function_for_R2(Compartment_, H1, K2s, S, V2s);
  R3: v => ; default_compartment*Function_for_R3(Compartment_, H1, K2s, S, V1s);
  R4: v => ; default_compartment*Function_for_R4(Compartment_, H2, K3s, S, V2s);

  // Unit definitions:
  unit volume = 1e-3 litre;
  unit substance = 1e-3 mole;
  unit length = metre;
  unit area = metre^2;
  unit time = second;
end
