// SBML level 2 version 4
// dcterms:bibliographicCitation: urn:miriam:pubmed:28317845

function Constant_flux__irreversible(v)
  v;
end
Constant_flux__irreversible is "Constant flux (irreversible)";

function rDsRc(Dna, Rc)
  piecewise(0, Dna < 1, piecewise(1*Rc, Dna > 1, 0.5*Rc));
end
rDsRc is "Function for Dissassembly of RC";

function rDeP21_1(Cdt2, Cy, P21, Skp2, aRc, kDeP21, kDeP21Cy, kDeP21aRc)
  (kDeP21 + kDeP21Cy*Skp2*Cy + kDeP21aRc*Cdt2*aRc)*P21;
end
rDeP21_1 is "Function for Degradation of p21";

function rDeCy_1(Cy, Skp2, kDeCy, kDeCyCy)
  (kDeCy + kDeCyCy*Skp2*Cy)*Cy;
end
rDeCy_1 is "Function for Degradation of cyclins";

function rDeCy_2(Cy, CyP21, Skp2, kDeCy, kDeCyCy)
  (kDeCy + kDeCyCy*Skp2*Cy)*CyP21;
end
rDeCy_2 is "Function for Degradation of cyclin in CDK2:Cyclin:p21 complexes";

function rDeP21_2(Cdt2, Cy, CyP21, Skp2, aRc, kDeP21, kDeP21Cy, kDeP21aRc)
  (kDeP21 + kDeP21Cy*Skp2*Cy + kDeP21aRc*Cdt2*aRc)*CyP21;
end
rDeP21_2 is "Function for Degradation of p21 in CDK2:Cyclin:p21 complexes";

function rDeP21_3(Cdt2, Cy, Skp2, aRc, iPcna, kDeP21, kDeP21Cy, kDeP21aRc)
  (kDeP21 + kDeP21Cy*Skp2*Cy + kDeP21aRc*Cdt2*aRc)*iPcna;
end
rDeP21_3 is "Function for Degradation of p21 in PCNA:p21 complexes";

function rPhRc_1(Cy, Rc, jCy, kPhRc, n)
  kPhRc*Cy^n/(jCy^n + Cy^n)*Rc;
end
rPhRc_1 is "Function for Phosphorylation/priming of replication complexes";

function rDeP21_4(Cdt2, Cy, Skp2, aRc, iRc, kDeP21, kDeP21Cy, kDeP21aRc)
  (kDeP21 + kDeP21Cy*Skp2*Cy + kDeP21aRc*Cdt2*aRc)*iRc;
end
rDeP21_4 is "Function for Degradation of p21 in inactive replication complexes";

function rDsRc_1(Dna, pRc)
  piecewise(0, Dna < 1, piecewise(1*pRc, Dna > 1, 0.5*pRc));
end
rDsRc_1 is "Function for Dissassembly of pRC";

function rDsRc_2(Dna, aRc)
  piecewise(0, Dna < 1, piecewise(1*aRc, Dna > 1, 0.5*aRc));
end
rDsRc_2 is "Function for Dissassembly of aRC";

function rDsRc_3(Dna, iRc)
  piecewise(0, Dna < 1, piecewise(1*iRc, Dna > 1, 0.5*iRc));
end
rDsRc_3 is "Function for Dissassembly of iRC";

function rDeP53_1(Dam, P53, jP53, kDeP53)
  kDeP53/(jP53 + Dam)*P53;
end
rDeP53_1 is "Function for Degradation of p53";

function rReDam_1(Dam, P53, jDam, kReDam, kReDamP53)
  (kReDam + kReDamP53*P53/(jDam + Dam))*Dam;
end
rReDam_1 is "Function for Repair of DNA damage";

model Barr2017___Dynamics_of_p21_in_hTert_RPE1_cells()
  // Barr2017 - Dynamics of p21 in hTert-RPE1 cells
  // This deteministic model reveals that a bistable switch created by Cdt2, promotes irreversible S-phase entry by keeping p21 levels low, prevents premature S-phase exit upon DNA damage
  // This model is described in the article:
  // DNA damage during S-phase mediates the proliferation-quiescence decision in the subsequent G1 via p21 expression.
  // Barr AR, Cooper S, Heldt FS, Butera F, Stoy H, Mansfeld J, Novák B, Bakal C.
  // Nat Commun 2017 Mar; 8: 14728
  // Abstract:
  // Following DNA damage caused by exogenous sources, such as ionizing radiation, the tumour suppressor p53 mediates cell cycle arrest via expression of the CDK inhibitor, p21. However, the role of p21 in maintaining genomic stability in the absence of exogenous DNA-damaging agents is unclear. Here, using live single-cell measurements of p21 protein in proliferating cultures, we show that naturally occurring DNA damage incurred over S-phase causes p53-dependent accumulation of p21 during mother G2- and daughter G1-phases. High p21 levels mediate G1 arrest via CDK inhibition, yet lower levels have no impact on G1 progression, and the ubiquitin ligases CRL4Cdt2 and SCFSkp2 couple to degrade p21 prior to the G1/S transition. Mathematical modelling reveals that a bistable switch, created by CRL4Cdt2, promotes irreversible S-phase entry by keeping p21 levels low, preventing premature S-phase exit upon DNA damage. Thus, we characterize how p21 regulates the proliferation-quiescence decision to maintain genomic stability.
  // This model is hosted on BioModels Database and identified by: BIOMD0000000660.
  // To cite BioModels Database, please use: Chelliah V et al. BioModels: ten-year anniversary. Nucl. Acids Res. 2015, 43(Database issue):D542-8.
  // To the extent possible under law, all copyright and related or neighbouring rights to this encoded model have been dedicated to the public domain worldwide. Please refer to CC0 Public Domain Dedication for more information.
  // biomodels.db:MODEL1607210001
  // biomodels.db:BIOMD0000000660
  // isDescribedBy pubmed:28317845
  // isDescribedBy pubmed:28317845
  // hasTaxon taxonomy:9606
  // hasProperty mamo:MAMO_0000046

  // Compartments:
  compartment Cell = 1;  // isVersionOf BTO:0004790

  // Species:
  species MrnaP21 in Cell = 1;  // encodes uniprot:P38936; isVersionOf CHEBI:33699
  // mRNAs encoding for both CyclinA:Cdk2 and CyclinE:Cdk2 complexes
  species MrnaCy in Cell = 1;  // encodes uniprot:P24864; isVersionOf CHEBI:33699; encodes uniprot:P78396
  species MrnaP53 in Cell = 1;  // isVersionOf CHEBI:33699; encodes uniprot:P04637
  species P21 in Cell = 0.72;  // isVersionOf uniprot:P38936
  // Both CyclinA:Cdk2 and CyclinE:Cdk2 complexes
  species Cy in Cell = 0.4;  // isVersionOf uniprot:P24864 uniprot:P78396
  // Both CyclinA:Cdk2:p21 and CyclinE:Cdk2:p21 complexes
  species CyP21 in Cell = 0;  // hasPart uniprot:P24864 uniprot:P38936; hasPart uniprot:P38936 uniprot:P78396
  species aPcna in Cell = 0.5;  // isVersionOf uniprot:P12004
  species Rc in Cell = 1;  // isVersionOf GO:0036387
  species pRc in Cell = 0;  // isVersionOf GO:0036387
  species aRc in Cell = 0;  // hasProperty PATO:0002354; isVersionOf GO:0036387
  species iRc in Cell = 0;  // hasProperty PATO:0002355; isVersionOf GO:0036387
  species Dna in Cell = 0;  // isVersionOf CHEBI:16991
  species Dam in Cell = 0;  // isVersionOf ncit:NCIT_C16507
  species P53 in Cell = 0;  // isVersionOf uniprot:P04637
  species $Skp2 in Cell = 1;  // isVersionOf uniprot:Q13309
  species $Cdt2 in Cell = 1;  // isVersionOf uniprot:Q9NZJ0
  species iPcna in Cell = 0;  // hasPart uniprot:P38936 uniprot:P12004
  species $tP21 in Cell;  // isVersionOf uniprot:P38936
  // Total level of both CyclinA:Cdk2 and CyclinE:Cdk2 complexes
  species $tCy in Cell;  // hasPart uniprot:P78396 uniprot:P24941; hasPart uniprot:P24864 uniprot:P24941
  species $tPcna in Cell;  // isVersionOf uniprot:P12004

  // Parameters:
  // (AU/min) constitutive mRNA synthesis
  kSyMrna = 0.02;
  // (1/min) p53-dependent synthesis of p21 mRNAs
  kSyMrnaP53 = 0.08;
  // (1/min) mRNA degradation
  kDeMrna = 0.02;
  // (1/min) constitutive p21 synthesis
  kSyP21 = 0.0018;
  // (1/min) constitutive p21 degradation
  kDeP21 = 0.0025;
  // (1/(AU*min)) Cyclin:CDK2-mediated p21 degradation (Skp2-dependent)
  kDeP21Cy = 0.007;
  // (1/(AU*min)) aRC-mediated p21 degradation (Cdt2-dependent)
  kDeP21aRc = 1;
  // (1/min) cyclin synthesis
  kSyCy = 0.005;
  // (1/(AU*min)) association of Cyclin:CDK2 and p21
  kAsCyP21 = 1;
  // (1/min) dissociation of Cyclin:CDK2:p21 complexes
  kDsCyP21 = 0.05;
  // (1/min) constitutive cyclin degradation
  kDeCy = 0.002;
  // (1/(AU*min)) Cyclin:CDK2-mediated cyclin degradation (Skp2-dependent)
  kDeCyCy = 0.0002;
  // (AU/min) PCNA import into the nucleus
  kImPc = 0.003;
  // (1/min) PCNA export from the nucleus
  kExPc = 0.006;
  // (1/min) Cyclin:CDK2-mediated phosphorylation/priming of RCs
  kPhRc = 0.1;
  // (1/min) dephosphorylation of pRCs
  kDpRc = 0.01;
  // (AU) CDK2 threshold for the phosphorylation/priming of RCs
  jCy = 1.8;
  // (-) hill coefficient for the phosphorylation/priming of RCs
  n = 6;
  // (1/(AU*min)) association of phosphorylated/primed RCs and PCNA
  kAsRcPc = 0.01;
  // (1/min) dissociation of pRC:PCNA complexes
  kDsRcPc = 0.001;
  // (1/(AU*min)) association of PCNA and p21
  kAsPcP21 = 100;
  // (1/min) dissociation of PCNA:p21 complexes
  kDsPcP21 = 0.01;
  // (1/min) DNA synthesis by active RCs
  kSyDna = 0.007;
  // (1/min) constitutive p53 synthesis
  kSyP53 = 0.05;
  // (AU/min) DNA damage-dependent degradation of p53
  kDeP53 = 0.05;
  // (AU) inhibition constant of p53 degradation by DNA damage
  jP53 = 0.01;
  // (AU/min) replication-independent DNA damage
  kGeDam = 0.001;
  // (1/min) replication-dependent DNA damage
  kGeDamArc = 0.005;
  // (1/min) p53-independent DNA damage repair
  kReDam = 0.001;
  // (1/min) p53-dependent DNA damage repair
  kReDamP53 = 0.005;
  // (AU) DNA damage threshold for repair
  jDam = 0.5;

  // Assignment rules:
  tP21 := P21 + CyP21 + iPcna + iRc;
  tCy := Cy + CyP21;
  tPcna := aPcna + iPcna + aRc + iRc;

  // Reactions:
  Synthesis_of_p21_mRNAs: => MrnaP21; Cell*Constant_flux__irreversible(kSyMrna);  // isVersionOf GO:0009299
  Synthesis_of_p21_mRNAs_by_p53: P53 => MrnaP21 + P53; Cell*kSyMrnaP53*P53;  // isVersionOf GO:0009299
  Synthesis_of_cyclin_mRNAs: => MrnaCy; Cell*Constant_flux__irreversible(kSyMrna);  // isVersionOf GO:0009299
  Synthesis_of_p53_mRNAs: => MrnaP53; Cell*Constant_flux__irreversible(kSyMrna);  // isVersionOf GO:0009299
  Degradation_of_p21_mRNAs: MrnaP21 => ; Cell*kDeMrna*MrnaP21;  // isVersionOf GO:0006402
  Degradation_of_cyclin_mRNAs: MrnaCy => ; Cell*kDeMrna*MrnaCy;  // isVersionOf GO:0006402
  Degradation_of_p53_mRNAs: MrnaP53 => ; Cell*kDeMrna*MrnaP53;  // isVersionOf GO:0006402
  Synthesis_of_p21: MrnaP21 => MrnaP21 + P21; Cell*kSyP21*MrnaP21;  // isVersionOf GO:0045727
  Degradation_of_p21: P21 => ; Cell*rDeP21_1(Cdt2, Cy, P21, Skp2, aRc, kDeP21, kDeP21Cy, kDeP21aRc);  // modifiers: Skp2, Cy, Cdt2, aRc; isVersionOf GO:0030163
  Synthesis_of_cyclins: MrnaCy => MrnaCy + Cy; Cell*kSyCy*MrnaCy;  // isVersionOf GO:0045727
  Degradation_of_cyclins: Cy => ; Cell*rDeCy_1(Cy, Skp2, kDeCy, kDeCyCy);  // modifiers: Skp2; isVersionOf GO:0030163
  Association_and_dissociation_of_CDK2_Cyclin_and_p21: Cy + P21 -> CyP21; Cell*(kAsCyP21*Cy*P21 - kDsCyP21*CyP21); Association_and_dissociation_of_CDK2_Cyclin_and_p21 is "Association and dissociation of CDK2:Cyclin and p21";  // hasProperty GO:0006461; hasProperty GO:0043241
  Degradation_of_cyclin_in_CDK2_Cyclin_p21_complexes: CyP21 => P21; Cell*rDeCy_2(Cy, CyP21, Skp2, kDeCy, kDeCyCy); Degradation_of_cyclin_in_CDK2_Cyclin_p21_complexes is "Degradation of cyclin in CDK2:Cyclin:p21 complexes";  // modifiers: Skp2, Cy; isVersionOf GO:0030163
  Degradation_of_p21_in_CDK2_Cyclin_p21_complexes: CyP21 => Cy; Cell*rDeP21_2(Cdt2, Cy, CyP21, Skp2, aRc, kDeP21, kDeP21Cy, kDeP21aRc); Degradation_of_p21_in_CDK2_Cyclin_p21_complexes is "Degradation of p21 in CDK2:Cyclin:p21 complexes";  // modifiers: Skp2, Cdt2, aRc; isVersionOf GO:0030163
  Import_of_active_PCNA: => aPcna; Cell*Constant_flux__irreversible(kImPc);  // isVersionOf GO:0006606
  Export_of_active_PCNA: aPcna => ; Cell*kExPc*aPcna;  // isVersionOf GO:0006611
  Export_of_inactive_PCNA: iPcna => P21; Cell*kExPc*iPcna;  // isVersionOf GO:0006611
  Association_and_dissociation_of_PCNA_and_p21: aPcna + P21 -> iPcna; Cell*(kAsPcP21*aPcna*P21 - kDsPcP21*iPcna);  // hasProperty GO:0043241; hasProperty GO:0006461
  Degradation_of_p21_in_PCNA_p21_complexes: iPcna => aPcna; Cell*rDeP21_3(Cdt2, Cy, Skp2, aRc, iPcna, kDeP21, kDeP21Cy, kDeP21aRc); Degradation_of_p21_in_PCNA_p21_complexes is "Degradation of p21 in PCNA:p21 complexes";  // modifiers: Skp2, Cy, Cdt2, aRc; isVersionOf GO:0030163
  Phosphorylation_priming_of_replication_complexes: Rc => pRc; Cell*rPhRc_1(Cy, Rc, jCy, kPhRc, n); Phosphorylation_priming_of_replication_complexes is "Phosphorylation/priming of replication complexes";  // modifiers: Cy; isVersionOf GO:0016310
  Dephosphorylation_of_replication_complexes: pRc => Rc; Cell*kDpRc*pRc;  // isVersionOf GO:0016311
  Association_and_dissociation_of_active_PCNA_and_replication_complexes: aPcna + pRc -> aRc; Cell*(kAsRcPc*aPcna*pRc - kDsRcPc*aRc);  // hasProperty GO:0006461; hasProperty GO:0043241
  Association_and_dissociation_of_inactive_PCNA_and_replication_complexes: iPcna + pRc -> iRc; Cell*(kAsRcPc*iPcna*pRc - kDsRcPc*iRc);  // hasProperty GO:0043241; hasProperty GO:0006461
  Association_and_dissociation_of_p21_and_replication_complexes: aRc + P21 -> iRc; Cell*(kAsPcP21*aRc*P21 - kDsPcP21*iRc);  // hasProperty GO:0006461; hasProperty GO:0043241
  Degradation_of_p21_in_inactive_replication_complexes: iRc => aRc; Cell*rDeP21_4(Cdt2, Cy, Skp2, aRc, iRc, kDeP21, kDeP21Cy, kDeP21aRc);  // modifiers: Skp2, Cy, Cdt2; isVersionOf GO:0030163
  Synthesis_of_DNA: aRc => aRc + Dna; Cell*kSyDna*aRc;  // isVersionOf GO:0000731
  Dissassembly_of_RC: Rc => ; Cell*rDsRc(Dna, Rc);  // modifiers: Dna; isVersionOf GO:0043241
  Dissassembly_of_pRC: pRc => ; Cell*rDsRc_1(Dna, pRc);  // modifiers: Dna; isVersionOf GO:0043241
  Dissassembly_of_aRC: aRc => aPcna; Cell*rDsRc_2(Dna, aRc);  // modifiers: Dna; isVersionOf GO:0043241
  Dissassembly_of_iRC: iRc => iPcna; Cell*rDsRc_3(Dna, iRc);  // modifiers: Dna; isVersionOf GO:0043241
  Synthesis_of_p53: MrnaP53 => MrnaP53 + P53; Cell*kSyP53*MrnaP53;  // isVersionOf GO:0045727
  Degradation_of_p53: P53 => ; Cell*rDeP53_1(Dam, P53, jP53, kDeP53);  // modifiers: Dam; isVersionOf GO:0030163
  Induction_of_DNA_damage: => Dam; Cell*Constant_flux__irreversible(kGeDam);  // isVersionOf omit:OMIT_0005506
  Induction_of_DNA_damage_by_replication: aRc => aRc + Dam; Cell*kGeDamArc*aRc;  // isVersionOf omit:OMIT_0005506
  Repair_of_DNA_damage: Dam => ; Cell*rReDam_1(Dam, P53, jDam, kReDam, kReDamP53);  // modifiers: P53; isVersionOf omit:OMIT_0005517

  // Unit definitions:
  unit volume = 1e-3 litre;
  unit time = 60 second;
  unit substance = 1e-3 mole;
end
