// SBML level 2 version 4
// dcterms:bibliographicCitation: http://identifiers.org/pubmed/16007170

function Constant_flux__irreversible_0(v)
  v;
end
Constant_flux__irreversible_0 is "Constant flux (irreversible)";

function function_for_v1_1(EGF, EGFR, EGF_EGFR, k1, kd1)
  k1*EGF*EGFR - kd1*EGF_EGFR;
end

model Hornberg2005_MAPKsignalling()
  // Hornberg2005 - MAPKsignalling
  // Large model of the ERK signalling network. Results from this model were used to generate a simplified version of the network.
  // This model is described in the article:
  // Control of MAPK signalling: from complexity to what really matters.
  // Hornberg JJ, Binder B, Bruggeman FJ, Schoeberl B, Heinrich R, Westerhoff HV.
  // Oncogene 2005 Aug; 24(36): 5533-5542
  // Abstract:
  // Oncogenesis results from changes in kinetics or in abundance of proteins in signal transduction networks. Recently, it was shown that control of signalling cannot reside in a single gene product, and might well be dispersed over many components. Which of the reactions in these complex networks are most important, and how can the existing molecular information be used to understand why particular genes are oncogenes whereas others are not? We implement a new method to help address such questions. We apply control analysis to a detailed kinetic model of the epidermal growth factor-induced mitogen-activated protein kinase network. We determine the control of each reaction with respect to three biologically relevant characteristics of the output of this network: the amplitude, duration and integrated output of the transient phosphorylation of extracellular signal-regulated kinase (ERK). We confirm that control is distributed, but far from randomly: a small proportion of reactions substantially control signalling. In particular, the activity of Raf is in control of all characteristics of the transient profile of ERK phosphorylation, which may clarify why Raf is an oncogene. Most reactions that really matter for one signalling characteristic are also important for the other characteristics. Our analysis also predicts the effects of mutations and changes in gene expression.
  // This model is hosted on BioModels Database and identified by: BIOMD0000000667.
  // To cite BioModels Database, please use: Chelliah V et al. BioModels: ten-year anniversary. Nucl. Acids Res. 2015, 43(Database issue):D542-8.
  // To the extent possible under law, all copyright and related or neighbouring rights to this encoded model have been dedicated to the public domain worldwide. Please refer to CC0 Public Domain Dedication for more information.
  // biomodels.db:MODEL0848279215
  // isDescribedBy pubmed:16007170
  // biomodels.db:BIOMD0000000667
  // isVersionOf GO:0043408
  // isDescribedBy pubmed:16007170
  // hasProperty mamo:MAMO_0000046

  // Compartments:
  compartment Compartment = 1;

  // Species:
  species EGF in Compartment = 5e-8;  // isVersionOf uniprot:P01133
  species EGFR in Compartment = 50000;  // isVersionOf uniprot:P00533
  species EGF_EGFR in Compartment = 0;  // hasPart uniprot:P00533; hasPart uniprot:P01133
  species _EGF_EGFR_2 in Compartment = 0; _EGF_EGFR_2 is "(EGF_EGFR)2";  // hasPart uniprot:P01133; hasPart uniprot:P00533
  species _EGF_EGFR__2 in Compartment = 0; _EGF_EGFR__2 is "(EGF_EGFR*)2";  // hasPart uniprot:P01133; hasPart uniprot:P00533
  species EGFRi in Compartment = 0;  // isVersionOf uniprot:P00533
  species _EGF_EGFR__2_GAP_Grb2_Prot in Compartment = 0; _EGF_EGFR__2_GAP_Grb2_Prot is "(EGF_EGFR*)2_GAP_Grb2_Prot";  // isVersionOf GO:0070436
  species _EGF_EGFRi__2 in Compartment = 0; _EGF_EGFRi__2 is "(EGF-EGFRi*)2";  // hasPart uniprot:P01133; hasPart uniprot:P00533
  species Proti in Compartment = 0;  // isVersionOf uniprot:P24394
  species EGF_EGFRi in Compartment = 0;  // hasPart uniprot:P00533; hasPart uniprot:P01133
  species _EGF_EGFRi_2 in Compartment = 0; _EGF_EGFRi_2 is "(EGF-EGFRi)2";  // hasPart uniprot:P00533; hasPart uniprot:P01133
  species Prot in Compartment = 81000;  // isVersionOf uniprot:P24394
  species EGFideg in Compartment = 0;  // isVersionOf uniprot:P01133
  species GAP in Compartment = 12000;  // isVersionOf uniprot:P20936
  species _EGF_EGFR__2_GAP in Compartment = 0; _EGF_EGFR__2_GAP is "(EGF_EGFR*)2_GAP";  // hasPart uniprot:P01133; hasPart uniprot:P00533; hasPart uniprot:P20936
  species EGFi in Compartment = 0;  // isVersionOf uniprot:P01133
  species _EGF_EGFRi__2_GAP in Compartment = 0; _EGF_EGFRi__2_GAP is "(EGF_EGFRi*)2_GAP";  // hasPart uniprot:P01133; hasPart uniprot:P00533; hasPart uniprot:P20936
  species _EGF_EGFRi__2_GAP_Grb2 in Compartment = 0; _EGF_EGFRi__2_GAP_Grb2 is "(EGF_EGFRi*)2_GAP_Grb2";  // isVersionOf GO:0070436
  species _EGF_EGFRi__2_GAP_Grb2_Sos in Compartment = 0; _EGF_EGFRi__2_GAP_Grb2_Sos is "(EGF_EGFRi*)2_GAP_Grb2_Sos";  // isVersionOf GO:0070620
  species _EGF_EGFRi__2_GAP_Grb2_Sos_Ras_GDP in Compartment = 0; _EGF_EGFRi__2_GAP_Grb2_Sos_Ras_GDP is "(EGF_EGFRi*)2_GAP_Grb2_Sos_Ras_GDP";  // hasPart uniprot:P60953; hasPart GO:0070620; hasPart uniprot:P01116
  species _EGF_EGFRi__2_GAP_Grb2_Sos_Ras_GTP in Compartment = 0; _EGF_EGFRi__2_GAP_Grb2_Sos_Ras_GTP is "(EGF_EGFRi*)2_GAP_Grb2_Sos_Ras_GTP";  // hasPart GO:0070620; hasPart uniprot:P60953; hasPart uniprot:P01116
  species Grb2 in Compartment = 11000;  // isVersionOf uniprot:P62993
  species _EGF_EGFR__2_GAP_Grb2 in Compartment = 0; _EGF_EGFR__2_GAP_Grb2 is "(EGF_EGFR*)2_GAP_Grb2";  // isVersionOf GO:0070436
  species Sos in Compartment = 26300;  // isVersionOf uniprot:Q07889
  species _EGF_EGFR__2_GAP_Grb2_Sos in Compartment = 0; _EGF_EGFR__2_GAP_Grb2_Sos is "(EGF_EGFR*)2_GAP_Grb2_Sos";  // isVersionOf GO:0070620
  species Ras_GDP in Compartment = 72000;  // hasPart uniprot:P01116; hasPart uniprot:P60953
  species _EGF_EGFR__2_GAP_Grb2_Sos_Ras_GDP in Compartment = 0; _EGF_EGFR__2_GAP_Grb2_Sos_Ras_GDP is "(EGF_EGFR*)2_GAP_Grb2_Sos_Ras_GDP";  // hasPart uniprot:P01116; hasPart GO:0070620; hasPart uniprot:P60953
  species Ras_GTP in Compartment = 0;  // hasPart uniprot:P01116; hasPart uniprot:P60953
  species _EGF_EGFR__2_GAP_Grb2_Sos_Ras_GTP in Compartment = 0; _EGF_EGFR__2_GAP_Grb2_Sos_Ras_GTP is "(EGF_EGFR*)2_GAP_Grb2_Sos_Ras_GTP";  // hasPart uniprot:P01116; hasPart GO:0070620; hasPart uniprot:P60953
  species Grb2_Sos in Compartment = 40000;  // hasPart uniprot:P62993; hasPart uniprot:Q07889
  species Shc in Compartment = 101000;  // isVersionOf uniprot:P29353
  species _EGF_EGFR__2_GAP_SHC in Compartment = 0; _EGF_EGFR__2_GAP_SHC is "(EGF_EGFR*)2_GAP_SHC";  // isVersionOf GO:0070435
  species _EGF_EGFR__2_GAP_SHC_0 in Compartment = 0; _EGF_EGFR__2_GAP_SHC_0 is "(EGF_EGFR*)2_GAP_SHC*";  // isVersionOf GO:0070435
  species _EGF_EGFR__2_GAP_SHC__Grb2 in Compartment = 0; _EGF_EGFR__2_GAP_SHC__Grb2 is "(EGF_EGFR*)2_GAP_SHC*_Grb2";  // hasPart GO:0070435; hasPart uniprot:P62993
  species _EGF_EGFR__2_GAP_SHC__Grb2_Sos in Compartment = 0; _EGF_EGFR__2_GAP_SHC__Grb2_Sos is "(EGF_EGFR*)2_GAP_SHC*_Grb2_Sos";  // hasPart GO:0070621
  species _EGF_EGFR__2_GAP_SHC__Grb2_Sos_Ras_GDP in Compartment = 0; _EGF_EGFR__2_GAP_SHC__Grb2_Sos_Ras_GDP is "(EGF_EGFR*)2_GAP_SHC*_Grb2_Sos_Ras_GDP";  // hasPart GO:0070621; hasPart uniprot:P01116; hasPart uniprot:P60953
  species _EGF_EGFR__2_GAP_SHC__Grb2_Sos_Ras_GTP in Compartment = 0; _EGF_EGFR__2_GAP_SHC__Grb2_Sos_Ras_GTP is "(EGF_EGFR*)2_GAP_SHC*_Grb2_Sos_Ras_GTP";  // hasPart GO:0070621; hasPart uniprot:P60953; hasPart uniprot:P01116
  species Shc__Grb2_Sos in Compartment = 0; Shc__Grb2_Sos is "Shc*_Grb2_Sos";  // hasPart uniprot:P62993; hasPart uniprot:Q07889; hasPart uniprot:P29353
  species Shc__Grb2 in Compartment = 0; Shc__Grb2 is "Shc*_Grb2";  // hasPart uniprot:P62993; hasPart uniprot:P29353
  species Shc_0 in Compartment = 0; Shc_0 is "Shc*";  // isVersionOf uniprot:P29353
  species Raf in Compartment = 40000;  // isVersionOf uniprot:P04049
  species Raf_Ras_GTP in Compartment = 0;  // hasPart uniprot:P04049; hasPart uniprot:P60953; hasPart uniprot:P01116
  species Ras_GTP_ in Compartment = 0; Ras_GTP_ is "Ras_GTP*";  // hasPart uniprot:P01116; hasPart uniprot:P60953
  species Phosphatase1 in Compartment = 40000;  // isVersionOf uniprot:P51452
  species Raf_0 in Compartment = 0; Raf_0 is "Raf*";  // isVersionOf uniprot:P04049
  species Raf__phosphatase1 in Compartment = 0; Raf__phosphatase1 is "Raf*_phosphatase1";  // hasPart uniprot:P51452; hasPart uniprot:P04049
  species MEK in Compartment = 2.1e7;  // isVersionOf uniprot:Q02750
  species MEK_Raf in Compartment = 0; MEK_Raf is "MEK_Raf*";  // hasPart uniprot:P04049; hasPart uniprot:Q02750
  species MEK_P in Compartment = 0;  // hasPart uniprot:Q02750; hasPart kegg.compound:C00562
  species MEK_P_Raf in Compartment = 0; MEK_P_Raf is "MEK_P_Raf*";  // hasPart uniprot:P04049; hasPart uniprot:Q02750; hasPart kegg.compound:C00562
  species MEK_PP in Compartment = 0;  // hasPart uniprot:Q02750; hasPart kegg.compound:C00562
  species MEK_PP_phosphatase2 in Compartment = 0;  // hasPart uniprot:Q02750; hasPart uniprot:P51452; hasPart kegg.compound:C00562
  species phosphatse2 in Compartment = 40000;  // isVersionOf uniprot:P51452
  species MEK_P_phosphatase2 in Compartment = 0;  // hasPart kegg.compound:C00562; hasPart uniprot:Q02750; hasPart uniprot:P51452
  species ERK in Compartment = 2.21e7;  // isVersionOf uniprot:P28482
  species ERK_MEK_PP in Compartment = 0;  // hasPart uniprot:P28482; hasPart uniprot:Q02750; hasPart kegg.compound:C00562
  species ERK_P in Compartment = 0;  // hasPart kegg.compound:C00562; hasPart uniprot:P28482
  species ERK_P_MEKPP in Compartment = 0;  // hasPart uniprot:Q02750; hasPart uniprot:P28482; hasPart kegg.compound:C00562
  species ERK_PP in Compartment = 0;  // hasPart kegg.compound:C00562; hasPart uniprot:P28482
  species phosphatase3 in Compartment = 1e7;  // isVersionOf uniprot:P51452
  species ERK_PP_phosphatase3 in Compartment = 0;  // hasPart kegg.compound:C00562; hasPart uniprot:P28482; hasPart uniprot:P51452
  species ERK_P_phosphatase3 in Compartment = 0;  // hasPart kegg.compound:C00562; hasPart uniprot:P51452; hasPart uniprot:P28482
  species _EGF_EGFRi__2_GAP_SHC in Compartment = 0; _EGF_EGFRi__2_GAP_SHC is "(EGF_EGFRi*)2_GAP_SHC";  // isVersionOf GO:0070435
  species _EGF_EGFRi__2_GAP_SHC_0 in Compartment = 0; _EGF_EGFRi__2_GAP_SHC_0 is "(EGF_EGFRi*)2_GAP_SHC*";  // isVersionOf GO:0070435
  species _EGF_EGFRi__2_GAP_SHC__Grb2 in Compartment = 0; _EGF_EGFRi__2_GAP_SHC__Grb2 is "(EGF_EGFRi*)2_GAP_SHC*_Grb2";  // hasPart uniprot:P62993; hasPart GO:0070435
  species _EGF_EGFRi__2_GAP_SHC__Grb2_Sos in Compartment = 0; _EGF_EGFRi__2_GAP_SHC__Grb2_Sos is "(EGF_EGFRi*)2_GAP_SHC*_Grb2_Sos";  // hasPart GO:0070621
  species _EGF_EGFRi__2_GAP_SHC__Grb2_Sos_Ras_GDP in Compartment = 0; _EGF_EGFRi__2_GAP_SHC__Grb2_Sos_Ras_GDP is "(EGF_EGFRi*)2_GAP_SHC*_Grb2_Sos_Ras_GDP";  // hasPart uniprot:P01116; hasPart uniprot:P60953; hasPart GO:0070621
  species _EGF_EGFRi__2_GAP_SHC__Grb2_Sos_Ras_GTP in Compartment = 0; _EGF_EGFRi__2_GAP_SHC__Grb2_Sos_Ras_GTP is "(EGF_EGFRi*)2_GAP_SHC*_Grb2_Sos_Ras_GTP";  // hasPart uniprot:P60953; hasPart uniprot:P01116; hasPart GO:0070621
  species Ras_GTPi in Compartment = 0;  // hasPart uniprot:P01116; hasPart uniprot:P60953
  species Raf_Ras_GTPi in Compartment = 0;  // hasPart uniprot:P60953; hasPart uniprot:P01116; hasPart uniprot:P04049
  species Ras_GTPi_0 in Compartment = 0; Ras_GTPi_0 is "Ras_GTPi*";  // hasPart uniprot:P01116; hasPart uniprot:P60953
  species Rafi in Compartment = 0; Rafi is "Rafi*";  // isVersionOf uniprot:P04049
  species Rafi__phosphatase1 in Compartment = 0; Rafi__phosphatase1 is "Rafi*_phosphatase1";  // hasPart uniprot:P04049; hasPart uniprot:P51452
  species MEK_Rafi in Compartment = 0; MEK_Rafi is "MEK_Rafi*";  // hasPart uniprot:P04049; hasPart uniprot:Q02750
  species MEKi_P in Compartment = 0;  // hasPart uniprot:Q02750; hasPart kegg.compound:C00562
  species MEK_P_Rafi in Compartment = 0; MEK_P_Rafi is "MEK_P_Rafi*";  // hasPart uniprot:Q02750; hasPart kegg.compound:C00562; hasPart uniprot:P04049
  species MEKi_PP in Compartment = 0;  // hasPart kegg.compound:C00562; hasPart uniprot:Q02750
  species MEKi_PP_phosphatase2 in Compartment = 0;  // hasPart uniprot:P51452; hasPart kegg.compound:C00562; hasPart uniprot:Q02750
  species MEKi_P_phosphatase2 in Compartment = 0;  // hasPart uniprot:P51452; hasPart kegg.compound:C00562; hasPart uniprot:Q02750
  species ERKi_P in Compartment = 0;  // hasPart uniprot:P28482; hasPart kegg.compound:C00562
  species ERKi_P_MEKi_PP in Compartment = 0;  // hasPart uniprot:P28482; hasPart uniprot:Q02750; hasPart kegg.compound:C00562
  species ERKi_PP in Compartment = 0;  // hasPart kegg.compound:C00562; hasPart uniprot:P28482
  species ERKi_PP_phosphatase3 in Compartment = 0;  // hasPart uniprot:P51452; hasPart kegg.compound:C00562; hasPart uniprot:P28482
  species ERKi_P_phosphatase3 in Compartment = 0;  // hasPart uniprot:P28482; hasPart uniprot:P51452; hasPart kegg.compound:C00562
  species EGFRidag in Compartment = 0;  // isVersionOf uniprot:P00533
  species _EGF_EGFRi___2deg in Compartment = 0; _EGF_EGFRi___2deg is "(EGF_EGFRi*)*2deg";  // hasPart uniprot:P00533; hasPart uniprot:P01133
  species _EGF_EGFR__2_GAP_Grb2_Sos_Prot in Compartment = 0; _EGF_EGFR__2_GAP_Grb2_Sos_Prot is "(EGF_EGFR*)2_GAP_Grb2_Sos_Prot";  // hasPart GO:0070620; hasPart uniprot:P24394
  species _EGF_EGFR__2_GAP_Grb2_Sos_Ras_GDP_Prot in Compartment = 0; _EGF_EGFR__2_GAP_Grb2_Sos_Ras_GDP_Prot is "(EGF_EGFR*)2_GAP_Grb2_Sos_Ras_GDP_Prot";  // hasPart GO:0070620; hasPart uniprot:P01116; hasPart uniprot:P60953; hasPart uniprot:P24394
  species _EGF_EGFR__2_GAP_Grb2_Sos_Ras_GTP_Prot in Compartment = 0; _EGF_EGFR__2_GAP_Grb2_Sos_Ras_GTP_Prot is "(EGF_EGFR*)2_GAP_Grb2_Sos_Ras_GTP_Prot";  // hasPart uniprot:P60953; hasPart uniprot:P01116; hasPart uniprot:P24394; hasPart GO:0070620
  species _EGF_EGFR__2_GAP_Grb2_Sos_ERK_PP in Compartment = 0; _EGF_EGFR__2_GAP_Grb2_Sos_ERK_PP is "(EGF_EGFR*)2_GAP_Grb2_Sos_ERK_PP";  // hasPart uniprot:P28482; hasPart kegg.compound:C00562; hasPart GO:0070620
  species _EGF_EGFRi__2_GAP_Grb2_Sos_ERKi_PP in Compartment = 0; _EGF_EGFRi__2_GAP_Grb2_Sos_ERKi_PP is "(EGF_EGFRi*)2_GAP_Grb2_Sos_ERKi_PP";  // hasPart kegg.compound:C00562; hasPart GO:0070620; hasPart uniprot:P28482
  species _EGF_EGFR__2_GAP_SHC__Grb2_Sos_ERK_PP in Compartment = 0; _EGF_EGFR__2_GAP_SHC__Grb2_Sos_ERK_PP is "(EGF_EGFR*)2_GAP_SHC*_Grb2_Sos_ERK_PP";  // hasPart GO:0070621; hasPart uniprot:P28482; hasPart kegg.compound:C00562
  species _EGF_EGFRi__2_GAP_SHC__Grb2_Sos_ERKi_PP in Compartment = 0; _EGF_EGFRi__2_GAP_SHC__Grb2_Sos_ERKi_PP is "(EGF_EGFRi*)2_GAP_SHC*_Grb2_Sos_ERKi_PP";  // hasPart GO:0070621; hasPart uniprot:P28482; hasPart kegg.compound:C00562
  species _EGF_EGFR__2_GAP_Grb2_Sos_deg in Compartment = 0; _EGF_EGFR__2_GAP_Grb2_Sos_deg is "(EGF_EGFR*)2_GAP_Grb2_Sos deg";  // isVersionOf GO:0070620
  species _EGF_EGFRi__2_GAP_Grb2_Sos_deg in Compartment = 0; _EGF_EGFRi__2_GAP_Grb2_Sos_deg is "(EGF_EGFRi*)2_GAP_Grb2_Sos deg";  // isVersionOf GO:0070620
  species Sos_ERK_PP in Compartment = 0;  // hasPart uniprot:P28482; hasPart kegg.compound:C00562; hasPart uniprot:Q07889
  species Sos_ERKi_PP in Compartment = 0;  // hasPart uniprot:Q07889; hasPart uniprot:P28482; hasPart kegg.compound:C00562
  species Sosi in Compartment = 0;  // isVersionOf uniprot:Q07889
  species ERKi_MEKi_PP_0 in Compartment = 1;  // hasPart uniprot:Q02750; hasPart uniprot:P28482; hasPart kegg.compound:C00562
  species _EGF_EGFR__2_GAP_SHC__Grb2_Prot_0 in Compartment = 1; _EGF_EGFR__2_GAP_SHC__Grb2_Prot_0 is "(EGF_EGFR*)2_GAP_SHC*_Grb2_Prot";  // hasPart uniprot:P24394; hasPart GO:0070435; hasPart uniprot:P62993
  species _EGF_EGFR__2_GAP_SHC__Grb2_Sos_Prot_0 in Compartment = 1; _EGF_EGFR__2_GAP_SHC__Grb2_Sos_Prot_0 is "(EGF_EGFR*)2_GAP_SHC*_Grb2_Sos_Prot";  // hasPart uniprot:P24394; hasPart GO:0070621
  species _EGF_EGFR__2_GAP_SHC__Grb2_Sos_Ras_GDP_Prot_0 in Compartment = 1; _EGF_EGFR__2_GAP_SHC__Grb2_Sos_Ras_GDP_Prot_0 is "(EGF_EGFR*)2_GAP_SHC*_Grb2_Sos_Ras_GDP_Prot";  // hasPart uniprot:P60953; hasPart uniprot:P01116; hasPart GO:0070621; hasPart uniprot:P24394
  species _EGF_EGFR__2_GAP_SHC__Grb2_Sos_Ras_GTP_Prot_0 in Compartment = 1; _EGF_EGFR__2_GAP_SHC__Grb2_Sos_Ras_GTP_Prot_0 is "(EGF_EGFR*)2_GAP_SHC*_Grb2_Sos_Ras_GTP_Prot";  // hasPart GO:0070621; hasPart uniprot:P24394; hasPart uniprot:P01116; hasPart uniprot:P60953

  // Parameters:
  k1 = 30000000;
  kd1 = 0.00384;
  k2 = 1.66e-5;
  kd2 = 0.1;
  k3 = 1;
  kd3 = 0.01;
  k4 = 1.73e-7;
  kd4 = 0.00166;
  kd5 = 0.0146;
  k6 = 0.0005;
  kd6 = 0.005;
  k8 = 1.66e-6;
  kd8 = 0.2;
  k10b = 0.0543;
  kd10 = 0.011;
  k13 = 2.17;
  k15 = 10000;
  k16 = 1.66e-5;
  k17 = 1.66e-5;
  kd17 = 0.06;
  k18 = 2.5e-5;
  kd18 = 1.3;
  k19 = 1.66e-7;
  kd19 = 0.5;
  k20 = 3.5e-6;
  kd20 = 0.4;
  k21 = 3.66e-7;
  kd21 = 0.023;
  k22 = 3.5e-5;
  kd22 = 0.1;
  k23 = 6;
  kd23 = 0.06;
  kd24 = 0.55;
  k25 = 1.66e-5;
  kd25 = 0.0214;
  k28 = 1.66e-6;
  kd28 = 0.0053;
  k29 = 1.17e-6;
  kd29 = 1;
  k32 = 4e-7;
  kd32 = 0.1;
  k33 = 3.5e-5;
  kd33 = 0.2;
  k34 = 7.5e-6;
  kd34 = 0.03;
  k35 = 7.5e-6;
  kd35 = 0.0015;
  k36 = 0.005;
  kd36 = 0;
  k37 = 1.5e-6;
  kd37 = 0.3;
  k40 = 5e-5;
  kd40 = 0.064;
  k41 = 5e-5;
  kd41 = 0.0429;
  k42 = 0.000118;
  kd42 = 0.2;
  kd43 = 1;
  k44 = 1.95e-5;
  kd44 = 0.0183;
  kd45 = 3.5;
  kd47 = 2.9;
  k48 = 2.38e-5;
  kd48 = 0.8;
  kd49 = 0.0568;
  k50 = 4.5e-7;
  kd50 = 0.5;
  k52 = 8.91e-5;
  kd52 = 0.033;
  kd53 = 16;
  kd55 = 5.7;
  k56 = 2.35e-5;
  kd56 = 0.6;
  kd57 = 0.246;
  k58 = 8.33e-6;
  kd58 = 0.5;
  k60 = 0.0055;
  k61 = 0.00067;
  kd63 = 0.275;
  k126 = 1.66e-7;
  kd126 = 2;
  k127 = 0;
  kd127 = 0.0001;

  // Reactions:
  v1: EGFR -> EGF_EGFR; Compartment*function_for_v1_1(EGF, EGFR, EGF_EGFR, k1, kd1);  // modifiers: EGF; isVersionOf GO:0005515
  v2: 2 EGF_EGFR -> _EGF_EGFR_2; Compartment*(k2*EGF_EGFR^2 - kd2*_EGF_EGFR_2);  // isVersionOf GO:0046983
  v3: _EGF_EGFR_2 -> _EGF_EGFR__2; Compartment*(k3*_EGF_EGFR_2 - kd3*_EGF_EGFR__2);
  v4: _EGF_EGFR__2_GAP_Grb2 + Prot -> _EGF_EGFR__2_GAP_Grb2_Prot; Compartment*(k4*_EGF_EGFR__2_GAP_Grb2*Prot - kd4*_EGF_EGFR__2_GAP_Grb2_Prot);  // isVersionOf GO:0006897
  v5: _EGF_EGFR__2_GAP_Grb2_Prot => _EGF_EGFRi__2_GAP_Grb2 + Proti; Compartment*kd5*_EGF_EGFR__2_GAP_Grb2_Prot;  // isVersionOf GO:0006897
  v6: EGFR -> EGFRi; Compartment*(k6*EGFR - kd6*EGFRi);  // isVersionOf GO:0006897
  v7: _EGF_EGFR__2 -> _EGF_EGFRi__2; Compartment*(k6*_EGF_EGFR__2 - kd6*_EGF_EGFRi__2);  // isVersionOf GO:0006897
  v8: _EGF_EGFR__2 + GAP -> _EGF_EGFR__2_GAP; Compartment*(k8*_EGF_EGFR__2*GAP - kd8*_EGF_EGFR__2_GAP);  // isVersionOf GO:0043087
  v9: _EGF_EGFR__2_GAP_Grb2 => _EGF_EGFRi__2_GAP_Grb2; Compartment*k6*_EGF_EGFR__2_GAP_Grb2;  // isVersionOf GO:0043087
  v10: EGFRi + EGFi -> EGF_EGFRi; Compartment*(k10b*EGFRi*EGFi - kd10*EGF_EGFRi);  // isVersionOf GO:0005515
  v11: 2 EGF_EGFRi -> _EGF_EGFRi_2; Compartment*(k2*EGF_EGFRi^2 - kd2*_EGF_EGFRi_2);  // isVersionOf GO:0046983
  v12: _EGF_EGFRi_2 -> _EGF_EGFRi__2; Compartment*(k3*_EGF_EGFRi_2 - kd3*_EGF_EGFRi__2);
  v13: => EGFR; Compartment*Constant_flux__irreversible_0(k13);  // isVersionOf GO:0045727
  v14: _EGF_EGFRi__2 + GAP -> _EGF_EGFRi__2_GAP; Compartment*(k8*_EGF_EGFRi__2*GAP - kd8*_EGF_EGFRi__2_GAP);  // isVersionOf GO:0043087
  v15: Proti => Prot; Compartment*k15*Proti;  // isVersionOf GO:0006897
  v16: Grb2 + _EGF_EGFR__2_GAP -> _EGF_EGFR__2_GAP_Grb2; Compartment*(k16*Grb2*_EGF_EGFR__2_GAP - kd63*_EGF_EGFR__2_GAP_Grb2);  // isVersionOf GO:0045184
  v17: Sos + _EGF_EGFR__2_GAP_Grb2 -> _EGF_EGFR__2_GAP_Grb2_Sos; Compartment*(k17*Sos*_EGF_EGFR__2_GAP_Grb2 - kd17*_EGF_EGFR__2_GAP_Grb2_Sos);  // isVersionOf GO:0045184
  v18: Ras_GDP + _EGF_EGFR__2_GAP_Grb2_Sos -> _EGF_EGFR__2_GAP_Grb2_Sos_Ras_GDP; Compartment*(k18*Ras_GDP*_EGF_EGFR__2_GAP_Grb2_Sos - kd18*_EGF_EGFR__2_GAP_Grb2_Sos_Ras_GDP);  // isVersionOf GO:0090630
  v19: Ras_GTP + _EGF_EGFR__2_GAP_Grb2_Sos -> _EGF_EGFR__2_GAP_Grb2_Sos_Ras_GDP; Compartment*(k19*Ras_GTP*_EGF_EGFR__2_GAP_Grb2_Sos - kd19*_EGF_EGFR__2_GAP_Grb2_Sos_Ras_GDP);  // isVersionOf GO:0090630
  v20: _EGF_EGFR__2_GAP_Grb2_Sos + Ras_GTP_ -> _EGF_EGFR__2_GAP_Grb2_Sos_Ras_GTP; Compartment*(k20*_EGF_EGFR__2_GAP_Grb2_Sos*Ras_GTP_ - kd20*_EGF_EGFR__2_GAP_Grb2_Sos_Ras_GTP);  // isVersionOf GO:0043087
  v21: _EGF_EGFR__2_GAP_Grb2_Sos + Ras_GDP -> _EGF_EGFR__2_GAP_Grb2_Sos_Ras_GTP; Compartment*(k21*_EGF_EGFR__2_GAP_Grb2_Sos*Ras_GDP - kd21*_EGF_EGFR__2_GAP_Grb2_Sos_Ras_GTP);  // isVersionOf GO:0043087
  v22: Shc + _EGF_EGFR__2_GAP -> _EGF_EGFR__2_GAP_SHC; Compartment*(k22*Shc*_EGF_EGFR__2_GAP - kd22*_EGF_EGFR__2_GAP_SHC);  // isVersionOf GO:0045184
  v23: _EGF_EGFR__2_GAP_SHC -> _EGF_EGFR__2_GAP_SHC_0; Compartment*(k23*_EGF_EGFR__2_GAP_SHC - kd23*_EGF_EGFR__2_GAP_SHC_0);  // isVersionOf GO:0045184
  v24: Grb2 + _EGF_EGFR__2_GAP_SHC_0 -> _EGF_EGFR__2_GAP_SHC__Grb2; Compartment*(k16*Grb2*_EGF_EGFR__2_GAP_SHC_0 - kd24*_EGF_EGFR__2_GAP_SHC__Grb2);  // isVersionOf GO:0045184
  v25: Sos + _EGF_EGFR__2_GAP_SHC__Grb2 -> _EGF_EGFR__2_GAP_SHC__Grb2_Sos; Compartment*(k25*Sos*_EGF_EGFR__2_GAP_SHC__Grb2 - kd25*_EGF_EGFR__2_GAP_SHC__Grb2_Sos);  // isVersionOf GO:0045184
  v26: Ras_GDP + _EGF_EGFR__2_GAP_SHC__Grb2_Sos -> _EGF_EGFR__2_GAP_SHC__Grb2_Sos_Ras_GDP; Compartment*(k18*Ras_GDP*_EGF_EGFR__2_GAP_SHC__Grb2_Sos - kd18*_EGF_EGFR__2_GAP_SHC__Grb2_Sos_Ras_GDP);  // isVersionOf GO:0090630
  v27: _EGF_EGFR__2_GAP_SHC__Grb2_Sos + Ras_GTP -> _EGF_EGFR__2_GAP_SHC__Grb2_Sos_Ras_GDP; Compartment*(k19*_EGF_EGFR__2_GAP_SHC__Grb2_Sos*Ras_GTP - kd19*_EGF_EGFR__2_GAP_SHC__Grb2_Sos_Ras_GDP);  // isVersionOf GO:0090630
  v28: Ras_GTP + Raf -> Raf_Ras_GTP; Compartment*(k28*Ras_GTP*Raf - kd28*Raf_Ras_GTP);  // isVersionOf GO:0000185
  v29: Ras_GTP_ + Raf_0 -> Raf_Ras_GTP; Compartment*(k29*Ras_GTP_*Raf_0 - kd29*Raf_Ras_GTP);  // isVersionOf GO:0000185
  v30: _EGF_EGFR__2_GAP_SHC__Grb2_Sos + Ras_GTP_ -> _EGF_EGFR__2_GAP_SHC__Grb2_Sos_Ras_GTP; Compartment*(k20*_EGF_EGFR__2_GAP_SHC__Grb2_Sos*Ras_GTP_ - kd20*_EGF_EGFR__2_GAP_SHC__Grb2_Sos_Ras_GTP);  // isVersionOf GO:0043087
  v31: _EGF_EGFR__2_GAP_SHC__Grb2_Sos + Ras_GDP -> _EGF_EGFR__2_GAP_SHC__Grb2_Sos_Ras_GTP; Compartment*(k21*_EGF_EGFR__2_GAP_SHC__Grb2_Sos*Ras_GDP - kd21*_EGF_EGFR__2_GAP_SHC__Grb2_Sos_Ras_GTP);  // isVersionOf GO:0043087
  v32: Shc__Grb2_Sos + _EGF_EGFR__2_GAP -> _EGF_EGFR__2_GAP_SHC__Grb2_Sos; Compartment*(k32*Shc__Grb2_Sos*_EGF_EGFR__2_GAP - kd32*_EGF_EGFR__2_GAP_SHC__Grb2_Sos);  // isVersionOf GO:0045184
  v33: Shc_0 + Grb2_Sos -> Shc__Grb2_Sos; Compartment*(k33*Shc_0*Grb2_Sos - kd33*Shc__Grb2_Sos);
  v34: _EGF_EGFR__2_GAP + Grb2_Sos -> _EGF_EGFR__2_GAP_Grb2_Sos; Compartment*(k34*_EGF_EGFR__2_GAP*Grb2_Sos - kd34*_EGF_EGFR__2_GAP_Grb2_Sos);  // isVersionOf GO:0045184
  v35: Sos + Grb2 -> Grb2_Sos; Compartment*(k35*Sos*Grb2 - kd35*Grb2_Sos);  // isVersionOf GO:0045184
  v36: Shc_0 -> Shc; Compartment*(k36*Shc_0 - kd36*Shc);  // isVersionOf GO:0045184
  v37: _EGF_EGFR__2_GAP + Shc_0 -> _EGF_EGFR__2_GAP_SHC_0; Compartment*(k37*_EGF_EGFR__2_GAP*Shc_0 - kd37*_EGF_EGFR__2_GAP_SHC_0);  // isVersionOf GO:0045184
  v38: Grb2 + Shc_0 -> Shc__Grb2; Compartment*(k16*Grb2*Shc_0 - kd24*Shc__Grb2);  // isVersionOf GO:0045184
  v39: _EGF_EGFR__2_GAP + Shc__Grb2 -> _EGF_EGFR__2_GAP_SHC__Grb2; Compartment*(k37*_EGF_EGFR__2_GAP*Shc__Grb2 - kd37*_EGF_EGFR__2_GAP_SHC__Grb2);  // isVersionOf GO:0045184
  v40: Sos + Shc__Grb2 -> Shc__Grb2_Sos; Compartment*(k40*Sos*Shc__Grb2 - kd40*Shc__Grb2_Sos);  // isVersionOf GO:0045184
  v41: Grb2_Sos + _EGF_EGFR__2_GAP_SHC_0 -> _EGF_EGFR__2_GAP_SHC__Grb2_Sos; Compartment*(k41*Grb2_Sos*_EGF_EGFR__2_GAP_SHC_0 - kd41*_EGF_EGFR__2_GAP_SHC__Grb2_Sos);  // isVersionOf GO:0045184
  v42: Phosphatase1 + Raf_0 -> Raf__phosphatase1; Compartment*(k42*Phosphatase1*Raf_0 - kd42*Raf__phosphatase1);  // isVersionOf GO:0016311
  v43: Raf__phosphatase1 => Raf + Phosphatase1; Compartment*kd43*Raf__phosphatase1;  // isVersionOf GO:0016311
  v44: MEK + Raf_0 -> MEK_Raf; Compartment*(k44*MEK*Raf_0 - kd52*MEK_Raf);  // isVersionOf GO:0016310
  v45: MEK_Raf => MEK_P + Raf_0; Compartment*kd45*MEK_Raf;  // isVersionOf GO:0016310
  v46: MEK_P + Raf_0 -> MEK_P_Raf; Compartment*(k44*MEK_P*Raf_0 - kd52*MEK_P_Raf);  // isVersionOf GO:0016310
  v47: MEK_P_Raf => MEK_PP + Raf_0; Compartment*kd47*MEK_P_Raf;  // isVersionOf GO:0016310
  v48: MEK_PP + phosphatse2 -> MEK_PP_phosphatase2; Compartment*(k48*MEK_PP*phosphatse2 - kd48*MEK_PP_phosphatase2);  // isVersionOf GO:0016311
  v49: MEK_PP_phosphatase2 => MEK_P + phosphatse2; Compartment*kd49*MEK_PP_phosphatase2;  // isVersionOf GO:0016311
  v50: phosphatse2 + MEK_P -> MEK_P_phosphatase2; Compartment*(k50*phosphatse2*MEK_P - kd50*MEK_P_phosphatase2);  // isVersionOf GO:0016311
  v51: MEK_P_phosphatase2 => MEK + phosphatse2; Compartment*kd49*MEK_P_phosphatase2;  // isVersionOf GO:0016311
  v52: ERK + MEK_PP -> ERK_MEK_PP; Compartment*(k52*ERK*MEK_PP - kd44*ERK_MEK_PP);  // isVersionOf GO:0016310
  v53: ERK_MEK_PP => MEK_PP + ERK_P; Compartment*kd53*ERK_MEK_PP;  // ec-code:2.7.12.2; isVersionOf GO:0004708; isVersionOf GO:0000187
  v54: MEK_PP + ERK_P -> ERK_P_MEKPP; Compartment*(k52*MEK_PP*ERK_P - kd44*ERK_P_MEKPP);  // isVersionOf GO:0016310
  v55: ERK_P_MEKPP => ERK_PP + MEK_PP; Compartment*kd55*ERK_P_MEKPP;  // ec-code:2.7.12.2; isVersionOf GO:0000187; isVersionOf GO:0004708
  v56: ERK_PP + phosphatase3 -> ERK_PP_phosphatase3; Compartment*(k56*ERK_PP*phosphatase3 - kd56*ERK_PP_phosphatase3);  // isVersionOf GO:0016311
  v57: ERK_PP_phosphatase3 => ERK_P + phosphatase3; Compartment*kd57*ERK_PP_phosphatase3;  // isVersionOf GO:0016311
  v58: phosphatase3 + ERK_P -> ERK_P_phosphatase3; Compartment*(k58*phosphatase3*ERK_P - kd58*ERK_P_phosphatase3);  // isVersionOf GO:0016311
  v59: ERK_P_phosphatase3 => ERK + phosphatase3; Compartment*kd57*ERK_P_phosphatase3;  // isVersionOf GO:0016311
  v60: EGFRi => EGFRidag; Compartment*k60*EGFRi;  // isVersionOf GO:0030163
  v61: EGFi => EGFideg; Compartment*k61*EGFi;  // isVersionOf GO:0030163
  v62: _EGF_EGFRi__2 => _EGF_EGFRi___2deg; Compartment*k60*_EGF_EGFRi__2;  // isVersionOf GO:0030163
  v63: _EGF_EGFRi__2_GAP + Grb2 -> _EGF_EGFRi__2_GAP_Grb2; Compartment*(k16*_EGF_EGFRi__2_GAP*Grb2 - kd63*_EGF_EGFRi__2_GAP_Grb2);  // isVersionOf GO:0045184
  v64: Sos + _EGF_EGFRi__2_GAP_Grb2 -> _EGF_EGFRi__2_GAP_Grb2_Sos; Compartment*(k17*Sos*_EGF_EGFRi__2_GAP_Grb2 - kd17*_EGF_EGFRi__2_GAP_Grb2_Sos);  // isVersionOf GO:0045184
  v65: Ras_GDP + _EGF_EGFRi__2_GAP_Grb2_Sos -> _EGF_EGFRi__2_GAP_Grb2_Sos_Ras_GDP; Compartment*(k18*Ras_GDP*_EGF_EGFRi__2_GAP_Grb2_Sos - kd18*_EGF_EGFRi__2_GAP_Grb2_Sos_Ras_GDP);  // isVersionOf GO:0090630
  v66: Ras_GTPi + _EGF_EGFRi__2_GAP_Grb2_Sos -> _EGF_EGFRi__2_GAP_Grb2_Sos_Ras_GDP; Compartment*(k19*Ras_GTPi*_EGF_EGFRi__2_GAP_Grb2_Sos - kd19*_EGF_EGFRi__2_GAP_Grb2_Sos_Ras_GDP);  // isVersionOf GO:0090630
  v67: Ras_GTPi_0 + _EGF_EGFRi__2_GAP_Grb2_Sos -> _EGF_EGFRi__2_GAP_Grb2_Sos_Ras_GTP; Compartment*(k20*Ras_GTPi_0*_EGF_EGFRi__2_GAP_Grb2_Sos - kd20*_EGF_EGFRi__2_GAP_Grb2_Sos_Ras_GTP);  // isVersionOf GO:0043087
  v68: _EGF_EGFRi__2_GAP_Grb2_Sos + Ras_GDP -> _EGF_EGFRi__2_GAP_Grb2_Sos_Ras_GTP; Compartment*(k21*_EGF_EGFRi__2_GAP_Grb2_Sos*Ras_GDP - kd21*_EGF_EGFRi__2_GAP_Grb2_Sos_Ras_GTP);  // isVersionOf GO:0043087
  v69: Shc + _EGF_EGFRi__2_GAP -> _EGF_EGFRi__2_GAP_SHC; Compartment*(k22*Shc*_EGF_EGFRi__2_GAP - kd22*_EGF_EGFRi__2_GAP_SHC);  // isVersionOf GO:0045184
  v70: _EGF_EGFRi__2_GAP_SHC -> _EGF_EGFRi__2_GAP_SHC_0; Compartment*(k23*_EGF_EGFRi__2_GAP_SHC - kd23*_EGF_EGFRi__2_GAP_SHC_0);  // isVersionOf GO:0045184
  v71: Grb2 + _EGF_EGFRi__2_GAP_SHC_0 -> _EGF_EGFRi__2_GAP_SHC__Grb2; Compartment*(k16*Grb2*_EGF_EGFRi__2_GAP_SHC_0 - kd24*_EGF_EGFRi__2_GAP_SHC__Grb2);  // isVersionOf GO:0045184
  v72: Sos + _EGF_EGFRi__2_GAP_SHC__Grb2 -> _EGF_EGFRi__2_GAP_SHC__Grb2_Sos; Compartment*(k25*Sos*_EGF_EGFRi__2_GAP_SHC__Grb2 - kd25*_EGF_EGFRi__2_GAP_SHC__Grb2_Sos);  // isVersionOf GO:0045184
  v73: Ras_GDP + _EGF_EGFRi__2_GAP_SHC__Grb2_Sos -> _EGF_EGFRi__2_GAP_SHC__Grb2_Sos_Ras_GDP; Compartment*(k18*Ras_GDP*_EGF_EGFRi__2_GAP_SHC__Grb2_Sos - kd18*_EGF_EGFRi__2_GAP_SHC__Grb2_Sos_Ras_GDP);  // isVersionOf GO:0090630
  v74: _EGF_EGFRi__2_GAP_SHC__Grb2_Sos + Ras_GTPi -> _EGF_EGFRi__2_GAP_SHC__Grb2_Sos_Ras_GDP; Compartment*(k19*_EGF_EGFRi__2_GAP_SHC__Grb2_Sos*Ras_GTPi - kd19*_EGF_EGFRi__2_GAP_SHC__Grb2_Sos_Ras_GDP);  // isVersionOf GO:0090630
  v75: Ras_GTPi + Raf -> Raf_Ras_GTPi; Compartment*(k28*Ras_GTPi*Raf - kd28*Raf_Ras_GTPi);  // isVersionOf GO:0000185
  v76: Ras_GTPi_0 + Rafi -> Raf_Ras_GTPi; Compartment*(k29*Ras_GTPi_0*Rafi - kd29*Raf_Ras_GTPi);  // isVersionOf GO:0000185
  v77: Ras_GTPi_0 + _EGF_EGFRi__2_GAP_SHC__Grb2_Sos -> _EGF_EGFRi__2_GAP_SHC__Grb2_Sos_Ras_GTP; Compartment*(k20*Ras_GTPi_0*_EGF_EGFRi__2_GAP_SHC__Grb2_Sos - kd20*_EGF_EGFRi__2_GAP_SHC__Grb2_Sos_Ras_GTP);  // isVersionOf GO:0043087
  v78: _EGF_EGFRi__2_GAP_SHC__Grb2_Sos + Ras_GDP -> _EGF_EGFRi__2_GAP_SHC__Grb2_Sos_Ras_GTP; Compartment*(k21*_EGF_EGFRi__2_GAP_SHC__Grb2_Sos*Ras_GDP - kd21*_EGF_EGFRi__2_GAP_SHC__Grb2_Sos_Ras_GTP);  // isVersionOf GO:0043087
  v79: _EGF_EGFRi__2_GAP + Shc__Grb2_Sos -> _EGF_EGFRi__2_GAP_SHC__Grb2_Sos; Compartment*(k32*_EGF_EGFRi__2_GAP*Shc__Grb2_Sos - kd32*_EGF_EGFRi__2_GAP_SHC__Grb2_Sos);  // isVersionOf GO:0045184
  v80: _EGF_EGFRi__2_GAP + Grb2_Sos -> _EGF_EGFRi__2_GAP_Grb2_Sos; Compartment*(k34*_EGF_EGFRi__2_GAP*Grb2_Sos - kd34*_EGF_EGFRi__2_GAP_Grb2_Sos);  // isVersionOf GO:0045184
  v81: _EGF_EGFRi__2_GAP + Shc_0 -> _EGF_EGFRi__2_GAP_SHC_0; Compartment*(k37*_EGF_EGFRi__2_GAP*Shc_0 - kd37*_EGF_EGFRi__2_GAP_SHC_0);  // isVersionOf GO:0045184
  v82: _EGF_EGFRi__2_GAP + Shc__Grb2 -> _EGF_EGFRi__2_GAP_SHC__Grb2; Compartment*(k37*_EGF_EGFRi__2_GAP*Shc__Grb2 - kd37*_EGF_EGFRi__2_GAP_SHC__Grb2);  // isVersionOf GO:0045184
  v83: Grb2_Sos + _EGF_EGFRi__2_GAP_SHC_0 -> _EGF_EGFRi__2_GAP_SHC__Grb2_Sos; Compartment*(k41*Grb2_Sos*_EGF_EGFRi__2_GAP_SHC_0 - kd41*_EGF_EGFRi__2_GAP_SHC__Grb2_Sos);  // isVersionOf GO:0045184
  v84: Phosphatase1 + Rafi -> Rafi__phosphatase1; Compartment*(k42*Phosphatase1*Rafi - kd42*Rafi__phosphatase1);  // isVersionOf GO:0016311
  v85: Rafi__phosphatase1 => Raf + Phosphatase1; Compartment*kd43*Rafi__phosphatase1;  // isVersionOf GO:0016311
  v86: MEK + Rafi -> MEK_Rafi; Compartment*(k44*MEK*Rafi - kd52*MEK_Rafi);  // isVersionOf GO:0016310
  v87: MEK_Rafi => MEKi_P + Rafi; Compartment*kd45*MEK_Rafi;  // ec-code:2.7.11.1; isVersionOf GO:0004709; isVersionOf GO:0000186
  v88: Rafi + MEKi_P -> MEK_P_Rafi; Compartment*(k44*Rafi*MEKi_P - kd52*MEK_P_Rafi);  // isVersionOf GO:0016310
  v89: MEK_P_Rafi => Rafi + MEKi_PP; Compartment*kd47*MEK_P_Rafi;  // isVersionOf GO:0016310
  v90: MEKi_PP + phosphatse2 -> MEKi_PP_phosphatase2; Compartment*(k48*MEKi_PP*phosphatse2 - kd48*MEKi_PP_phosphatase2);  // isVersionOf GO:0016311
  v91: MEKi_PP_phosphatase2 => MEKi_P + phosphatse2; Compartment*kd49*MEKi_PP_phosphatase2;  // isVersionOf GO:0016311
  v92: phosphatse2 + MEKi_P -> MEKi_P_phosphatase2; Compartment*(k50*phosphatse2*MEKi_P - kd50*MEKi_P_phosphatase2);  // isVersionOf GO:0016311
  v93: MEKi_P_phosphatase2 => MEK + phosphatse2; Compartment*kd49*MEKi_P_phosphatase2;  // isVersionOf GO:0016311
  v94: ERK + MEKi_PP -> ERKi_MEKi_PP_0; Compartment*(k52*ERK*MEKi_PP - kd44*ERKi_MEKi_PP_0);  // isVersionOf GO:0016310
  v95: ERKi_MEKi_PP_0 => ERKi_P + MEKi_PP; Compartment*kd53*ERKi_MEKi_PP_0;  // isVersionOf GO:0016310
  v96: MEKi_PP + ERKi_P -> ERKi_P_MEKi_PP; Compartment*(k52*MEKi_PP*ERKi_P - kd44*ERKi_P_MEKi_PP);  // isVersionOf GO:0016310
  v97: ERKi_P_MEKi_PP => ERKi_PP + MEKi_PP; Compartment*kd55*ERKi_P_MEKi_PP;  // isVersionOf GO:0016310
  v98: ERKi_PP + phosphatase3 -> ERKi_PP_phosphatase3; Compartment*(k56*ERKi_PP*phosphatase3 - kd56*ERKi_PP_phosphatase3);  // isVersionOf GO:0016311
  v99: ERKi_PP_phosphatase3 => ERKi_P + phosphatase3; Compartment*kd57*ERKi_PP_phosphatase3;  // isVersionOf GO:0016311
  v100: phosphatase3 + ERKi_P -> ERKi_P_phosphatase3; Compartment*(k58*phosphatase3*ERKi_P - kd58*ERKi_P_phosphatase3);  // isVersionOf GO:0016311
  v101: ERKi_P_phosphatase3 => ERK + phosphatase3; Compartment*kd57*ERKi_P_phosphatase3;  // isVersionOf GO:0016311
  v102: _EGF_EGFR__2_GAP => _EGF_EGFRi__2_GAP; Compartment*k6*_EGF_EGFR__2_GAP;  // isVersionOf GO:0006897
  v103: _EGF_EGFR__2_GAP_SHC => _EGF_EGFRi__2_GAP_SHC; Compartment*k6*_EGF_EGFR__2_GAP_SHC;  // isVersionOf GO:0006897
  v104: _EGF_EGFR__2_GAP_SHC_0 => _EGF_EGFRi__2_GAP_SHC_0; Compartment*k6*_EGF_EGFR__2_GAP_SHC_0;  // isVersionOf GO:0006897
  v105: _EGF_EGFR__2_GAP_Grb2_Sos => _EGF_EGFRi__2_GAP_Grb2_Sos; Compartment*k6*_EGF_EGFR__2_GAP_Grb2_Sos;  // isVersionOf GO:0006897
  v106: _EGF_EGFR__2_GAP_Grb2_Sos + Prot -> _EGF_EGFR__2_GAP_Grb2_Sos_Prot; Compartment*(k4*_EGF_EGFR__2_GAP_Grb2_Sos*Prot - kd4*_EGF_EGFR__2_GAP_Grb2_Sos_Prot);  // isVersionOf GO:0006897
  v107: _EGF_EGFR__2_GAP_Grb2_Sos_Prot => Proti + _EGF_EGFRi__2_GAP_Grb2_Sos; Compartment*kd5*_EGF_EGFR__2_GAP_Grb2_Sos_Prot;  // isVersionOf GO:0006897
  v108: _EGF_EGFR__2_GAP_Grb2_Sos_Ras_GDP => _EGF_EGFRi__2_GAP_Grb2_Sos_Ras_GDP; Compartment*k6*_EGF_EGFR__2_GAP_Grb2_Sos_Ras_GDP;  // isVersionOf GO:0006897
  v109: _EGF_EGFR__2_GAP_Grb2_Sos_Ras_GDP + Prot -> _EGF_EGFR__2_GAP_Grb2_Sos_Ras_GDP_Prot; Compartment*(k4*_EGF_EGFR__2_GAP_Grb2_Sos_Ras_GDP*Prot - kd4*_EGF_EGFR__2_GAP_Grb2_Sos_Ras_GDP_Prot);  // isVersionOf GO:0006897
  v110: _EGF_EGFR__2_GAP_Grb2_Sos_Ras_GDP_Prot => Proti + _EGF_EGFRi__2_GAP_Grb2_Sos_Ras_GDP; Compartment*kd5*_EGF_EGFR__2_GAP_Grb2_Sos_Ras_GDP_Prot;  // isVersionOf GO:0006897
  v111: _EGF_EGFR__2_GAP_Grb2_Sos_Ras_GTP => _EGF_EGFRi__2_GAP_Grb2_Sos_Ras_GTP; Compartment*k6*_EGF_EGFR__2_GAP_Grb2_Sos_Ras_GTP;  // isVersionOf GO:0006897
  v112: _EGF_EGFR__2_GAP_Grb2_Sos_Ras_GTP + Prot -> _EGF_EGFR__2_GAP_Grb2_Sos_Ras_GTP_Prot; Compartment*(k4*_EGF_EGFR__2_GAP_Grb2_Sos_Ras_GTP*Prot - kd4*_EGF_EGFR__2_GAP_Grb2_Sos_Ras_GTP_Prot);  // isVersionOf GO:0006897
  v113: _EGF_EGFR__2_GAP_Grb2_Sos_Ras_GTP_Prot => Proti + _EGF_EGFRi__2_GAP_Grb2_Sos_Ras_GTP; Compartment*kd5*_EGF_EGFR__2_GAP_Grb2_Sos_Ras_GTP_Prot;  // isVersionOf GO:0006897
  v114: _EGF_EGFR__2_GAP_SHC__Grb2 => _EGF_EGFRi__2_GAP_SHC__Grb2; Compartment*k6*_EGF_EGFR__2_GAP_SHC__Grb2;  // isVersionOf GO:0006897
  v115: _EGF_EGFR__2_GAP_SHC__Grb2 + Prot -> _EGF_EGFR__2_GAP_SHC__Grb2_Prot_0; Compartment*(k4*_EGF_EGFR__2_GAP_SHC__Grb2*Prot - kd4*_EGF_EGFR__2_GAP_SHC__Grb2_Prot_0);  // isVersionOf GO:0006897
  v116: _EGF_EGFR__2_GAP_SHC__Grb2_Prot_0 => Proti + _EGF_EGFRi__2_GAP_SHC__Grb2; Compartment*kd5*_EGF_EGFR__2_GAP_SHC__Grb2_Prot_0;  // isVersionOf GO:0006897
  v117: _EGF_EGFR__2_GAP_SHC__Grb2_Sos => _EGF_EGFRi__2_GAP_SHC__Grb2_Sos; Compartment*k6*_EGF_EGFR__2_GAP_SHC__Grb2_Sos;  // isVersionOf GO:0006897
  v118: _EGF_EGFR__2_GAP_SHC__Grb2_Sos + Prot -> _EGF_EGFR__2_GAP_SHC__Grb2_Sos_Prot_0; Compartment*(k4*_EGF_EGFR__2_GAP_SHC__Grb2_Sos*Prot - kd4*_EGF_EGFR__2_GAP_SHC__Grb2_Sos_Prot_0);  // isVersionOf GO:0006897
  v119: _EGF_EGFR__2_GAP_SHC__Grb2_Sos_Prot_0 => Proti + _EGF_EGFRi__2_GAP_SHC__Grb2_Sos; Compartment*kd5*_EGF_EGFR__2_GAP_SHC__Grb2_Sos_Prot_0;  // isVersionOf GO:0006897
  v120: _EGF_EGFR__2_GAP_SHC__Grb2_Sos_Ras_GDP => _EGF_EGFRi__2_GAP_SHC__Grb2_Sos_Ras_GDP; Compartment*k6*_EGF_EGFR__2_GAP_SHC__Grb2_Sos_Ras_GDP;  // isVersionOf GO:0006897
  v121: _EGF_EGFR__2_GAP_SHC__Grb2_Sos_Ras_GDP + Prot -> _EGF_EGFR__2_GAP_SHC__Grb2_Sos_Ras_GDP_Prot_0; Compartment*(k4*_EGF_EGFR__2_GAP_SHC__Grb2_Sos_Ras_GDP*Prot - kd4*_EGF_EGFR__2_GAP_SHC__Grb2_Sos_Ras_GDP_Prot_0);  // isVersionOf GO:0006897
  v122: _EGF_EGFR__2_GAP_SHC__Grb2_Sos_Ras_GDP_Prot_0 => Proti + _EGF_EGFRi__2_GAP_SHC__Grb2_Sos_Ras_GDP; Compartment*kd5*_EGF_EGFR__2_GAP_SHC__Grb2_Sos_Ras_GDP_Prot_0;  // isVersionOf GO:0006897
  v123: _EGF_EGFR__2_GAP_SHC__Grb2_Sos_Ras_GTP => _EGF_EGFRi__2_GAP_SHC__Grb2_Sos_Ras_GTP; Compartment*k6*_EGF_EGFR__2_GAP_SHC__Grb2_Sos_Ras_GTP;  // isVersionOf GO:0006897
  v124: _EGF_EGFR__2_GAP_SHC__Grb2_Sos_Ras_GTP + Prot -> _EGF_EGFR__2_GAP_SHC__Grb2_Sos_Ras_GTP_Prot_0; Compartment*(k4*_EGF_EGFR__2_GAP_SHC__Grb2_Sos_Ras_GTP*Prot - kd4*_EGF_EGFR__2_GAP_SHC__Grb2_Sos_Ras_GTP_Prot_0);  // isVersionOf GO:0006897
  v125: _EGF_EGFR__2_GAP_SHC__Grb2_Sos_Ras_GTP_Prot_0 => _EGF_EGFRi__2_GAP_SHC__Grb2_Sos_Ras_GTP + Proti; Compartment*kd5*_EGF_EGFR__2_GAP_SHC__Grb2_Sos_Ras_GTP_Prot_0;  // isVersionOf GO:0006897
  v126: ERK_PP + _EGF_EGFR__2_GAP_Grb2_Sos -> _EGF_EGFR__2_GAP_Grb2_Sos_ERK_PP; Compartment*(k126*ERK_PP*_EGF_EGFR__2_GAP_Grb2_Sos - kd126*_EGF_EGFR__2_GAP_Grb2_Sos_ERK_PP);  // isVersionOf GO:0005515
  v127: ERKi_PP + _EGF_EGFRi__2_GAP_Grb2_Sos -> _EGF_EGFRi__2_GAP_Grb2_Sos_ERKi_PP; Compartment*(k126*ERKi_PP*_EGF_EGFRi__2_GAP_Grb2_Sos - kd126*_EGF_EGFRi__2_GAP_Grb2_Sos_ERKi_PP);  // isVersionOf GO:0005515
  v128: ERK_PP + _EGF_EGFR__2_GAP_SHC__Grb2_Sos -> _EGF_EGFR__2_GAP_SHC__Grb2_Sos_ERK_PP; Compartment*(k126*ERK_PP*_EGF_EGFR__2_GAP_SHC__Grb2_Sos - kd126*_EGF_EGFR__2_GAP_SHC__Grb2_Sos_ERK_PP);  // isVersionOf GO:0005515
  v129: ERKi_PP + _EGF_EGFRi__2_GAP_SHC__Grb2_Sos -> _EGF_EGFRi__2_GAP_SHC__Grb2_Sos_ERKi_PP; Compartment*(k126*ERKi_PP*_EGF_EGFRi__2_GAP_SHC__Grb2_Sos - kd126*_EGF_EGFRi__2_GAP_SHC__Grb2_Sos_ERKi_PP);  // isVersionOf GO:0005515
  v130: ERK_PP + Sos -> Sos_ERK_PP; Compartment*(k126*ERK_PP*Sos - kd126*Sos_ERK_PP);  // isVersionOf GO:0005515
  v131: ERKi_PP + Sos -> Sos_ERKi_PP; Compartment*(k126*ERKi_PP*Sos - kd126*Sos_ERKi_PP);  // isVersionOf GO:0005515
  v132: _EGF_EGFRi__2_GAP => _EGF_EGFRi___2deg; Compartment*k60*_EGF_EGFRi__2_GAP;  // isVersionOf GO:0030163
  v133: _EGF_EGFRi__2_GAP_Grb2 => _EGF_EGFRi___2deg; Compartment*k60*_EGF_EGFRi__2_GAP_Grb2;  // isVersionOf GO:0030163
  v134: _EGF_EGFRi__2_GAP_Grb2_Sos => _EGF_EGFRi___2deg; Compartment*k60*_EGF_EGFRi__2_GAP_Grb2_Sos;  // isVersionOf GO:0030163
  v135: _EGF_EGFRi__2_GAP_Grb2_Sos_Ras_GDP => _EGF_EGFRi___2deg; Compartment*k60*_EGF_EGFRi__2_GAP_Grb2_Sos_Ras_GDP;  // isVersionOf GO:0030163
  v136: _EGF_EGFRi__2_GAP_Grb2_Sos_Ras_GTP => _EGF_EGFRi___2deg; Compartment*k60*_EGF_EGFRi__2_GAP_Grb2_Sos_Ras_GTP;  // isVersionOf GO:0030163
  v137: _EGF_EGFRi__2_GAP_SHC => _EGF_EGFRi___2deg; Compartment*k60*_EGF_EGFRi__2_GAP_SHC;  // isVersionOf GO:0030163
  v138: _EGF_EGFRi__2_GAP_SHC_0 => _EGF_EGFRi___2deg; Compartment*k60*_EGF_EGFRi__2_GAP_SHC_0;  // isVersionOf GO:0030163
  v139: _EGF_EGFRi__2_GAP_SHC__Grb2 => _EGF_EGFRi___2deg; Compartment*k60*_EGF_EGFRi__2_GAP_SHC__Grb2;  // isVersionOf GO:0030163
  v140: _EGF_EGFRi__2_GAP_SHC__Grb2_Sos => _EGF_EGFRi___2deg; Compartment*k60*_EGF_EGFRi__2_GAP_SHC__Grb2_Sos;  // isVersionOf GO:0030163
  v141: _EGF_EGFRi__2_GAP_SHC__Grb2_Sos_Ras_GDP => _EGF_EGFRi___2deg; Compartment*k60*_EGF_EGFRi__2_GAP_SHC__Grb2_Sos_Ras_GDP;  // isVersionOf GO:0030163
  v142: _EGF_EGFRi__2_GAP_SHC__Grb2_Sos_Ras_GTP => _EGF_EGFRi___2deg; Compartment*k60*_EGF_EGFRi__2_GAP_SHC__Grb2_Sos_Ras_GTP;  // isVersionOf GO:0030163
  v143: ERK_PP + _EGF_EGFR__2_GAP_Grb2_Sos_deg -> _EGF_EGFR__2_GAP_Grb2_Sos_ERK_PP; Compartment*(k127*ERK_PP*_EGF_EGFR__2_GAP_Grb2_Sos_deg - kd127*_EGF_EGFR__2_GAP_Grb2_Sos_ERK_PP);  // isVersionOf GO:0030163; isVersionOf GO:0043624
  v144: ERK_PP + _EGF_EGFR__2_GAP_Grb2_Sos_deg -> _EGF_EGFR__2_GAP_SHC__Grb2_Sos_ERK_PP; Compartment*(k127*ERK_PP*_EGF_EGFR__2_GAP_Grb2_Sos_deg - kd127*_EGF_EGFR__2_GAP_SHC__Grb2_Sos_ERK_PP);  // isVersionOf GO:0030163; isVersionOf GO:0045727
  v145: ERK_PP + Sosi -> Sos_ERK_PP; Compartment*(k127*ERK_PP*Sosi - kd127*Sos_ERK_PP);  // isVersionOf GO:0043624
  v146: ERKi_PP + _EGF_EGFRi__2_GAP_Grb2_Sos_deg -> _EGF_EGFRi__2_GAP_Grb2_Sos_ERKi_PP; Compartment*(k127*ERKi_PP*_EGF_EGFRi__2_GAP_Grb2_Sos_deg - kd127*_EGF_EGFRi__2_GAP_Grb2_Sos_ERKi_PP);  // isVersionOf GO:0043624; isVersionOf GO:0030163
  v147: ERKi_PP + _EGF_EGFRi__2_GAP_Grb2_Sos_deg -> _EGF_EGFRi__2_GAP_SHC__Grb2_Sos_ERKi_PP; Compartment*(k127*ERKi_PP*_EGF_EGFRi__2_GAP_Grb2_Sos_deg - kd127*_EGF_EGFRi__2_GAP_SHC__Grb2_Sos_ERKi_PP);  // isVersionOf GO:0043624; isVersionOf GO:0030163
  v148: ERKi_PP + Sosi -> Sos_ERKi_PP; Compartment*(k127*ERKi_PP*Sosi - kd127*Sos_ERKi_PP);  // isVersionOf GO:0043624
end
