// SBML level 2 version 4
// dcterms:bibliographicCitation: urn:miriam:pubmed:26252969

model Zhu2015___combined_gemcitabine_and_birinapant_in_pancreatic_cancer_cells___basic_PD_model()
  // Zhu2015 - Combined gemcitabine and birinapant in pancreatic cancer cells - basic PD model
  // Mathematical model to illustrate the effectiveness of combination chemotherapy involving gemcitabine and birinapant against pancreatic cancer.
  // This model is described in the article:
  // Mechanism-based mathematical modeling of combined gemcitabine and birinapant in pancreatic cancer cells.
  // Zhu X, Straubinger RM, Jusko WJ.
  // J Pharmacokinet Pharmacodyn 2015 Oct; 42(5): 477-496
  // Abstract:
  // Combination chemotherapy is standard treatment for pancreatic cancer. However, current drugs lack efficacy for most patients, and selection and evaluation of new combination regimens is empirical and time-consuming. The efficacy of gemcitabine, a standard-of-care agent, combined with birinapant, a pro-apoptotic antagonist of Inhibitor of Apoptosis Proteins (IAPs), was investigated in pancreatic cancer cells. PANC-1 cells were treated with vehicle, gemcitabine (6, 10, 20 nM), birinapant (50, 200, 500 nM), and combinations of the two drugs. Temporal changes in cell numbers, cell cycle distribution, and apoptosis were measured. A basic pharmacodynamic (PD) model based on cell numbers, and a mechanism-based PD model integrating all measurements, were developed. The basic PD model indicated that synergistic effects occurred in both cell proliferation and death processes. The mechanism-based model captured key features of drug action: temporary cell cycle arrest in S phase induced by gemcitabine alone, apoptosis induced by birinapant alone, and prolonged cell cycle arrest and enhanced apoptosis induced by the combination. A drug interaction term Ψ was employed in the models to signify interactions of the combination when data were limited. When more experimental information was utilized, Ψ values approaching 1 indicated that specific mechanisms of interactions were captured better. PD modeling identified the potential benefit of combining gemcitabine and birinapant, and characterized the key interaction pathways. An optimal treatment schedule of pretreatment with gemcitabine for 24-48 h was suggested based on model predictions and was verified experimentally. This approach provides a generalizable modeling platform for exploring combinations of cytostatic and cytotoxic agents in cancer cell culture studies.
  // This model is hosted on BioModels Database and identified by: BIOMD0000000668.
  // To cite BioModels Database, please use: Chelliah V et al. BioModels: ten-year anniversary. Nucl. Acids Res. 2015, 43(Database issue):D542-8.
  // To the extent possible under law, all copyright and related or neighbouring rights to this encoded model have been dedicated to the public domain worldwide. Please refer to CC0 Public Domain Dedication for more information.
  // biomodels.db:MODEL1604270000
  // isInstanceOf kegg.drug:D02368 kegg.drug:D10417 biomodels.db:MODEL1604270000 BTO:0000988 ncit:C191
  // isDescribedBy pubmed:26252969
  // biomodels.db:BIOMD0000000668
  // hasPart kegg.drug:D02368
  // hasPart kegg.drug:D10417

  // Compartments:
  compartment Pancreas = 1;  // isVersionOf BTO:0000988

  // Species:
  species $Ra in Pancreas = Ra_0;  // isVersionOf BTO:0000304; hasProperty ncit:C17597
  species $Rd in Pancreas = Rd_0;  // isVersionOf BTO:0000304; hasProperty ncit:C124524; hasProperty GO:0008219
  species $Inh_g in Pancreas;  // isInstanceOf ncit:C15632 ncit:C29895; isVersionOf ncit:C15632
  species $Inh_b in Pancreas;  // isInstanceOf ncit:C15632 ncit:C29895; isVersionOf ncit:C15632
  species $Sti_g in Pancreas;  // isInstanceOf ncit:C15632 ncit:C40715; isVersionOf ncit:C15632
  species $Sti_b in Pancreas;  // isInstanceOf ncit:C15632 ncit:C40715; isVersionOf ncit:C15632
  species Sti_g1 in Pancreas = 0;
  species Sti_g2 in Pancreas = 0;
  species Sti_g3 in Pancreas = 0;
  species Sti_g4 in Pancreas = 0;
  species Sti_b1 in Pancreas = 0;
  species Sti_b2 in Pancreas = 0;
  species Sti_b3 in Pancreas = 0;
  species Sti_b4 in Pancreas = 0;

  // Parameters:
  Ra_0 = 307000;  // isVersionOf ncit:C85644
  Rd_0 = 1940;  // isVersionOf ncit:C85644
  Rss = 5490000;  // isVersionOf ncit:C25443
  kg = 0.0209;  // encodes GO:0016049
  kd = 0.000385;  // encodes GO:0008219
  Imax_g = 0.991;
  Imax_b = 0.375;
  IC50_g = 20.8;  // OBI:0001191
  IC50_b = 145;  // OBI:0001191
  Hi_g = 3.57;  // ncit:C48923
  Hi_b = 1.06;  // ncit:C48923
  Smax_g = 4.09;
  Smax_b = 17.5;
  SC50_g = 14;  // OBI:0001180
  SC50_b = 168;  // OBI:0001180
  Hs_g = 5;  // ncit:C48923
  Hs_b = 0.984;  // ncit:C48923
  ktau_g = 0.086;
  ktau_b = 0.611;
  Psi_i = piecewise(0.583, (C_b != 0) && (C_g != 0), 1);  // encodes ncit:C54708
  Psi_s = piecewise(0.582, (C_b != 0) && (C_g != 0), 1);  // encodes ncit:C54708
  C_g = 0;  // isVersionOf kegg.drug:D02368; isVersionOf CHEBI:175901; isVersionOf ncit:C66876
  C_b = 0;  // isVersionOf ncit:C88295; isVersionOf kegg.drug:D10417
  Initial_for_Rss = Rss;
  Initial_for_kd = kd;
  Initial_for_kg = kg;

  // Assignment rules:
  Inh_g := Imax_g*C_g^Hi_g/((Psi_i*IC50_g)^Hi_g + C_g^Hi_g);
  Inh_b := Imax_b*C_b^Hi_b/((Psi_i*IC50_b)^Hi_b + C_b^Hi_b);
  Sti_g := Smax_g*C_g^Hs_g/((Psi_s*SC50_g)^Hs_g + C_g^Hs_g);
  Sti_b := Smax_b*C_b^Hs_b/((Psi_s*SC50_b)^Hs_b + C_b^Hs_b);

  // Rate rules:
  Ra' = (1 - Inh_g)*(1 - Inh_b)*Initial_for_kg*Ra*(1 - Ra/Initial_for_Rss) - (1 + Sti_g4)*(1 + Sti_b4)*Initial_for_kd*Ra;
  Rd' = (1 + Sti_g4)*(1 + Sti_b4)*Initial_for_kd*Ra - Initial_for_kd*Rd;

  // Reactions:
  g_death_stimulus_delay_1: $Sti_g => Sti_g1; Pancreas*ktau_g*Sti_g;
  g_death_stimulus_delay_2: Sti_g1 => Sti_g2; Pancreas*ktau_g*Sti_g1;
  g_death_stimulus_delay_3: Sti_g2 => Sti_g3; Pancreas*ktau_g*Sti_g2;
  g_death_stimulus_delay_4: Sti_g3 => Sti_g4; Pancreas*ktau_g*Sti_g3;
  g_death_stimulus_delay_4_degradation: Sti_g4 => ; Pancreas*ktau_g*Sti_g4;
  b_death_stimulus_delay_1: $Sti_b => Sti_b1; Pancreas*ktau_b*Sti_b;
  b_death_stimulus_delay_2: Sti_b1 => Sti_b2; Pancreas*ktau_b*Sti_b1;
  b_death_stimulus_delay_3: Sti_b2 => Sti_b3; Pancreas*ktau_b*Sti_b2;
  b_death_stimulus_delay_4: Sti_b3 => Sti_b4; Pancreas*ktau_b*Sti_b3;
  b_death_stimulus_delay_4_degradation: Sti_b4 => ; Pancreas*ktau_b*Sti_b4;

  // Unit definitions:
  unit volume = 1e-3 litre;
  unit substance = 1e-3 mole;
end
