// SBML level 2 version 4
// dcterms:bibliographicCitation: urn:miriam:pubmed:12941536

function Function_for_the_infection_of_normal_cell(beta, x, v)
  beta*x*v;
end

function Constant_flux__irreversible(v)
  v;
end
Constant_flux__irreversible is "Constant flux (irreversible)";

function Funtion_for_the_infection_of_single_infected_cel(alpha, w, y)
  alpha*w*y;
end

function Function_for_the_release_of_the_pathogen(k, y)
  k*y;
end

function Function_for_the_release_of_recombinant_virus(c, z)
  c*z;
end

model New_Model()
  // Revilla2003 - Controlling HIV infection using recombinant viruses
  // biomodels.db:MODEL1006230047 biomodels.db:BIOMD0000000707
  // occursIn BTO:0002417
  // hasProperty efo:0000764
  // hasProperty efo:0000727
  // hasProperty mamo:MAMO_0000046
  // hasTaxon taxonomy:9606

  // Compartments:
  compartment Plasma = 1;  // isVersionOf ncit:C13356

  // Species:
  species Normal_Th_cells in Plasma = 3;  // BTO:0002417
  species Pathogen_Virus in Plasma = 149;  // isVersionOf taxonomy:11676
  // T-Cells infected with pathogenic HIV
  species Single_Infected_Th_Cells in Plasma = 6;  // isVersionOf BTO:0002417; isVersionOf BTO:0000152
  species Recombinant_Virus in Plasma = 1;  // isVersionOf ncit:C97158; isVersionOf taxonomy:10239
  // T-Cells infected with both pathogenic HIV and recombinant virus
  species Double_Infected_Th_Cells in Plasma = 0;  // isVersionOf BTO:0000152; isVersionOf BTO:0002417

  // Parameters:
  d = 0.01;
  lamda = 2;
  beta = 0.004;
  a = 0.33;
  alpha = 0.004;
  b = 2;
  k = 50;
  u = 2;
  c = 2000;
  q = 2;

  // Reactions:
  Production_of_Normal_cells: => Normal_Th_cells; Plasma*Constant_flux__irreversible(lamda);  // isVersionOf ncit:C61408
  Degradation_of_Normal_cells: Normal_Th_cells => ; Plasma*d*Normal_Th_cells;
  Infection_of_Normal_cells_with_Pathogen: Normal_Th_cells => Single_Infected_Th_Cells; Plasma*Function_for_the_infection_of_normal_cell(beta, Normal_Th_cells, Pathogen_Virus);  // modifiers: Pathogen_Virus; isVersionOf ncit:C128320
  Degradation_of_Single_Infected_Cells: Single_Infected_Th_Cells => ; Plasma*a*Single_Infected_Th_Cells;
  Infection_of_Single_Infeced_Cells_with_Recombinant_Virus: Single_Infected_Th_Cells => Double_Infected_Th_Cells; Plasma*Funtion_for_the_infection_of_single_infected_cel(alpha, Recombinant_Virus, Single_Infected_Th_Cells);  // modifiers: Recombinant_Virus; isVersionOf ncit:C128320
  Release_of_Pathogen: => Pathogen_Virus; Plasma*Function_for_the_release_of_the_pathogen(k, Single_Infected_Th_Cells);  // modifiers: Single_Infected_Th_Cells; isVersionOf GO:0019076
  Degradation_of_Double_Infected_Cells: Double_Infected_Th_Cells => ; Plasma*b*Double_Infected_Th_Cells;
  Release_of_Recombinant_Virus: => Recombinant_Virus; Plasma*Function_for_the_release_of_recombinant_virus(c, Double_Infected_Th_Cells);  // modifiers: Double_Infected_Th_Cells; isVersionOf GO:0019076
  Degradation_of_Pathogen_Virus: Pathogen_Virus => ; Plasma*u*Pathogen_Virus;
  Degradation_of_Recombinant_Virus: Recombinant_Virus => ; Plasma*q*Recombinant_Virus;

  // Unit definitions:
  unit time = 86400 second;
end
