// SBML level 2 version 4
// dcterms:bibliographicCitation: urn:miriam:doi:10.3182/20120829-3-hu-2029.00029

function Constant_flux__irreversible(v)
  v;
end
Constant_flux__irreversible is "Constant flux (irreversible)";

function Function_for_Reaction_2(k_I, U_H, V)
  k_I*U_H*V;
end

function Function_for_Reaction_3(k_R, U_H, IFN)
  k_R*U_H*IFN;
end

function Function_for_Reaction_6(q_K, U_E, K)
  q_K*U_E*K;
end

function Function_for_Reaction_8(q_K, U_I, K)
  q_K*U_I*K;
end
Function_for_Reaction_8 is "Function for Reaction 8 [1]";

function Function_for_Reaction_10(p_V, U_I)
  p_V*U_I;
end
Function_for_Reaction_10 is "Function for Reaction 10 [1]";

function Function_for_Reaction_12(a_I, U_I)
  a_I*U_I;
end
Function_for_Reaction_12 is "Function for Reaction 12 [1]";

function Function_for_Reaction_15(phi_K, U_I)
  phi_K*U_I;
end
Function_for_Reaction_15 is "Function for Reaction 15 [1]";

model Hernandez_Vargas2012___Innate_Immune_System_ynamics_to_Influenza_virus()
  // Hernandez-Vargas2012 - Innate immune system dynamics to Influenza virus
  // biomodels.db:MODEL1808280005 biomodels.db:BIOMD0000000710
  // hasProperty mamo:MAMO_0000046
  // hasProperty efo:0001669
  // hasProperty PW:0000234
  // hasTaxon taxonomy:9606
  // hasTaxon taxonomy:11320

  // Compartments:
  compartment compartment = 1; compartment is "Lung";  // BTO:0000763

  // Species:
  species U_H in compartment = 500000000; U_H is "Healthy Epithelial cells (U_H)";  // isVersionOf BTO:0000414
  // Partially infected cells
  species U_E in compartment = 0; U_E is "Partially infected Epithelial cells (U_E)";  // isVersionOf BTO:0000152; isVersionOf BTO:0000414
  species U_I in compartment = 0; U_I is "Infected Epithelial cells (U_I)";  // isVersionOf BTO:0000152; isVersionOf BTO:0000414
  species U_R in compartment = 0; U_R is "Resistant Epithelial cells (U_R)";  // isVersionOf BTO:0000414; hasProperty MP:0002410
  species V in compartment = 0.001; V is "Viral Load (V)";  // hasTaxon taxonomy:11320
  // Only alpha and beta interferons take part in thi process.
  species IFN in compartment = 0; IFN is "Interferon (IFN)";  // isVersionOf uniprot:P01562; isVersionOf uniprot:P01574
  species K in compartment = 800000; K is "Natural Killers (K)";  // isVersionOf BTO:0000914

  // Parameters:
  k_I = 0.003;
  k_R = 7;
  k_E = 0.5;
  q_K = 3e-6;
  phi_K = 0.001;
  a_I = 3e-6;
  p_V = 0.01;
  delta_H = 0.01;
  delta_I = 0.01;
  delta_R = 0.01;
  delta_IFN = 4;
  delta_K = 0.04;
  delta_V = 5.2;
  Metabolite_0_0 = U_H; Metabolite_0_0 is "Initial for Healthy Epithelial cells (U_H)";
  Metabolite_6_0 = K; Metabolite_6_0 is "Initial for Natural Killers (K)";

  // Assignment rules:
  S_H := Metabolite_0_0*delta_H;
  S_K := Metabolite_6_0*delta_K;

  // Reactions:
  reaction_1: => U_H; compartment*Constant_flux__irreversible(S_H); reaction_1 is "Proliferation of Healthy Epithelial cells";  // isVersionOf ncit:C61408
  reaction_2: U_H => U_E; compartment*Function_for_Reaction_2(k_I, U_H, V); reaction_2 is "Partial infection of Healthy Epithelial cells";  // modifiers: V; isVersionOf ncit:C128320
  reaction_3: U_H => U_R; compartment*Function_for_Reaction_3(k_R, U_H, IFN); reaction_3 is "Healthy Epithelial cells becoming resistant";  // modifiers: IFN
  reaction_4: U_H => ; compartment*delta_H*U_H; reaction_4 is "Death of Healthy Epithelial cells";
  reaction_5: U_E => U_I; compartment*k_E*U_E; reaction_5 is "Infection of partially infected Epithelial cells";  // isVersionOf ncit:C128320
  reaction_6: U_E => ; compartment*Function_for_Reaction_6(q_K, U_E, K); reaction_6 is "Death of partially infected Epithelial cells caused by Natural Killers";  // modifiers: K
  reaction_7: U_I => ; compartment*delta_I*U_I; reaction_7 is "Death of Infected Epithelial cells";
  reaction_8: U_I => ; compartment*Function_for_Reaction_8(q_K, U_I, K); reaction_8 is "Death of infected Epithelial cells caused by Natural Killers";  // modifiers: K
  reaction_9: U_R => ; compartment*delta_R*U_R; reaction_9 is "Death of Resistant Epithelial cells";
  reaction_10: => V; compartment*Function_for_Reaction_10(p_V, U_I); reaction_10 is "Release of Virus from Infected Epithelial cells";  // modifiers: U_I; isVersionOf GO:0019076
  Degradation_of_Virus: V => ; compartment*delta_V*V;
  Production_of_Interferons: => IFN; compartment*Function_for_Reaction_12(a_I, U_I);  // modifiers: U_I; isVersionOf ncit:C61408
  Degradation_of_Interferons: IFN => ; compartment*delta_IFN*IFN;
  Proliferation_of_Natural_KIllers: => K; compartment*Constant_flux__irreversible(S_K);  // isVersionOf ncit:C61408
  reaction_15: => K; compartment*Function_for_Reaction_15(phi_K, U_I); reaction_15 is "Recruitment of Natural Killers from the Blood to the lungs";  // modifiers: U_I
  Death_of_Natural_Killers: K => ; compartment*delta_K*K;

  // Unit definitions:
  unit time = 86400 second;
end
