// SBML level 2 version 4
// dcterms:bibliographicCitation: urn:miriam:pubmed:24614233

function Function_for_Reaction_1(alpha, P, k_p)
  alpha*P*(1 - P/k_p);
end

function Function_for_Reaction_5(epsilon, f_D)
  epsilon*f_D;
end

function Function_for_Reaction_2(beta, D, P)
  beta*D*(P/(P + 0.01));
end
Function_for_Reaction_2 is "Function for Reaction 2 [1]";

function Function_for_Reaction_3(gamma, P)
  gamma*P;
end
Function_for_Reaction_3 is "Function for Reaction 3 [1]";

model New_Model()
  // Manchanda2014 - Effect on Immune System by 4 different Influenza A virus strains
  // biomodels.db:MODEL1808280001 biomodels.db:BIOMD0000000712
  // biomodels.db:MODEL1808280001
  // hasProperty mamo:MAMO_0000046
  // hasProperty efo:0001669
  // hasProperty ncit:C17930
  // hasTaxon taxonomy:10090

  // Compartments:
  compartment compartment = 1; compartment is "Mice";  // hasTaxon taxonomy:10090

  // Species:
  species P in compartment = 0.01; P is "Virus Pathogenicity (P)";  // isVersionOf efo:0001761
  species D in compartment = 0; D is "Antiviral Immune defense (D)";  // isVersionOf ncit:C26011
  species I in compartment = 0; I is "Inflammation (I)";  // isVersionOf ncit:C3137
  species $S in compartment; S is "Clinical Score (S)";  // isVersionOf ncit:C118969

  // Parameters:
  alpha = 3.63;
  k_p = 3.23;
  beta = 1;
  gamma = 0.51; gamma is "gamma'";
  theta = 0.01;
  epsilon = 6.81;
  delta = 4.27; delta is "delta'";
  omega = 0.13; omega is "omega'";
  rho = 1.82;

  // Assignment rules:
  S := P + I;
  f_D := 1 + tanh((D - delta)/omega);

  // Reactions:
  Infection_of_Virus: => P; compartment*Function_for_Reaction_1(alpha, P, k_p);
  reaction_2: P => ; compartment*Function_for_Reaction_2(beta, D, P); reaction_2 is "Early immune response to the virus";  // modifiers: D
  Activation_of_the_defense_system: => D; compartment*Function_for_Reaction_3(gamma, P);  // modifiers: P
  Decay_in_immunity: D => ; compartment*theta*D;
  reaction_5: => I; compartment*Function_for_Reaction_5(epsilon, f_D); reaction_5 is "Inflammatory response by the host";
  reaction_6: I => ; compartment*rho*I; reaction_6 is "Anti-inflammatory response by the host";

  // Unit definitions:
  unit volume = 1e-3 litre;
  unit time = 86400 second;
  unit substance = 1e-3 mole;
end
