// SBML level 2 version 4
// dcterms:bibliographicCitation: urn:miriam:doi:10.1016/j.physa.2017.08.139

function Constant_flux__irreversible(v)
  v;
end
Constant_flux__irreversible is "Constant flux (irreversible)";

function Function_for_Reaction_3(beta, S, I, alpha, M)
  beta*S*I*exp(-alpha*M);
end

function Function_for_Reaction_7(alpha1, alpha2, I)
  (alpha1 + alpha2)*I;
end

function Function_for_Message(mu, modifier)
  mu*modifier;
end

model New_Model()
  // Huo2017 - SEIS epidemic model with the impact of media
  // biomodels.db:MODEL1808280008 biomodels.db:BIOMD0000000715
  // hasProperty mamo:MAMO_0000046
  // hasProperty efo:0005741
  // hasTaxon taxonomy:9606
  // isDescribedBy doi:10.1016/j.physa.2017.08.139
  // isDescribedBy doi:10.1016/j.physa.2017.08.139

  // Compartments:
  compartment compartment = 1; compartment is "Human Population";  // OBI:0000181

  // Species:
  species S in compartment = 3.5; S is "Susceptible Individuals (S)";  // isVersionOf ido:0000514
  species E in compartment = 2.5; E is "Exposed Individuals (E)";  // isVersionOf ncit:C71551
  species I in compartment = 3; I is "Infected Individuals (I)";  // isVersionOf ido:0000511
  species M in compartment = 6; M is "Message (M)";  // isVersionOf ncit:C62608
  species $N in compartment; N is "Total population (N)";  // ncit:C25304; OBI:0000181

  // Parameters:
  A = 0.8;
  beta = 0.8;
  alpha = 0.08;
  rho = 0.09;
  mu1 = 0.99;
  mu2 = 0.4;
  mu3 = 0.8;
  alpha1 = 0.6;
  alpha2 = 0.02;
  tau = 0.6;
  gamma = 0.7;

  // Assignment rules:
  N := S + E + I;

  // Reactions:
  Birth_of_Susceptible_individuals: => S; compartment*Constant_flux__irreversible(A);
  reaction_2: I => S; compartment*gamma*I; reaction_2 is "Transmission of virus to Susceptible individuals";
  Exposure_to_the_virus: S => E; compartment*Function_for_Reaction_3(beta, S, I, alpha, M);  // modifiers: I, M
  Death_of_Susceptible_Individuals: S => ; compartment*alpha1*S;  // isVersionOf efo:0000480
  reaction_5: E => I; compartment*rho*E; reaction_5 is "Exposed individuals becoming infectious";
  Death_of_Exposed_Individuals: E => ; compartment*alpha1*E;  // isVersionOf efo:0000480
  Death_of_Infected_Individuals: I => ; compartment*Function_for_Reaction_7(alpha1, alpha2, I);  // isVersionOf efo:0000480
  reaction_8: => M; compartment*Function_for_Message(mu1, S); reaction_8 is "Message sent by Susceptible Individuals";  // modifiers: S
  reaction_9: => M; compartment*Function_for_Message(mu2, E); reaction_9 is "Message sent by Exposed Individuals";  // modifiers: E
  reaction_10: => M; compartment*Function_for_Message(mu3, I); reaction_10 is "Message sent by Infected Individuals";  // modifiers: I
  Message_becoming_outdated: M => ; compartment*tau*M;

  // Unit definitions:
  unit volume = 1e-3 litre;
  unit time = 86400 second;
  unit substance = 1e-3 mole;
end
