// SBML level 2 version 4
// dcterms:bibliographicCitation: urn:miriam:doi:10.1016/j.idm.2018.03.004

function Constant_flux__irreversible(v)
  v;
end
Constant_flux__irreversible is "Constant flux (irreversible)";

function Rate_for_reaction_3__1(beta_b, S_b, I_b)
  beta_b*S_b*I_b;
end
Rate_for_reaction_3__1 is "Rate for reaction 3 [1]";

function Rate_for_reaction_8__2(beta_bh, S_h, I_b)
  beta_bh*S_h*I_b;
end
Rate_for_reaction_8__2 is "Rate for reaction 8 [2]";

model New_Model()
  // Lee2018 - Avian human bilinear incidence (BI) model
  // biomodels.db:MODEL1808280009 biomodels.db:BIOMD0000000716
  // hasProperty mamo:MAMO_0000046
  // hasProperty ncit:C3439
  // hasProperty efo:0005222
  // hasTaxon taxonomy:9606
  // hasTaxon taxonomy:329376

  // Compartments:
  compartment compartment = 1; compartment is "Bird Population";  // isVersionOf OBI:0000181; hasTaxon taxonomy:8782
  compartment Human_Population = 1;  // isVersionOf OBI:0000181; hasTaxon taxonomy:9606

  // Species:
  species S_b in compartment = 244956; S_b is "Susceptible bird (S_b)";  // isVersionOf ido:0000514; hasTaxon taxonomy:8782
  species I_b in compartment = 36485; I_b is "Infected bird (I_b)";  // isVersionOf ido:0000511; hasTaxon taxonomy:8782
  species S_h in Human_Population = 171977; S_h is "Susceptible human (S_h)";  // isVersionOf ido:0000514; hasTaxon taxonomy:9606
  species I_a in Human_Population = 0; I_a is "Infected Human (I_a)";  // isVersionOf ido:0000511; hasTaxon taxonomy:9606

  // Parameters:
  H_b = 180000;
  H_bh = 120000;
  H_v = 850;
  p = 0;
  phi = 0;
  gamma_b = 0.003;
  c = 0;
  q = 0;
  Initial_for_Nh = Nh;

  // Assignment rules:
  Nb := S_b + I_b;
  Nh := S_h + I_a;
  LAMBDA_b := 2060/365;
  LAMBDA_h := 23.7*Initial_for_Nh/365000;
  mu_b := 1/(2*365);
  mu_h := 1/(69.2*365);
  beta_bh := 16/(108*1000000*912.5);
  beta_b := 45685/(439197*30);
  beta_v := 45685/(2*439197*30);
  d := 6/(108*1000000*912.5);
  delta_b := 45682/(439197*30);

  // Reactions:
  Birth_of_susceptible_bird: => S_b; compartment*Constant_flux__irreversible(LAMBDA_b);
  reaction_2: S_b => ; compartment*mu_b*S_b; reaction_2 is "Natural death of susceptible bird";  // isVersionOf efo:0000480
  Infection_of_susceptible_bird: S_b => I_b; compartment*Rate_for_reaction_3__1(beta_b, S_b, I_b);  // isVersionOf ncit:C128320
  reaction_4: I_b => ; compartment*delta_b*I_b; reaction_4 is "Disease related death of infected bird";  // isVersionOf efo:0000480
  Natural_death_of_infected_bird: I_b => ; compartment*mu_b*I_b;  // isVersionOf efo:0000480
  Birth_of_susceptible_human: => S_h; Human_Population*Constant_flux__irreversible(LAMBDA_h);
  reaction_7: S_h => ; Human_Population*mu_h*S_h; reaction_7 is "Natural death of susceptible human";  // isVersionOf efo:0000480
  Infection_of_susceptible_human: S_h => I_a; Rate_for_reaction_8__2(beta_bh, S_h, I_b);  // modifiers: I_b; isVersionOf ncit:C128320
  reaction_9: I_a => ; Human_Population*d*I_a; reaction_9 is "Disease related death of infected human";  // isVersionOf efo:0000480
  Natural_death_of_infected_human: I_a => ; Human_Population*mu_h*I_a;  // isVersionOf efo:0000480

  // Unit definitions:
  unit volume = 1e-3 litre;
  unit time = 86400 second;
  unit substance = 1e-3 mole;
end
