// SBML level 2 version 4
// dcterms:bibliographicCitation: urn:miriam:pubmed:26254217

function Constant_flux__irreversible(v)
  v;
end
Constant_flux__irreversible is "Constant flux (irreversible)";

function Function_for_reaction_1(a_p, p_0, T_L, t, a_M, M, r1)
  (a_p*p_0*exp(-a_p*T_L*t) + a_M*M)*(T_L + r1*M);
end

function Function_for_reaction_4(alpha, b1, T, b2)
  alpha*(b1*T^2/(b2 + T^4));
end

function Function_for_reaction_5(beta, r2, M, k1)
  beta*r2*M*(1 - M/k1);
end

function Function_for_reaction_7(rho, C, M)
  rho*C*M;
end

function Function_for_reaction_9(r3, M)
  r3*M;
end

function Function_for_reaction_11(gamma, V, L)
  gamma*V*L;
end

function Function_for_reaction_12(c1, V, c2, c3, c4, T, L)
  (c1 + V/(c2 + c3*V))*(1/(1 + c4*T))*L;
end

function Function_for_reaction_13(s_L, b3, V, b4, f)
  (s_L + b3*V^2/(b4 + V^4))*f;
end

function Function_for_reaction_14(M, L, C, k2)
  (M + L + C)/k2*L;
end

function Function_for_reaction_15(sigma, delta1, delta2, V, L)
  sigma*(delta1 + delta2*V)*L;
end

model New_Model()
  // Bianchi2015 -Model for lymphangiogenesis in normal and diabetic wounds
  // biomodels.db:MODEL1811210001 biomodels.db:BIOMD0000000722
  // occursIn GO:0001946
  // hasProperty mamo:MAMO_0000046
  // hasProperty omit:0015769
  // hasProperty GO:0042060
  // hasTaxon taxonomy:10116

  // Compartments:
  compartment Body = 1;  // hasTaxon taxonomy:10090; hasTaxon taxonomy:10116

  // Species:
  species Active_TGF_beta in Body = 30; Active_TGF_beta is "Active TGF-beta";  // isVersionOf PR:000000182
  species Macrophages in Body = 1875;  // isVersionOf CL:0000863
  species VEGF in Body = 0.5;  // isVersionOf uniprot:P49767
  species LECs in Body = 0;  // isVersionOf BTO:0004167
  species Capillaries in Body = 0;  // isVersionOf omit:0003535

  // Parameters:
  a_p = 0.029;
  p_0 = 250000;
  a_M = 0.45;
  T_L = 18;
  r1 = 3e-5;
  d1 = 500;
  s_M = 542;
  alpha = 0.5;
  b1 = 800000000;
  b2 = 8.1e9;
  beta = 0.005;
  r2 = 1.22;
  k1 = 600000;
  d2 = 0.2;
  rho = 1e-5;
  S_V = 1.9;
  r3 = 0.0019;
  d3 = 11;
  gamma = 0.0014;
  c1 = 0.42;
  c2 = 42;
  c3 = 4.1;
  c4 = 0.24;
  S_L = 500;
  b3 = 10000000;
  b4 = 8.1e9;
  C = 10000; C is "C*";
  k2 = 471000;
  L = 10000; L is "L*";
  delta1 = 0.05;
  delta2 = 0.001;

  // Assignment rules:
  f := piecewise(1 - Capillaries/C, Capillaries < C, 0);
  sigma := piecewise(0, LECs + Capillaries < L, 1);

  // Reactions:
  Activation_of_TGF_beta_by_enzymes_and_Macrophages: => Active_TGF_beta; Body*Function_for_reaction_1(a_p, p_0, T_L, time, a_M, Macrophages, r1); Activation_of_TGF_beta_by_enzymes_and_Macrophages is "Activation of TGF-beta by enzymes and Macrophages";  // modifiers: Macrophages
  Decay_of_TGF_beta: Active_TGF_beta => ; Body*d1*Active_TGF_beta; Decay_of_TGF_beta is "Decay of TGF-beta";
  Flux_of_macrophages_from_source: => Macrophages; Body*Constant_flux__irreversible(s_M);
  Chemotaxis_by_TGF_beta: => Macrophages; Body*Function_for_reaction_4(alpha, b1, Active_TGF_beta, b2); Chemotaxis_by_TGF_beta is "Chemotaxis by TGF-beta";  // modifiers: Active_TGF_beta
  Logistic_growth_of_Macrophages: => Macrophages; Body*Function_for_reaction_5(beta, r2, Macrophages, k1);
  Removal_of_Macrophages: Macrophages => ; Body*d2*Macrophages;
  Differentiation_of_Macrophages: Macrophages => ; Body*Function_for_reaction_7(rho, Capillaries, Macrophages);  // modifiers: Capillaries
  Flux_of_VEGF_from_source: => VEGF; Body*Constant_flux__irreversible(S_V);
  Production_of_VEGF_by_macrophages: => VEGF; Body*Function_for_reaction_9(r3, Macrophages);  // modifiers: Macrophages
  Decay_of_VEGF: VEGF => ; Body*d3*VEGF;
  VEGF_used_by_LECs: VEGF => ; Body*Function_for_reaction_11(gamma, VEGF, LECs);  // modifiers: LECs
  Growth_of_LECs_upregulated_by_VEGF_and_downregulated_by_TGF_beta: => LECs; Body*Function_for_reaction_12(c1, VEGF, c2, c3, c4, Active_TGF_beta, LECs); Growth_of_LECs_upregulated_by_VEGF_and_downregulated_by_TGF_beta is "Growth of LECs upregulated by VEGF and downregulated by TGF-beta";  // modifiers: VEGF, Active_TGF_beta
  Inflow_and_chemotaxis_of_LECs_by_VEGF: => LECs; Body*Function_for_reaction_13(S_L, b3, VEGF, b4, f);  // modifiers: VEGF
  Crowding_effect_and_apoptosis_of_LECs: LECs => ; Body*Function_for_reaction_14(Macrophages, LECs, Capillaries, k2);  // modifiers: Macrophages, Capillaries
  Transdifferentiation_of_LECs_into_the_capillaries: LECs => Capillaries; Body*Function_for_reaction_15(sigma, delta1, delta2, VEGF, LECs);  // modifiers: VEGF

  // Unit definitions:
  unit volume = 1e-3 litre;
  unit time = 86400 second;
  unit substance = 1e-3 mole;
end
