// SBML level 2 version 4
// dcterms:bibliographicCitation: urn:miriam:pubmed:1825521

function Constant_flux__irreversible(v)
  v;
end
Constant_flux__irreversible is "Constant flux (irreversible)";

function function_for_cyclin_degradataion(M)
  M;
end

function function_for_MPF_syntehsis_1(k, M)
  k*M;
end

function function_for_MPF_synthesis_2(k, M, P)
  k*M*P^2;
end

function function_for_MPF_degradation(k, S)
  k*S/(S + 1);
end

model Norel1990___MPF_and_Cyclin_Oscillations()
  // Norel1990 - MPF and Cyclin Oscillations
  // A mathematical model of cell cycle progression is presented, which integrates recent biochemical information on the interaction of the maturation promotion factor (MPF) and cyclin. The model retrieves the dynamics observed in early embryos and explains how multiple cycles of MPF activity can be produced and how the internal clock that determines durations and number of cycles can be adjusted by modulating the rate of change in MPF or cyclin concentrations. Experiments are suggested for verifying the role of MPF activity in determining the length of the somatic cell cycle.
  // biomodels.db:MODEL1812120004 biomodels.db:BIOMD0000000728
  // hasProperty mamo:MAMO_0000046
  // hasProperty GO:0000278
  // hasTaxon taxonomy:9606
  // isDescribedBy pubmed:1825521
  // isDescribedBy pubmed:1825521

  // Compartments:
  compartment cell = 1;  // hasProperty ncit:C48694

  // Species:
  species M in cell = 0.4;  // isVersionOf GO:0031387
  species C in cell = 0.8;  // hasProperty ncit:C17349

  // Parameters:
  e = 3.46616;  // hasProperty ncit:C94967
  f = 1;  // hasProperty ncit:C94967
  g = 10;  // hasProperty ncit:C94967
  i = 1.2;  // hasProperty ncit:C94967

  // Reactions:
  Cylin_synthesis: => C; cell*Constant_flux__irreversible(i);  // hasProperty ncit:C61408
  Cyclin_degradation: C => ; cell*function_for_cyclin_degradataion(M);  // modifiers: M; hasProperty ncit:C61559
  MPF_synthesis_1: => M; cell*function_for_MPF_syntehsis_1(e, C);  // modifiers: C; hasProperty ncit:C61408
  MPF_synthesis_2: => M; cell*function_for_MPF_synthesis_2(f, C, M);  // modifiers: C; hasProperty ncit:C61408
  MPF_degradation: M => ; cell*function_for_MPF_degradation(g, M);  // hasProperty ncit:C61559

  // Unit definitions:
  unit volume = 1e-3 litre;
  unit substance = 1e-3 mole;
end
