// SBML level 2 version 4

function Constant_flux__irreversible(v)
  v;
end
Constant_flux__irreversible is "Constant flux (irreversible)";

function mass_action__dif_compartments__explicit_volume___1(k, VolCompart, Substrate)
  k*Substrate*VolCompart;
end
mass_action__dif_compartments__explicit_volume___1 is "mass action (dif compartments, explicit volume) [1]";

function non_competitive_inhibition(v, volume, substrate, Km, noncompet_inhib, Ki)
  v*volume*substrate/((Km + substrate)*(1 + noncompet_inhib/Ki));
end
non_competitive_inhibition is "non-competitive inhibition";

model Mouse_Iron_Distribution___Adequate_iron_diet()
  // Mouse Iron Distribution - Adequate iron diet (No Tracer)
  // Mouse Iron Distribution Dynamics
  // Dynamic model of iron distribution in mice. This model includes only normal iron with the parameters that fit the data from Lopes et al. 2010 for mice fed an adequate iron diet.
  // This model does not include the radioiron tracer species. It is appropriate to study the properties in conditions where no tracers are used (for example for steady state analysis).
  // biomodels.db:MODEL1605030003 biomodels.db:BIOMD0000000736
  // GO:0055072
  // hasProperty mamo:MAMO_0000046
  // hasTaxon taxonomy:10090
  // isDescribedBy pubmed:28521769

  // Compartments:
  compartment Duodenum = 3.84615e-5;  // BTO:0000365
  compartment RBC = 0.00079;  // BTO:0000424
  compartment Spleen = 6.73077e-5;  // BTO:0001281
  compartment Liver = 0.001161905;  // BTO:0000759
  compartment Plasma = 0.0013;  // BTO:0000131
  compartment RestOfBody = 0.019694766;
  compartment BoneMarrow = 0.000214286;  // BTO:0000141

  // Species:
  species FeDuo in Duodenum = 0.01175906;  // isVersionOf CHEBI:24875
  species FeRBC in RBC = 0.03797999;  // isVersionOf CHEBI:24875
  species FeSpleen in Spleen = 0.0039424;  // isVersionOf CHEBI:24875
  species FeLiver in Liver = 0.00200011;  // isVersionOf CHEBI:24875
  species Tf in Plasma = 1.582183e-5;  // uniprot:Q921I1
  species $Hepcidin in Plasma = 2.300175e-8;  // uniprot:Q9EQ21
  species Fe2Tf in Plasma = 1.352482e-5;  // hasPart CHEBI:29034; hasPart uniprot:Q921I1
  species Fe1Tf in Plasma = 9.353347e-6;  // hasPart uniprot:Q921I1; hasPart CHEBI:29034
  species NTBI in Plasma = 3.331121e-8;  // isVersionOf CHEBI:24875
  species FeRest in RestOfBody = 0.0002868417;  // isVersionOf CHEBI:24875
  species $FeOutside in RestOfBody = 0;  // isVersionOf CHEBI:24875
  species FeBM in BoneMarrow = 0.003037836;  // isVersionOf CHEBI:24875

  // Parameters:
  kNTBI_Fe1Tf = 1084322005;
  kInDuo = 0.06899842;
  kInLiver = 2.977905;
  kInRBC = 1.084476;
  kInRest = 6.163562;
  Km = 0.01594212;
  Ki = 1e-9;
  kFe1Tf_Fe2Tf = 1084322005;
  VDuoNTBI = 0.2002419;
  VLiverNTBI = 0.02611476;
  VSpleenNTBI = 1.342205;
  VRestNTBI = 0.01094513;
  kDuoLoss = 0.02701133;
  vRBCSpleen = 0.0235286;
  kRestLoss = 0.02353324;
  var Total_Fe__particle; Total_Fe__particle is "Total_Fe (particle)";
  var Total_Fe__conc; Total_Fe__conc is "Total_Fe (conc)";
  var FePlasma__particle; FePlasma__particle is "FePlasma (particle)";
  kInBM = 15.76906;
  kBMSpleen = 0.06190295;
  var Total_Fe__g; Total_Fe__g is "Total_Fe (g)";
  var Total_Tf__particle; Total_Tf__particle is "Total_Tf (particle)";
  var Total_Tf__conc; Total_Tf__conc is "Total_Tf (conc)";
  var Total_Tf__mg_ml; Total_Tf__mg_ml is "Total_Tf (mg/ml)";
  vDiet = 0.003774223;
  var FePlasma_conc; FePlasma_conc is "FePlasma(conc)";
  quantity_to_number_factor = 6.02214179e23;
  Avogadro = 6.02214179e23;
  Initial_for_Avogadro = Avogadro;

  // Assignment rules:
  Total_Fe__particle := FeDuo*Avogadro*Duodenum + FeLiver*Avogadro*Liver + FeSpleen*Avogadro*Spleen + FeRBC*Avogadro*RBC + FeRest*Avogadro*RestOfBody + 2*Fe2Tf*Avogadro*Plasma + Fe1Tf*Avogadro*Plasma + NTBI*Avogadro*Plasma + FeBM*Avogadro*BoneMarrow;
  Total_Fe__conc := (FeDuo*Avogadro*Duodenum + FeLiver*Avogadro*Liver + FeSpleen*Avogadro*Spleen + FeRBC*Avogadro*RBC + FeRest*Avogadro*RestOfBody + 2*Fe2Tf*Avogadro*Plasma + Fe1Tf*Avogadro*Plasma + NTBI*Avogadro*Plasma + FeBM*Avogadro*BoneMarrow)/(Initial_for_Avogadro*(Duodenum + Liver + Plasma + RBC + RestOfBody + Spleen));
  FePlasma__particle := 2*Fe2Tf*Avogadro*Plasma + Fe1Tf*Avogadro*Plasma + NTBI*Avogadro*Plasma;
  Total_Fe__g := Total_Fe__particle*55.845/Initial_for_Avogadro;
  Total_Tf__particle := Tf*Avogadro*Plasma + Fe1Tf*Avogadro*Plasma + Fe2Tf*Avogadro*Plasma;
  Total_Tf__conc := Total_Tf__particle/(Initial_for_Avogadro*Plasma);
  Total_Tf__mg_ml := Total_Tf__conc*80;
  FePlasma_conc := FePlasma__particle/(Plasma*Initial_for_Avogadro);
  TfSaturation := 100*(2*Fe2Tf*Avogadro*Plasma + Fe1Tf*Avogadro*Plasma)/(2*(Tf*Avogadro*Plasma + Fe2Tf*Avogadro*Plasma + Fe1Tf*Avogadro*Plasma));

  // Reactions:
  Diet: => FeDuo; Duodenum*Constant_flux__irreversible(vDiet);  // isPropertyOf ncit:C15222
  HepcidinSynthesis: => $Hepcidin; Plasma*Constant_flux__irreversible(v);  // isPropertyOf ncit:C61408
    v = 1.7393e-8;
  HepcidinDecay: $Hepcidin => ; Plasma*k1*Hepcidin;  // isPropertyOf ncit:C75947
    k1 = 0.75616;
  Duo_NTBI: FeDuo => NTBI; non_competitive_inhibition(VDuoNTBI, Duodenum, FeDuo, Km, Hepcidin, Ki);  // modifiers: Hepcidin; isVersionOf GO:0006826
  Fe2Tf_BM: Fe2Tf => 2 FeBM + Tf; mass_action__dif_compartments__explicit_volume___1(kInBM, Plasma, Fe2Tf);  // isVersionOf GO:0006826
  RBC_Spleen: FeRBC => FeSpleen; mass_action__dif_compartments__explicit_volume___1(vRBCSpleen, RBC, FeRBC);  // isVersionOf GO:0006826
  Spleen_NTBI: FeSpleen => NTBI; non_competitive_inhibition(VSpleenNTBI, Spleen, FeSpleen, Km, Hepcidin, Ki);  // modifiers: Hepcidin; isVersionOf GO:0006826
  Liver_NTBI: FeLiver => NTBI; non_competitive_inhibition(VLiverNTBI, Liver, FeLiver, Km, Hepcidin, Ki);  // modifiers: Hepcidin; isVersionOf GO:0006826
  NTBI_Fe1Tf: NTBI + Tf => Fe1Tf; Plasma*kNTBI_Fe1Tf*NTBI*Tf;  // GO:0005488
  DuoLoss: FeDuo => $FeOutside; mass_action__dif_compartments__explicit_volume___1(kDuoLoss, Duodenum, FeDuo);  // isVersionOf ncit:C25559
  Fe2Tf_Liver: Fe2Tf => 2 FeLiver + Tf; mass_action__dif_compartments__explicit_volume___1(kInLiver, Plasma, Fe2Tf);  // isVersionOf GO:0006826
  Fe2Tf_Rest: Fe2Tf => 2 FeRest + Tf; mass_action__dif_compartments__explicit_volume___1(kInRest, Plasma, Fe2Tf);  // isVersionOf GO:0006826
  RestLoss: FeRest => $FeOutside; RestOfBody*kRestLoss*FeRest;  // isVersionOf ncit:C25559
  Fe2Tf_Duo: Fe2Tf => 2 FeDuo + Tf; mass_action__dif_compartments__explicit_volume___1(kInDuo, Plasma, Fe2Tf);  // isVersionOf GO:0006826
  Rest_NTBI: FeRest => NTBI; non_competitive_inhibition(VRestNTBI, RestOfBody, FeRest, Km, Hepcidin, Ki);  // modifiers: Hepcidin; isVersionOf GO:0006826
  Fe1Tf_Fe2Tf: Fe1Tf + NTBI => Fe2Tf; Plasma*kFe1Tf_Fe2Tf*Fe1Tf*NTBI;  // GO:0005488
  Fe1Tf_Liver: Fe1Tf => FeLiver + Tf; mass_action__dif_compartments__explicit_volume___1(kInLiver, Plasma, Fe1Tf);  // isVersionOf GO:0006826
  Fe1Tf_BM: Fe1Tf => FeBM + Tf; mass_action__dif_compartments__explicit_volume___1(kInBM, Plasma, Fe1Tf);  // isVersionOf GO:0006826
  Fe1Tf_Rest: Fe1Tf => FeRest + Tf; mass_action__dif_compartments__explicit_volume___1(kInRest, Plasma, Fe1Tf);  // isVersionOf GO:0006826
  Fe1Tf_Duo: Fe1Tf => FeDuo + Tf; mass_action__dif_compartments__explicit_volume___1(kInDuo, Plasma, Fe1Tf);  // isVersionOf GO:0006826
  BM_RBC: FeBM => FeRBC; mass_action__dif_compartments__explicit_volume___1(kInRBC, BoneMarrow, FeBM);  // isVersionOf GO:0006826
  BM_Spleen: FeBM => FeSpleen; mass_action__dif_compartments__explicit_volume___1(kBMSpleen, BoneMarrow, FeBM);  // isVersionOf GO:0006826

  // Events:
  event: at (time > 0): Hepcidin = 1.1e-7;

  // Unit definitions:
  unit time = 86400 second;
end
