// SBML level 2 version 4
// dcterms:bibliographicCitation: urn:miriam:pubmed:8186756

function Constant_flux__irreversible(v)
  v;
end
Constant_flux__irreversible is "Constant flux (irreversible)";

function Function_for_EC_Tumor_Complex_Formation(m, E, T)
  m*E*T;
end

function Function_for_Tumor_Growth(a, T)
  a*T;
end

function Function_for_Tumor_Killing(n, E, T)
  n*E*T;
end

function Function_for_EC_Accumulation(p, E, T, g)
  p*E*T/(g + T);
end

function Function_for_Tumor_Growth_Inhibition(a, b, T)
  a*b*T^2;
end

model Kuznetsov1994___Nonlinear_dynamics_of_immunogenic_tumors()
  // Kuznetsov1994 - Nonlinear dynamics of immunogenic tumors
  // This mathematical model describes the response of cytotoxic T lymphocytes to the growth of an immunogenic tumor, with the inclusion on a number of in vivo phenomena, such as the immunostimulation of tumor growth, evasion of immune function by the tumor, and the formation of a tumor "dormant state". Specifically, this model is used to describe the kinetics of growth and regression of the B-cell lymphoma BCL1 in the spleen of mice.
  // isDescribedBy pubmed:8186756
  // biomodels.db:MODEL1907230002 biomodels.db:BIOMD0000000762
  // isVersionOf mamo:MAMO_0000046
  // isVersionOf GO:0002424
  // hasProperty mamo:MAMO_0000046

  // Compartments:
  compartment compartment = 1;  // isVersionOf ncit:C94498

  // Species:
  species E in compartment = 320000; E is "Effector Cells";  // isVersionOf CL:0000911
  species T in compartment = 5000000; T is "Tumor Cells";  // isVersionOf ncit:C12922

  // Parameters:
  p = 0.1245;
  g = 20190000;
  m = 3.422e-10;
  n = 1.101e-7;
  d = 0.0412;
  s = 13000;
  a = 0.18;
  b = 2e-9;

  // Reactions:
  EC_Passive_Accumulation: => E; compartment*Constant_flux__irreversible(s);  // isVersionOf GO:0072683
  EC_Accumulation: => E; compartment*Function_for_EC_Accumulation(p, E, T, g);  // modifiers: T; isVersionOf GO:0072683
  Tumor_Growth: => T; compartment*Function_for_Tumor_Growth(a, T);  // isVersionOf ncit:C18081
  Tumor_Growth_Inhibition: T => ; compartment*Function_for_Tumor_Growth_Inhibition(a, b, T);  // isVersionOf ncit:C20751
  Tumor_Killing: T => ; compartment*Function_for_Tumor_Killing(n, E, T);  // modifiers: E
  EC_Tumor_Complex_Formation: E => ; compartment*Function_for_EC_Tumor_Complex_Formation(m, E, T);  // modifiers: T; isVersionOf GO:0090722
  EC_Elimination: E => ; compartment*d*E;

  // Unit definitions:
  unit volume = 1e-3 litre;
  unit time = 86400 second;
  unit substance = 1e-3 mole;
end
