// SBML level 2 version 4
// dcterms:bibliographicCitation: urn:miriam:doi:10.1080/23737867.2018.1465863

function Constant_flux__irreversible(v)
  v;
end
Constant_flux__irreversible is "Constant flux (irreversible)";

function Function_for_Tumor_Elimination(p, k, T_C, N)
  p*k*T_C*N;
end

function Function_for_T_Cytotoxic_Infiltration_Active(T_C, T_H)
  T_C*T_H;
end

function Function_for_T_Cytotoxic_Death(T_C)
  T_C;
end

function Function_for_T_Cytotoxic_Tumor_Infiltrate_Elimination(p, k, T_C, N)
  (1 - p)*k*T_C*N;
end

function Function_for_Tumor_Growth(gamma, N)
  gamma*(1 - N)*N;
end

function Function_for_T_Helper_Infiltration_Active(alpha, Ntilde, T_H, N)
  alpha*N*T_H/(Ntilde^2 + N^2);
end

model L2V4_Model_of_Dritschel2018___A_mathematical_model_of_cytotoxic_and_helper_T_cell_interactions_in_a_tumour_microenvironment()
  // Dritschel2018 - A mathematical model of cytotoxic and helper T cell interactions in a tumour microenvironment
  // This model examines the role of helper and cytotoxic T cells in an anti-tumour response, with implicit inclusions of immunosuppressive effects. The model demonstrates the dependence of immunoediting on infilftration by helper and cytotoxic T cells, as well as the importance of these cells in mediating tumour elimination.
  // isDescribedBy doi:10.1080/23737867.2018.1465863
  // isDerivedFrom pubmed:8186756
  // biomodels.db:MODEL1907230003 biomodels.db:BIOMD0000000763
  // isVersionOf mamo:MAMO_0000046
  // isVersionOf GO:0002424
  // hasProperty mamo:MAMO_0000046

  // Compartments:
  compartment compartment = 1;  // isVersionOf ncit:C94498

  // Species:
  species N_Tumour in compartment = 0.01;  // isVersionOf ncit:C12922
  species T_H in compartment = 0.6;  // isVersionOf CL:0000912
  species T_C in compartment = 4.5;  // isVersionOf CL:0000910

  // Parameters:
  gamma = 10;
  p = 0.5;
  k = 4.15;
  sigma_H = 0.5;
  alpha = 0.19;
  Ntilde = 0.04;
  delta_H = 1;
  sigma_C = 2;

  // Reactions:
  Tumor_Growth: => N_Tumour; compartment*Function_for_Tumor_Growth(gamma, N_Tumour);  // isVersionOf ncit:C18081
  Tumor_Elimination: N_Tumour => ; compartment*Function_for_Tumor_Elimination(p, k, T_C, N_Tumour);  // modifiers: T_C; isVersionOf ncit:C18246
  T_Helper_Infiltration_Passive: => T_H; compartment*Constant_flux__irreversible(sigma_H);  // isVersionOf GO:0035684
  T_Cytotoxic_Infiltration_Passive: => T_C; compartment*Constant_flux__irreversible(sigma_C);  // isVersionOf GO:0072683
  T_Cytotoxic_Infiltration_Active: => T_C; compartment*Function_for_T_Cytotoxic_Infiltration_Active(T_C, T_H);  // modifiers: T_H; isVersionOf GO:0072683
  T_Helper_Infiltration_Active: => T_H; compartment*Function_for_T_Helper_Infiltration_Active(alpha, Ntilde, T_H, N_Tumour);  // modifiers: N_Tumour; isVersionOf GO:0035684
  T_Cytotoxic_Death: T_C => ; compartment*Function_for_T_Cytotoxic_Death(T_C);  // isVersionOf GO:0008219
  T_Cytotoxic_Tumor_Infiltrate_Elimination: T_C => ; compartment*Function_for_T_Cytotoxic_Tumor_Infiltrate_Elimination(p, k, T_C, N_Tumour);  // modifiers: N_Tumour; isVersionOf GO:0008219
  T_Helper_Death: T_H => ; compartment*delta_H*T_H;  // isVersionOf GO:0008219

  // Unit definitions:
  unit volume = 1e-3 litre;
  unit time = 86400 second;
  unit substance = 1e-3 mole;
end
