// SBML level 2 version 4
// dcterms:bibliographicCitation: urn:miriam:doi:10.1002/wsbm.1447

model Park2019___IL7_receptor_signaling_in_T_cells()
  // Park2019 - IL7 receptor signaling in T cells
  // This model is an attempt to provide a mathematical description of IL-7 dependent T cell homeostasis at the molecular and cellular level, with inclusion of gamma-chain and ligand binding in the context of receptors for IL-7 and IL-15 receptors.
  // isDerivedFrom pubmed:18445337
  // biomodels.db:MODEL1908210001 biomodels.db:BIOMD0000000803
  // hasProperty GO:0043029
  // hasProperty mamo:MAMO_0000046
  // isDescribedBy doi:10.1002/wsbm.1447 pubmed:31137085

  // Compartments:
  compartment compartment = 1;  // CL:0000084

  // Species:
  species IL7Ra in compartment = 1000;  // ncit:C26278
  species IL15Rbeta in compartment = 1000;  // ncit:C26267
  species gamma_c in compartment = 100000;  // isVersionOf PR:P31785
  species IL7Ru in compartment = 0;  // orphanet:159734
  species IL15Ru in compartment = 0;  // ncit:C128303
  species IL7Rb in compartment = 0;  // isVersionOf GO:1905540
  species IL15Rb in compartment = 0;  // GO:1905543
  species IL7 in compartment = 6022.14;  // ncit:C20510
  species IL15 in compartment = 602.214;  // ncit:C20517

  // Parameters:
  rho = 100000;
  k_f_1 = 0.000166054;
  k_r_1 = 0.1;
  k_f_2 = 0.000166054;
  k_r_2 = 0.1;
  k_f_3 = 0.000166054;
  k_r_3 = 0.1;
  k_f_4 = 1.66054e-5;
  k_r_4 = 0.1;

  // Assignment rules:
  f_7 := IL7Rb/(IL7Rb + IL15Rb);

  // Reactions:
  IL7Ru_Formation: IL7Ra + gamma_c => IL7Ru; compartment*k_f_1*IL7Ra*gamma_c;  // isVersionOf GO:0032403
  IL7Ru_Dissociation: IL7Ru => IL7Ra + gamma_c; compartment*k_r_1*IL7Ru;
  IL15Ru_Formation: IL15Rbeta + gamma_c => IL15Ru; compartment*k_f_2*IL15Rbeta*gamma_c;  // isVersionOf GO:0032403
  IL15Ru_Dissociation: IL15Ru => IL15Rbeta + gamma_c; compartment*k_r_2*IL15Ru;
  IL7Rb_Formation: IL7 + IL7Ru => IL7Rb; compartment*k_f_3*IL7*IL7Ru;  // GO:0005139
  IL7Rb_Dissociation: IL7Rb => IL7 + IL7Ru; compartment*k_r_3*IL7Rb;
  IL15Rb_Formation: IL15 + IL15Ru => IL15Rb; compartment*k_f_4*IL15*IL15Ru;  // GO:0016170
  IL15Rb_Dissociation: IL15Rb => IL15 + IL15Ru; compartment*k_r_4*IL15Rb;

  // Unit definitions:
  unit time = 3600 second;
  unit substance = 1e-9 mole;
end
