// SBML level 2 version 4
// dcterms:bibliographicCitation: urn:miriam:pubmed:29351275

function Function_for_S_self_renewal(alpha_S, P_S, S)
  alpha_S*P_S*S;
end
Function_for_S_self_renewal is "Function for S self-renewal";

function Function_for_S_death(delta_S, S, gamma_S, phi_S)
  delta_S*S/(1 + gamma_S*phi_S);
end

function Function_for_amplified_S_differentiation(A_in, alpha_S, P_S, S)
  A_in*alpha_S*(1 - P_S)*S;
end

function Function_for_Progenitor_Cell_E_differentiation(alpha_E, E)
  alpha_E*E;
end

function Function_for_Progenitor_Cell_E_death(delta_E, E, gamma_E, phi_E)
  delta_E*E/(1 + gamma_E*phi_E);
end

function Function_for_Progenitor_Cell_E_differentiation_form_D(A_out, alpha_E, E)
  A_out*alpha_E*E;
end

function Function_for_Differentiated_cell_D_death(delta_D, D, gamma_D, phi_D)
  delta_D*D/(1 + gamma_D*phi_D);
end

function Function_for_IL6_binding_to_stem_cells(k_f, L, R_S)
  k_f*L*R_S;
end

function Function_for_IL6_dissociation_from_stem_cells(K_r, C_S)
  K_r*C_S;
end

function Function_for_IL6_binding_to_progenitor_cells(K_f, L, R_E)
  K_f*L*R_E;
end

function Function_for_IL6_dissociation_from_progenitor_cells(K_r, C_E)
  K_r*C_E;
end

function Function_for_IL6_binding_to_differentiated_cells(K_f, L, R_D)
  K_f*L*R_D;
end

function Function_for_IL6_dissociation_from_differentiated_cells(C_D, K_r)
  K_r*C_D;
end

function Function_for_IL6_natural_decay(lambda_L, L)
  lambda_L*L;
end

function Function_for_IL6_Production_by_tumor_cells(rho, S, E, D)
  rho*(S + E + D);
end

function Function_for_recycling_of_Receptor_S(K_p, C_S)
  K_p*C_S;
end

function Function_for_recycling_of_Receptor_E(K_P, C_E)
  K_P*C_E;
end

function Function_for_recycling_of_Receptor_D(K_p, C_D)
  K_p*C_D;
end

function Function_for_Generation_of_new_R_S_via_cell_proliferation(R_Ts, P_phiS)
  R_Ts*P_phiS;
end

function Function_for_Generation_of_new_R_E_via_cell_proliferation(R_Te, P_etaE)
  R_Te*P_etaE;
end

function Function_for_Generation_of_new_R_D_via_cell_proliferation(R_Td, P_DD)
  R_Td*P_DD;
end

function Function_for_Loss_of_RS_via_cell_death(R_S, R_Ts, D_phiS, C_S)
  R_S*R_Ts*D_phiS/(R_S + C_S);
end

function Function_for_Loss_of_RE_via_cell_death(R_E, R_Te, D_etaE, C_E)
  R_E*R_Te*D_etaE/(R_E + C_E);
end

function Function_for_Loss_of_RD_via_cell_death(R_D, R_Td, D_DD, C_D)
  R_D*R_Td*D_DD/(R_D + C_D);
end

function Function_for_Loss_of_C_S_via_cell_death(C_S, R_Ts, D_phiS, R_S)
  C_S*R_Ts*D_phiS/(R_S + C_S);
end

function Function_for_Loss_of_C_E_via_cell_death(C_E, R_Te, D_etaE, R_E)
  C_E*R_Te*D_etaE/(R_E + C_E);
end

function Function_for_Loss_of_C_D_via_cell_death(C_D, R_Td, D_DD, R_D)
  C_D*R_Td*D_DD/(R_D + C_D);
end

model New_Model()
  // Nazari2018 - IL6 mediated stem cell driven tumor growth and targeted treatment
  // This a model from the article: A mathematical model for IL-6-mediated, stem cell driven tumor growth and targeted treatment Fereshteh Nazari, Alexander T. Pearson, Jacques Eduardo Nor, Trachette L. Jackson. PloS Computational Biology, 2018 Jan. Abstract: Targeting key regulators of the cancer stem cell phenotype to overcome their critical influence on tumor growth is a promising new strategy for cancer treatment. Here we present a modeling framework that operates at both the cellular and molecular levels, for investigating IL-6 mediated, cancer stem cell driven tumor growth and targeted treatment with anti-IL6 antibodies. Our immediate goal is to quantify the influence of IL-6 on cancer stem cell self-renewal and survival, and to characterize the subsequent impact on tumor growth dynamics. By including the molecular details of IL-6 binding, we are able to quantify the temporal changes in fractional occupancies of bound receptors and their influence on tumor volume. There is a strong correlation between the model output and experimental data for primary tumor xenografts. We also used the model to predict tumor response to administration of the humanized IL-6R monoclonal antibody, tocilizumab (TCZ), and we found that as little as 1mg/kg of TCZ administered weekly for 7 weeks is sufficient to result in tumor reduction and a sustained deceleration of tumor growth. Author Summary: A small population of cancer stem cells that share many of the biological characteristics of normal adult stem cells are believed to initiate and sustain tumor growth for a wide variety of malignancies. Growth and survival of these cancer stem cells is highly influenced by tumor micro-environmental factors and molecular signaling initiated by cytokines and growth factors. This work focuses on quantifying the influence of IL-6, a pleiotropic cytokine secreted by a variety of cell types, on cancer stem cell self-renewal and survival. We present a mathematical model for IL-6 mediated, cancer stem cell driven tumor growth that operates at the following levels: (1) the molecular level—capturing cell surface dynamics of receptor-ligand binding and receptor activation that lead to intra-cellular signal transduction cascades; and (2) the cellular level—describing tumor growth, cellular composition, and response to treatments targeted against IL-6. This model originates from BioModels Database: A Database of Annotated Published Models (http://www.ebi.ac.uk/biomodels/). It is copyright (c) 2005-2011 The BioModels.net Team. For more information see the terms of use. To cite BioModels Database, please use: Li C, Donizelli M, Rodriguez N, Dharuri H, Endler L, Chelliah V, Li L, He E, Henry A, Stefan MI, Snoep JL, Hucka M, Le Novère N, Laibe C (2010) BioModels Database: An enhanced, curated and annotated resource for published quantitative kinetic models. BMC Syst Biol., 4:92.
  // biomodels.db:MODEL1909230001 biomodels.db:BIOMD0000000819
  // hasProperty efo:0000311
  // hasProperty efo:0000181
  // hasProperty ncit:C34447
  // hasProperty mamo:MAMO_0000046
  // hasProperty ncit:C20451

  // Compartments:
  compartment compartment = 1;  // isVersionOf ncit:C13413

  // Species:
  species Cancer_Stem_Cell_S in compartment = 1000;  // isVersionOf ncit:C34447; isVersionOf efo:0000181; isVersionOf ncit:C68706
  species IL_6__Cell_bound_IL_6R_complex_on_S in compartment = 0; IL_6__Cell_bound_IL_6R_complex_on_S is "IL-6, Cell bound IL-6R complex on S";  // isVersionOf ncit:C18106; isVersionOf uniprot:P05231; isVersionOf ncit:C20451; occursIn ncit:C68706
  species Progenitor_tumor_cell_E in compartment = 0.01;  // isVersionOf efo:0000181; isVersionOf ncit:C34447; isVersionOf ncit:C42609
  species Differentiated_tumor_cell_D in compartment = 0.01;  // isVersionOf efo:0000181; isVersionOf ncit:C34447; isVersionOf uniprot:P05231; isVersionOf efo:0002954
  species IL_6__Cell_bound_IL_6R_complex_on_E in compartment = 0; IL_6__Cell_bound_IL_6R_complex_on_E is "IL-6, Cell bound IL-6R complex on E";  // isVersionOf ncit:C20451; isVersionOf ncit:C18106; isVersionOf uniprot:P05231; occursIn ncit:C42609
  species IL_6__Cell_bound_IL_6R_complex_on_D in compartment = 0; IL_6__Cell_bound_IL_6R_complex_on_D is "IL-6, Cell bound IL-6R complex on D";  // isVersionOf ncit:C20451; isVersionOf uniprot:P05231; isVersionOf ncit:C18106; occursIn efo:0002954
  species IL_6__L in compartment = 0; IL_6__L is "IL-6 (L)";  // isVersionOf ncit:C20451
  species IL_6R_on_S in compartment = 1; IL_6R_on_S is "IL-6R on S";  // isVersionOf ncit:C18106; isVersionOf uniprot:P08887; isVersionOf ncit:C20451; occursIn ncit:C68706
  species IL_6R_on_E in compartment = 1; IL_6R_on_E is "IL-6R on E";  // isVersionOf ncit:C20451; isVersionOf ncit:C18106; isVersionOf uniprot:P08887; occursIn ncit:C42609
  species IL_6R_on_D in compartment = 1; IL_6R_on_D is "IL-6R on D";  // isVersionOf ncit:C20451; isVersionOf ncit:C18106; isVersionOf uniprot:P08887; occursIn efo:0002954
  species $tumor in compartment;

  // Parameters:
  alpha_S = 0.6 unit_0;
  R_Ts = 1.66e-6 unit_1;
  delta_S has unit_0;
  gamma_S = 2.38;
  A_in = 2;
  A_out = 2;
  alpha_E has unit_0;
  Pstar_Smin = 0.014;
  P_Smax = 0.9;
  delta_D = 0.0612 unit_0;
  delta_E = 0.0612 unit_0;
  n = 2.6;
  myu = 0.04;
  P_Ns = 728455;
  gamma_E = 2.38;
  gamma_D = 2.38;
  K_f = 2.35 unit_2;
  K_r = 2.24 unit_0;
  lambda = 0.4152 unit_0;
  rho = 7e-7 unit_3;
  K_p = 24.95 unit_0;

  // Assignment rules:
  tumor := Cancer_Stem_Cell_S + Differentiated_tumor_cell_D + Progenitor_tumor_cell_E;
  phi_S := IL_6__Cell_bound_IL_6R_complex_on_S/(R_Ts*Cancer_Stem_Cell_S);
  delta_S := 1.5*alpha_S*Pstar_Smin;
  alpha_E := ln(2)/1.04;
  R_Te := R_Ts/8;
  R_Td := R_Ts/8;
  phi_E := IL_6__Cell_bound_IL_6R_complex_on_E/(R_Te*Progenitor_tumor_cell_E);
  phi_D := IL_6__Cell_bound_IL_6R_complex_on_D/(R_Td*Differentiated_tumor_cell_D);
  P_Smin := myu*(P_Smax - Pstar_Smin)*phi_S + Pstar_Smin;
  P_S := (P_Smax - P_Smin)*P_Ns^n/(P_Ns^n + Cancer_Stem_Cell_S^n) + P_Smin;
  P_phiS := alpha_S*P_S*Cancer_Stem_Cell_S;
  P_etaE := A_in*alpha_S*(1 - P_S)*Cancer_Stem_Cell_S - alpha_E*Progenitor_tumor_cell_E;
  P_DD := A_out*alpha_E*Progenitor_tumor_cell_E;
  D_phiS := delta_S*Cancer_Stem_Cell_S/(1 + gamma_S*phi_S);
  D_etaE := delta_E*Progenitor_tumor_cell_E/(1 + gamma_E*phi_E);
  D_DD := delta_D*Differentiated_tumor_cell_D/(1 + gamma_D*phi_D);

  // Reactions:
  Cancer_Stem_cell_S_self_renewal: => Cancer_Stem_Cell_S; compartment*Function_for_S_self_renewal(alpha_S, P_S, Cancer_Stem_Cell_S); Cancer_Stem_cell_S_self_renewal is "Cancer Stem cell S self-renewal";  // isVersionOf GO:0017145
  Cancer_Stem_Cell_S_death: Cancer_Stem_Cell_S => ; compartment*Function_for_S_death(delta_S, Cancer_Stem_Cell_S, gamma_S, phi_S);  // isVersionOf GO:0008219
  Amplified_Stem_Cell_differentiation: => Progenitor_tumor_cell_E; compartment*Function_for_amplified_S_differentiation(A_in, alpha_S, P_S, Cancer_Stem_Cell_S);  // modifiers: Cancer_Stem_Cell_S; isVersionOf GO:0048863
  Progenitor_Cell_E_differentiation: Progenitor_tumor_cell_E => ; compartment*Function_for_Progenitor_Cell_E_differentiation(alpha_E, Progenitor_tumor_cell_E);  // isVersionOf GO:0048863
  Progenitor_Cell_E_death: Progenitor_tumor_cell_E => ; compartment*Function_for_Progenitor_Cell_E_death(delta_E, Progenitor_tumor_cell_E, gamma_E, phi_E);  // isVersionOf GO:0008219
  Progenitor_Cell_differentiation_form_D: => Differentiated_tumor_cell_D; compartment*Function_for_Progenitor_Cell_E_differentiation_form_D(A_out, alpha_E, Progenitor_tumor_cell_E);  // modifiers: Progenitor_tumor_cell_E; isVersionOf GO:0048863
  Differentiated_Cell_D_death: Differentiated_tumor_cell_D => ; compartment*Function_for_Differentiated_cell_D_death(delta_D, Differentiated_tumor_cell_D, gamma_D, phi_D);  // isVersionOf GO:0008219
  IL6_binding_to_stem_cells: IL_6__L + IL_6R_on_S => ; compartment*Function_for_IL6_binding_to_stem_cells(K_f, IL_6__L, IL_6R_on_S);  // isVersionOf GO:0019981
  IL6_dissociation_from_stem_cells: IL_6__Cell_bound_IL_6R_complex_on_S => IL_6__L + IL_6R_on_S; compartment*Function_for_IL6_dissociation_from_stem_cells(K_r, IL_6__Cell_bound_IL_6R_complex_on_S);
  IL6_binding_to_progenitor_cells: IL_6__L + IL_6R_on_E => ; compartment*Function_for_IL6_binding_to_progenitor_cells(K_f, IL_6__L, IL_6R_on_E);  // isVersionOf GO:0019981
  IL6_dissociation_from_progenitor_cells: IL_6__Cell_bound_IL_6R_complex_on_E => IL_6__L + IL_6R_on_E; compartment*Function_for_IL6_dissociation_from_progenitor_cells(K_r, IL_6__Cell_bound_IL_6R_complex_on_E);
  IL6_binding_to_differentiated_cells: IL_6__L + IL_6R_on_D => ; compartment*Function_for_IL6_binding_to_differentiated_cells(K_f, IL_6__L, IL_6R_on_D);  // isVersionOf GO:0019981
  IL6_dissociation_from_differentiated_cells: IL_6__Cell_bound_IL_6R_complex_on_D => IL_6__L + IL_6R_on_D; compartment*Function_for_IL6_dissociation_from_differentiated_cells(IL_6__Cell_bound_IL_6R_complex_on_D, K_r);
  IL6_natural_decay: IL_6__L => ; compartment*Function_for_IL6_natural_decay(lambda, IL_6__L);
  IL6_Production_by_tumor_cells: => IL_6__L; compartment*Function_for_IL6_Production_by_tumor_cells(rho, Cancer_Stem_Cell_S, Progenitor_tumor_cell_E, Differentiated_tumor_cell_D);  // modifiers: Cancer_Stem_Cell_S, Progenitor_tumor_cell_E, Differentiated_tumor_cell_D
  Recycling_of_Receptors_S: IL_6__Cell_bound_IL_6R_complex_on_S => IL_6R_on_S; compartment*Function_for_recycling_of_Receptor_S(K_p, IL_6__Cell_bound_IL_6R_complex_on_S);  // isVersionOf GO:0007049
  Recycling_of_Receptors_E: IL_6__Cell_bound_IL_6R_complex_on_E => IL_6R_on_E; compartment*Function_for_recycling_of_Receptor_E(K_p, IL_6__Cell_bound_IL_6R_complex_on_E);  // isVersionOf GO:0007049
  Recycling_of_Receptors_D: IL_6__Cell_bound_IL_6R_complex_on_D => IL_6R_on_D; compartment*Function_for_recycling_of_Receptor_D(K_p, IL_6__Cell_bound_IL_6R_complex_on_D);  // isVersionOf GO:0007049
  Generation_of_new_R_S_via_cell_proliferation: => IL_6R_on_S; compartment*Function_for_Generation_of_new_R_S_via_cell_proliferation(R_Ts, P_phiS);
  Generation_of_new_R_E_via_cell_proliferation: => IL_6R_on_E; compartment*Function_for_Generation_of_new_R_E_via_cell_proliferation(R_Te, P_etaE);
  Generation_of_new_R_D_via_cell_proliferation: => IL_6R_on_D; compartment*Function_for_Generation_of_new_R_D_via_cell_proliferation(R_Td, P_DD);
  Loss_of_Receptors_S__via_cell_death: IL_6R_on_S => ; compartment*Function_for_Loss_of_RS_via_cell_death(IL_6R_on_S, R_Ts, D_phiS, IL_6__Cell_bound_IL_6R_complex_on_S); Loss_of_Receptors_S__via_cell_death is "Loss of Receptors_S via cell death";  // modifiers: IL_6__Cell_bound_IL_6R_complex_on_S; isVersionOf GO:0008219
  Loss_of_Receptors_E_via_cell_death: IL_6R_on_E => ; compartment*Function_for_Loss_of_RE_via_cell_death(IL_6R_on_E, R_Te, D_etaE, IL_6__Cell_bound_IL_6R_complex_on_E);  // modifiers: IL_6__Cell_bound_IL_6R_complex_on_E; isVersionOf GO:0008219
  Loss_of_Receptors_D_via_cell_death: IL_6R_on_D => ; compartment*Function_for_Loss_of_RD_via_cell_death(IL_6R_on_D, R_Td, D_DD, IL_6__Cell_bound_IL_6R_complex_on_D);  // modifiers: IL_6__Cell_bound_IL_6R_complex_on_D; isPropertyOf GO:0008219
  Loss_of_C_S_via_cell_death: IL_6__Cell_bound_IL_6R_complex_on_S => ; compartment*Function_for_Loss_of_C_S_via_cell_death(IL_6__Cell_bound_IL_6R_complex_on_S, R_Ts, D_phiS, IL_6R_on_S);  // modifiers: IL_6R_on_S; isVersionOf GO:0008219
  Loss_of_C_E_via_cell_death: IL_6__Cell_bound_IL_6R_complex_on_E => ; compartment*Function_for_Loss_of_C_E_via_cell_death(IL_6__Cell_bound_IL_6R_complex_on_E, R_Te, D_etaE, IL_6R_on_E);  // modifiers: IL_6R_on_E; isVersionOf GO:0008219
  Loss_of_C_D_via_cell_death: IL_6__Cell_bound_IL_6R_complex_on_D => ; compartment*Function_for_Loss_of_C_D_via_cell_death(IL_6__Cell_bound_IL_6R_complex_on_D, R_Td, D_DD, IL_6R_on_D);  // modifiers: IL_6R_on_D; isVersionOf GO:0008219
  IL6_binding_to_R_S: => IL_6__Cell_bound_IL_6R_complex_on_S; compartment*Function_for_IL6_binding_to_stem_cells(K_f, IL_6__L, IL_6R_on_S);  // modifiers: IL_6__L, IL_6R_on_S; isVersionOf GO:0005138
  IL6_binding_to_R_E: => IL_6__Cell_bound_IL_6R_complex_on_E; compartment*Function_for_IL6_binding_to_progenitor_cells(K_f, IL_6__L, IL_6R_on_E);  // modifiers: IL_6__L, IL_6R_on_E; isVersionOf GO:0005138
  IL6_binding_to_R_D: => IL_6__Cell_bound_IL_6R_complex_on_D; compartment*Function_for_IL6_binding_to_differentiated_cells(K_f, IL_6__L, IL_6R_on_D);  // modifiers: IL_6__L, IL_6R_on_D; isVersionOf GO:0005138

  // Unit definitions:
  unit volume = 1e-3 litre;
  unit time = 86400 second;
  unit substance = 1e-15 mole;
  unit unit_0 = 1 / (8640 second); unit_0 is "1/d";
  unit unit_1 = 1e-15 mole; unit_1 is "fmol";
  unit unit_2 = 1 / (1e-15 mole * 8640 second); unit_2 is "1/(fmol*d)";
  unit unit_3 = 1e-15 mole / (8640 second); unit_3 is "fmol/d";
end
