// SBML level 2 version 4
// dcterms:bibliographicCitation: urn:miriam:pubmed:30824185

function EGFR_EGFR_formation_0(k_1, X_1, l_1, X_4)
  0.5*k_1*X_1^2 - l_1*X_4;
end
EGFR_EGFR_formation_0 is "EGFR/EGFR formation";

function ErbB3_ErbB3_formation_0(k_2, X_2, l_2, X_6)
  0.5*k_2*X_2^2 - l_2*X_6;
end
ErbB3_ErbB3_formation_0 is "ErbB3/ErbB3 formation";

function EGFR_ErbB3_formation_0(k_3, X_1, X_2, l_3, X_5)
  k_3*X_1*X_2 - l_3*X_5;
end
EGFR_ErbB3_formation_0 is "EGFR/ErbB3 formation";

function MET_MET_formation_0(k_4, X_3, l_4, X_7)
  0.5*k_4*X_3^2 - l_4*X_7;
end
MET_MET_formation_0 is "MET/MET formation";

function MET_MET_transformation_0(k_p1, X_7, l_p1, X_10)
  k_p1*X_7 - l_p1*X_10;
end
MET_MET_transformation_0 is "MET/MET transformation";

function Phosphorylation_1(k_p2, X_5, X_10)
  k_p2*X_5*X_10;
end

function Phosphorylation_2(k_p3, X_6, X_10)
  k_p3*X_6*X_10;
end

function gefitnib_1(l_p2, X_8)
  l_p2*X_8;
end

function gefitnib_2_0(l_p3, X_9)
  l_p3*X_9;
end

model New_Model()
  // Ito2019 - gefitnib resistance of lung adenocarcinoma caused by MET amplification
  // The model is based on publication: Mathematical analysis of gefitinib resistance of lung adenocarcinoma caused by MET amplification Abstract: Gefitinib, one of the tyrosine kinase inhibitors of epidermal growth factor receptor (EGFR), is effective for treating lung adenocarcinoma harboring EGFR mutation; but later, most cases acquire a resistance to gefitinib. One of the mechanisms conferring gefitinib resistance to lung adenocarcinoma is the amplification of the MET gene, which is observed in 5–22% of gefitinib-resistant tumors. A previous study suggested that MET amplification could cause gefitinib resistance by driving ErbB3-dependent activation of the PI3K pathway. In this study, we built a mathematical model of gefitinib resistance caused by MET amplification using lung adenocarcinoma HCC827-GR (gefitinib resistant) cells. The molecular reactions involved in gefitinib resistance consisted of dimerization and phosphorylation of three molecules, EGFR, ErbB3, and MET were described by a series of ordinary differential equations. To perform a computer simulation, we quantified each molecule on the cell surface using flow cytometry and estimated unknown parameters by dimensional analysis. Our simulation showed that the number of active ErbB3 molecules is around a hundred-fold smaller than that of active MET molecules. Limited contribution of ErbB3 in gefitinib resistance by MET amplification is also demonstrated using HCC827-GR cells in culture experiments. Our mathematical model provides a quantitative understanding of the molecular reactions underlying drug resistance.
  // biomodels.db:MODEL1909300001 biomodels.db:BIOMD0000000827
  // isPropertyOf mamo:MAMO_0000046
  // isPropertyOf efo:0000311
  // isDescribedBy pubmed:30824185
  // hasProperty mamo:MAMO_0000046
  // isDescribedBy pubmed:30824185

  // Compartments:
  compartment compartment = 1;  // isVersionOf ncit:C13413; isVersionOf ncit:C12468; isVersionOf efo:0003137

  // Species:
  species X_1_EGFR in compartment = 3.6e-12; X_1_EGFR is "X_1(EGFR)";  // isVersionOf CCO:1956
  species X_4_EGFR_EGFR in compartment = 0; X_4_EGFR_EGFR is "X_4(EGFR/EGFR)";  // isVersionOf ncit:C61517; isVersionOf CCO:1956
  species X_2_ErbB3 in compartment = 5.5e-14; X_2_ErbB3 is "X_2(ErbB3)";  // isVersionOf CCO:13867
  species X_6_ErbB3_ErbB3 in compartment = 0; X_6_ErbB3_ErbB3 is "X_6(ErbB3/ErbB3)";  // isVersionOf CCO:13867; isVersionOf ncit:C61517
  species X_5_EGFR_ErbB3 in compartment = 0; X_5_EGFR_ErbB3 is "X_5(EGFR/ErbB3)";  // isVersionOf ncit:C61517; isVersionOf CCO:1956; isVersionOf CCO:13867
  species X_3_MET in compartment = 7.4e-12; X_3_MET is "X_3(MET)";  // isVersionOf CCO:2065
  species X_7_MET_MET in compartment = 0; X_7_MET_MET is "X_7(MET/MET)";  // isVersionOf CHEBI:74707; isVersionOf ncit:C61517
  species X_10_p_MET_MET in compartment = 0; X_10_p_MET_MET is "X_10(p-MET/MET)";  // isVersionOf ncit:C61517; isVersionOf CHEBI:74707
  species X_8_p_EGFR_ErbB3 in compartment = 0; X_8_p_EGFR_ErbB3 is "X_8(p-EGFR/ErbB3)";  // isVersionOf CCO:13867; isVersionOf CCO:1956; isVersionOf ncit:C61517
  species X_9_p_ErbB3_ErbB3 in compartment = 0; X_9_p_ErbB3_ErbB3 is "X_9(p-ErbB3/ErbB3)";  // isVersionOf CCO:13867; isVersionOf ncit:C61517

  // Parameters:
  l_1 = 1.24;
  k_1 = 2.3e10;
  l_2 = 1.08;
  k_2 = 1.9e12;
  l_3 = 1;
  l_4 = 1;
  k_3 = 2.4e11;
  k_4 = 2.6e12;
  k_p1 = 0.045;
  k_p2 = 1e10;
  k_p3 = 1e10;
  l_p1 = 0.028;
  l_p2 = 0.028;
  l_p3 = 0.028;

  // Reactions:
  EGFR_EGFR_formation: 2 X_1_EGFR -> X_4_EGFR_EGFR; compartment*EGFR_EGFR_formation_0(k_1, X_1_EGFR, l_1, X_4_EGFR_EGFR); EGFR_EGFR_formation is "EGFR/EGFR formation";
  ErbB3_ErbB3_formation: 2 X_2_ErbB3 => X_6_ErbB3_ErbB3; compartment*ErbB3_ErbB3_formation_0(k_2, X_2_ErbB3, l_2, X_6_ErbB3_ErbB3); ErbB3_ErbB3_formation is "ErbB3/ErbB3 formation";
  EGFR_ErbB3_formation: X_1_EGFR + X_2_ErbB3 => X_5_EGFR_ErbB3; compartment*EGFR_ErbB3_formation_0(k_3, X_1_EGFR, X_2_ErbB3, l_3, X_5_EGFR_ErbB3); EGFR_ErbB3_formation is "EGFR/ErbB3 formation";
  MET_MET_formation: 2 X_3_MET => X_7_MET_MET; compartment*MET_MET_formation_0(k_4, X_3_MET, l_4, X_7_MET_MET); MET_MET_formation is "MET/MET formation";
  MET_MET_transformation: X_7_MET_MET => X_10_p_MET_MET; compartment*MET_MET_transformation_0(k_p1, X_7_MET_MET, l_p1, X_10_p_MET_MET); MET_MET_transformation is "MET/MET transformation";
  phosphorylation_1: X_10_p_MET_MET + X_5_EGFR_ErbB3 => X_10_p_MET_MET + X_8_p_EGFR_ErbB3; compartment*Phosphorylation_1(k_p2, X_5_EGFR_ErbB3, X_10_p_MET_MET);
  phosphorylation_2: X_10_p_MET_MET + X_6_ErbB3_ErbB3 => X_10_p_MET_MET + X_9_p_ErbB3_ErbB3; compartment*Phosphorylation_2(k_p3, X_6_ErbB3_ErbB3, X_10_p_MET_MET);
  gefitinib_1: X_8_p_EGFR_ErbB3 => X_5_EGFR_ErbB3; compartment*gefitnib_1(l_p2, X_8_p_EGFR_ErbB3);
  gefitnib_2: X_9_p_ErbB3_ErbB3 => X_6_ErbB3_ErbB3; compartment*gefitnib_2_0(l_p3, X_9_p_ErbB3_ErbB3);

  // Unit definitions:
  unit volume = 1e-3 litre;
  unit substance = 1e-3 mole;
end
