// SBML level 2 version 4
// dcterms:bibliographicCitation: urn:miriam:pubmed:30385313

function Constant_flux__irreversible(v)
  v;
end
Constant_flux__irreversible is "Constant flux (irreversible)";

function Function_for_miRNA_Activation_Transcription_Factor(beta_FM, gamma_FM, P, n)
  beta_FM/((gamma_FM/P)^n + 1);
end

function Function_for_TF_Protein_Translation(k_P, F)
  k_P*F;
end

model Dhawan2019___Endogenous_miRNA_sponges_mediate_the_generation_of_oscillatory_dynamics_for_a_non_coding_RNA_network()
  // Dhawan2019 - Endogenous miRNA sponges mediate the generation of oscillatory dynamics for a non-coding RNA network
  // This is a delay differential equation model showing how non-coding RNA, acting as microRNA (miRNA) sponges in a conserved RNA-transcription factor feedback motif, can five rise to oscillatory behaviour.
  // biomodels.db:MODEL1911010001 biomodels.db:BIOMD0000000841
  // hasProperty ncit:C25966
  // hasProperty mamo:MAMO_0000089
  // hasProperty biomodels.teddy:TEDDY_0000006
  // isDescribedBy pubmed:30385313
  // isDescribedBy pubmed:30385313

  // Compartments:
  compartment compartment = 1;  // CL:0000000

  // Species:
  species C in compartment = 0;  // isVersionOf ncit:C25966
  species M in compartment = 0;  // ncit:C25966
  species F in compartment = 0;  // ncit:C813
  species P in compartment = 0;  // ncit:C17207

  // Parameters:
  alpha_C = 1;
  delta_C = 0.01;
  alpha_F = 1;
  delta_F = 0.1;
  alpha_M = 1;
  delta_M = 1;
  k_P = 10;
  delta_P = 0.1;
  k_CM = 10;
  k_MF = 0.1;
  beta_FM = 200;
  gamma_FM = 100;
  n = 8;
  tau1 = 0.5;
  tau2 = 0.5;

  // Reactions:
  Sponge_Production_Basal: => C; compartment*Constant_flux__irreversible(alpha_C);  // isVersionOf ncit:C17208
  miRNA_Production_Basal: => M; compartment*Constant_flux__irreversible(alpha_M);  // ncit:C17208
  TF_mRNA_Production_Basal: => F; compartment*Constant_flux__irreversible(alpha_F);  // ncit:C17208
  Sponge_Degradation: C => ; compartment*delta_C*C;
  miRNA_Degradation: M => ; compartment*delta_M*M;
  TF_mRNA_Degradation: F => ; compartment*delta_F*F;
  Sponge_Inhibition_miRNA: M + C => ; compartment*k_CM*M*C;  // isVersionOf ncit:C42791
  TF_mRNA_Inhibition_miRNA: M + F => ; compartment*k_MF*M*F;  // isVersionOf ncit:C42791
  miRNA_Activation_Transcription_Factor: => M; compartment*Function_for_miRNA_Activation_Transcription_Factor(beta_FM, gamma_FM, delay(P, tau1), n);  // modifiers: P; isVersionOf ncit:C17208
  TF_Protein_Degradation: P => ; compartment*delta_P*P;
  TF_Protein_Translation: => P; compartment*Function_for_TF_Protein_Translation(k_P, delay(F, tau2));  // modifiers: F; GO:0006412

  // Unit definitions:
  unit volume = 1e-3 litre;
  unit time = 60 second;
  unit substance = item;
end
