// SBML level 2 version 4
// dcterms:bibliographicCitation: urn:miriam:pubmed:22735336

function Function_for_R_16(Hbarr1RP1, compartmentOne, k15)
  k15*Hbarr1RP1/compartmentOne;
end

function Function_for_R_21(HRbarr2, compartmentOne, k23)
  k23*HRbarr2/compartmentOne;
end

function Function_for_R_18(GRK56, HR, compartmentOne, k18)
  k18*GRK56*HR/compartmentOne;
end

function Function_for_R_24(ERK, HRbarr2, compartmentOne, k21)
  k21*ERK*HRbarr2/compartmentOne;
end

function Function_for_R_22(HRP2, barr2, compartmentOne, k20)
  k20*barr2*HRP2/compartmentOne;
end

function Function_for_R_19(HRP2, compartmentOne, k17)
  k17*HRP2/compartmentOne;
end

function Function_for_R_20(HR, barr2, compartmentOne, k19)
  k19*barr2*HR/compartmentOne;
end

function Function_for_R_23(Hbarr2RP2, compartmentOne, k24)
  k24*Hbarr2RP2/compartmentOne;
end

function Function_for_R_17(Hbarr2RP1, compartmentOne, k16)
  k16*Hbarr2RP1/compartmentOne;
end

function Function_for_R_26(bpERK, compartmentOne, k25)
  k25*bpERK/compartmentOne;
end

function Function_for_R_25(ERK, Hbarr2RP2, compartmentOne, k22)
  k22*ERK*Hbarr2RP2/compartmentOne;
end

function Function_for_R_2(G, HRP1, compartmentOne, k1)
  k1*G*HRP1/compartmentOne;
end

function Function_for_R_5(DAG, PKC, compartmentOne, k4)
  k4*DAG*PKC/compartmentOne;
end

function Function_for_R_1(G, compartmentOne, k0)
  k0*G/compartmentOne;
end

function Function_for_R_4(G_a, PIP2, compartmentOne, k3)
  k3*G_a*PIP2/compartmentOne;
end

function Function_for_R_6(ERK, PKC_a, compartmentOne, k5)
  k5*ERK*PKC_a/compartmentOne;
end

function Function_for_R_3(G, HR, compartmentOne, k2)
  k2*G*HR/compartmentOne;
end

function Function_for_R_10(GpERK, compartmentOne, k9)
  k9*GpERK/compartmentOne;
end

function Function_for_R_11(GRK23, HR, compartmentOne, k10)
  k10*GRK23*HR/compartmentOne;
end

function Function_for_R_12(HRP1, barr1, compartmentOne, k11)
  k11*barr1*HRP1/compartmentOne;
end

function Function_for_R_13(Hbarr1RP1, compartmentOne, k13)
  k13*Hbarr1RP1/compartmentOne;
end

function Function_for_R_14(HRP1, barr2, compartmentOne, k12)
  k12*barr2*HRP1/compartmentOne;
end

function Function_for_R_7(G_a, compartmentOne, k6)
  k6*G_a/compartmentOne;
end

function Function_for_R_8(DAG, compartmentOne, k7)
  k7*DAG/compartmentOne;
end

function Function_for_R_9(PKC_a, compartmentOne, k8)
  k8*PKC_a/compartmentOne;
end

function Function_for_R_15(Hbarr2RP1, compartmentOne, k14)
  k14*Hbarr2RP1/compartmentOne;
end

model Heitzler2012_GPCRsignalling()
  // Heitzler2012 - GPCR signalling
  // This model is from the article:
  // Competing G protein-coupled receptor kinases balance G protein and β-arrestin signaling
  // Heitzler D, Durand G, Gallay N, Rizk A, Ahn S, Kim J, Violin JD, Dupuy L, Gauthier C, Piketty V, Crépieux P, Poupon A, Clément F, Fages F, Lefkowitz RJ, Reiter E. Mol Syst Biol. 2012; 8: 590. 22735336 ,
  // Abstract:
  // Seven-transmembrane receptors (7TMRs) are involved in nearly all aspects of chemical communications and represent major drug targets. 7TMRs transmit their signals not only via heterotrimeric G proteins but also through β-arrestins, whose recruitment to the activated receptor is regulated by G protein-coupled receptor kinases (GRKs). In this paper, we combined experimental approaches with computational modeling to decipher the molecular mechanisms as well as the hidden dynamics governing extracellular signal-regulated kinase (ERK) activation by the angiotensin II type 1A receptor (AT(1A)R) in human embryonic kidney (HEK)293 cells. We built an abstracted ordinary differential equations (ODE)-based model that captured the available knowledge and experimental data. We inferred the unknown parameters by simultaneously fitting experimental data generated in both control and perturbed conditions. We demonstrate that, in addition to its well-established function in the desensitization of G-protein activation, GRK2 exerts a strong negative effect on β-arrestin-dependent signaling through its competition with GRK5 and 6 for receptor phosphorylation. Importantly, we experimentally confirmed the validity of this novel GRK2-dependent mechanism in both primary vascular smooth muscle cells naturally expressing the AT(1A)R, and HEK293 cells expressing other 7TMRs.
  // hasTaxon taxonomy:9606
  // isInstanceOf biomodels.db:MODEL1012080000 BTO:0000671 taxonomy:9606 GO:0007178
  // isInstanceOf GO:0038166
  // isDescribedBy GO:0007178 GO:0038166 pubmed:22735336
  // biomodels.db:MODEL1012080000 biomodels.db:BIOMD0000000842
  // biomodels.db:MODEL1012080000

  // Compartments:
  compartment compartmentOne = 1; compartmentOne is "Cell";  // hasProperty BTO:0002733

  // Species:
  species HR in compartmentOne = 0.08;  // hasPart uniprot:P01019; hasPart uniprot:P30556
  // G protein
  species G in compartmentOne = 56.99; G is "Gp";  // isVersionOf uniprot:P63092
  species ERK in compartmentOne = 4.243;  // isVersionOf uniprot:P27361
  species PIP2 in compartmentOne = 0.997;  // CHEBI:83417
  species DAG in compartmentOne = 0.009;  // isVersionOf CHEBI:17962
  species PKC in compartmentOne = 8.842;  // isVersionOf uniprot:P17252
  species PKC_a in compartmentOne = 0.002;  // isVersionOf uniprot:P17252; hasProperty PATO:0002354
  // G protein activated ERK
  species GpERK in compartmentOne = 0.015; GpERK is "Gp_pERK";  // isVersionOf uniprot:P27361; hasProperty PATO:0002220
  // beta arrestin activated ERK
  species bpERK in compartmentOne = 0.015; bpERK is "b_pERK";  // isVersionOf uniprot:P27361; hasProperty PATO:0002220
  species barr1 in compartmentOne = 0.858; barr1 is "b-arrestin1";  // uniprot:P49407
  species barr2 in compartmentOne = 0.483; barr2 is "b-arrestin2";  // hasVersion uniprot:P32121
  species G_a in compartmentOne = 0; G_a is "Gp_a";  // isVersionOf uniprot:P63092; hasProperty PATO:0002354
  species HRP1 in compartmentOne = 0; HRP1 is "HR-P1";  // hasPart uniprot:P30556; hasPart uniprot:P01019; hasProperty PATO:0002220
  species Hbarr1RP1 in compartmentOne = 0; Hbarr1RP1 is "HR-P1-b-arrestin1";  // hasPart uniprot:P30556; hasPart uniprot:P49407; hasPart uniprot:P01019; hasProperty PATO:0002220
  species Hbarr2RP1 in compartmentOne = 0; Hbarr2RP1 is "HR-P1-b-arrestin2";  // hasPart uniprot:P01019; hasPart uniprot:P30556; hasPart uniprot:P32121; hasProperty PATO:0002220
  species HRP2 in compartmentOne = 0; HRP2 is "HR-P2";  // hasPart uniprot:P01019; hasPart uniprot:P30556; hasProperty PATO:0002220
  species HRbarr2 in compartmentOne = 0; HRbarr2 is "HR_b-arrestin2";  // hasPart uniprot:P01019; hasPart uniprot:P30556; hasPart uniprot:P32121
  species Hbarr2RP2 in compartmentOne = 0; Hbarr2RP2 is "HR-P2-b-arrestin2";  // hasPart uniprot:P30556; hasPart uniprot:P01019; hasPart uniprot:P32121; hasProperty PATO:0002220
  species GRK2_3 in compartmentOne = 0.89944; GRK2_3 is "GRK2/3";  // hasProperty uniprot:P25098; hasProperty uniprot:P35626
  species GRK5_6 in compartmentOne = 1.518; GRK5_6 is "GRK5/6";  // hasProperty uniprot:P34947; hasProperty uniprot:P43250
  species $pERK in compartmentOne;  // isVersionOf uniprot:P27361; hasProperty PATO:0002220

  // Parameters:
  k0 = 0.000311;
  k1 = 0.0178;
  k2 = 7.6;
  k3 = 4.63;
  k4 = 0.0787;
  k5 = 2.65;
  k6 = 5.0985;
  k7 = 0.461;
  k8 = 1.77;
  k9 = 3.04;
  k10 = 2.27;
  k11 = 2.61;
  k12 = 2.59;
  k13 = 0.00619;
  k14 = 0.0311;
  k15 = 6.54e-5;
  k16 = 0.0723;
  k17 = 0.0665;
  k18 = 0.59;
  k19 = 0.205;
  k20 = 1.04;
  k21 = 0.00042;
  k22 = 14.44;
  k23 = 1.05;
  k24 = 0.347;
  k25 = 0.762;
  GRK23 = 0.899447579;
  GRK56 = 1.5180818;
  GRK23_si = 0.478865092;
  GRK56_si = 0.00103512491;
  P0_Ro = 0.00173556731;
  P0_a_Ro = 2.09075206e-5;
  barr2_0_si = 0.000112306963;
  nDAG = 4.11974423;
  nPKC = 7.20901786;

  // Assignment rules:
  pERK := GpERK + bpERK;

  // Reactions:
  Cons_Gp_activation: G => G_a; compartmentOne*Function_for_R_1(G, compartmentOne, k0);
  Gp_activation_HR_P1: G + HRP1 => G_a + HRP1; compartmentOne*Function_for_R_2(G, HRP1, compartmentOne, k1); Gp_activation_HR_P1 is "Gp activation HR-P1";
  Gp_activation_HR: G + HR => G_a + HR; compartmentOne*Function_for_R_3(G, HR, compartmentOne, k2);
  DAG_production: G_a + PIP2 => DAG + G_a; compartmentOne*Function_for_R_4(G_a, PIP2, compartmentOne, k3);
  PKC_activation_DAG: DAG + PKC => DAG + PKC_a; compartmentOne*Function_for_R_5(DAG, PKC, compartmentOne, k4);
  ERk_phosphorylation_PKC: ERK + PKC_a => GpERK + PKC_a; compartmentOne*Function_for_R_6(ERK, PKC_a, compartmentOne, k5);
  Gp_a_deactivation: G_a => G; compartmentOne*Function_for_R_7(G_a, compartmentOne, k6);  // hasProperty GO:0005085
  DAG_catalysis: DAG => PIP2; compartmentOne*Function_for_R_8(DAG, compartmentOne, k7);
  PKC_a_deactivation: PKC_a => PKC; compartmentOne*Function_for_R_9(PKC_a, compartmentOne, k8);  // isVersionOf GO:0042313
  G_pERK_dephosphorylation: GpERK => ERK; compartmentOne*Function_for_R_10(GpERK, compartmentOne, k9);
  HR_phosphorylation_GRK23: HR => HRP1; compartmentOne*Function_for_R_11(GRK23, HR, compartmentOne, k10);  // modifiers: GRK2_3
  b_arrestin1_HR_P1_binding: barr1 + HRP1 => Hbarr1RP1; compartmentOne*Function_for_R_12(HRP1, barr1, compartmentOne, k11); b_arrestin1_HR_P1_binding is "b-arrestin1 HR-P1 binding";  // hasProperty GO:0005515
  HR_P1_b_arrestin1_dissociation: Hbarr1RP1 => barr1 + HRP1; compartmentOne*Function_for_R_13(Hbarr1RP1, compartmentOne, k13); HR_P1_b_arrestin1_dissociation is "HR-P1-b-arrestin1 dissociation";
  b_arrestin2_HR_P1_binding: barr2 + HRP1 => Hbarr2RP1; compartmentOne*Function_for_R_14(HRP1, barr2, compartmentOne, k12); b_arrestin2_HR_P1_binding is "b-arrestin2 HR-P1 binding";  // hasProperty GO:0005515
  HR_P1_b_arrestin2_dissociation: Hbarr2RP1 => barr2 + HRP1; compartmentOne*Function_for_R_15(Hbarr2RP1, compartmentOne, k14); HR_P1_b_arrestin2_dissociation is "HR-P1-b-arrestin2 dissociation";
  HR_P1_b_arrestin1_dissociation_2: Hbarr1RP1 => barr1 + HR; compartmentOne*Function_for_R_16(Hbarr1RP1, compartmentOne, k15); HR_P1_b_arrestin1_dissociation_2 is "HR-P1-b-arrestin1 dissociation 2";
  HR_P1_b_arrestin2_dissociation_2: Hbarr2RP1 => barr2 + HR; compartmentOne*Function_for_R_17(Hbarr2RP1, compartmentOne, k16); HR_P1_b_arrestin2_dissociation_2 is "HR-P1-b-arrestin2 dissociation 2";
  HR_phosphorylation_GRK56: HR => HRP2; compartmentOne*Function_for_R_18(GRK56, HR, compartmentOne, k18);  // modifiers: GRK5_6
  HR_P2_dephosphorylation: HRP2 => HR; compartmentOne*Function_for_R_19(HRP2, compartmentOne, k17); HR_P2_dephosphorylation is "HR-P2 dephosphorylation";  // hasPart GO:0016311
  b_arrestin2_HR_binding: barr2 + HR => HRbarr2; compartmentOne*Function_for_R_20(HR, barr2, compartmentOne, k19); b_arrestin2_HR_binding is "b-arrestin2 HR binding";  // hasProperty GO:0005515
  HR_b_arrestin2_dissociation: HRbarr2 => barr2 + HR; compartmentOne*Function_for_R_21(HRbarr2, compartmentOne, k23); HR_b_arrestin2_dissociation is "HR_b-arrestin2 dissociation";
  b_arrestin2_HR_P2_binding: barr2 + HRP2 => Hbarr2RP2; compartmentOne*Function_for_R_22(HRP2, barr2, compartmentOne, k20); b_arrestin2_HR_P2_binding is "b-arrestin2 HR-P2 binding";  // hasPart GO:0005515
  HR_P2_b_arrestin2_dissociation: Hbarr2RP2 => barr2 + HRP2; compartmentOne*Function_for_R_23(Hbarr2RP2, compartmentOne, k24); HR_P2_b_arrestin2_dissociation is "HR-P2-b-arrestin2 dissociation";
  ERK_phosphorylation_1: ERK + HRbarr2 => bpERK + HRbarr2; compartmentOne*Function_for_R_24(ERK, HRbarr2, compartmentOne, k21);
  ERK_phosphorylation_2: ERK + Hbarr2RP2 => bpERK + Hbarr2RP2; compartmentOne*Function_for_R_25(ERK, Hbarr2RP2, compartmentOne, k22);
  b_pERK_dephosphorylation: bpERK => ERK; compartmentOne*Function_for_R_26(bpERK, compartmentOne, k25);  // hasProperty GO:0016311
end
