// SBML level 2 version 3
// dcterms:bibliographicCitation: Computer simulation models as a tool to investigate the role of microRNAs in osteoarthritis. urn:miriam:pubmed:29095952

function Function_for_miR_degradation(cell, kdegMiR, miR)
  kdegMiR*miR*cell/cell;
end

function Function_for_miR_gene_TF2_release(cell, krelTF2miRgene, miR_gene_TF2)
  krelTF2miRgene*miR_gene_TF2*cell/cell;
end

function Function_for_miR_gene_TF2_binding(TF2, cell, kbinTF2miRgene, miR_gene)
  kbinTF2miRgene*miR_gene*cell*TF2*cell/cell;
end

function Function_for_miR_gene_TF1_release(cell, krelTF1miRgene, miR_gene_TF1)
  krelTF1miRgene*miR_gene_TF1*cell/cell;
end

function Function_for_miR_gene_TF1_binding(TF1, cell, kbinTF1miRgene, miR_gene)
  kbinTF1miRgene*miR_gene*cell*TF1*cell/cell;
end

function Function_for_TF1_transcription(Signal, cell, ksynTF1mRNA)
  ksynTF1mRNA*Signal*cell/cell;
end

function Function_for_TF1_mRNA_degradation(TF1_mRNA, cell, kdegTF1mRNA)
  kdegTF1mRNA*TF1_mRNA*cell/cell;
end

function Function_for_TF1_mRNA_degradation_via_miR(TF1_mRNA, cell, kdegTF1mRNAbyMiR, miR)
  kdegTF1mRNAbyMiR*TF1_mRNA*cell*miR*cell/cell;
end

function Function_for_TF1_translation(TF1_mRNA, cell, ksynTF1)
  ksynTF1*TF1_mRNA*cell/cell;
end

function Function_for_TF1_degradation(TF1, cell, kdegTF1)
  kdegTF1*TF1*cell/cell;
end

function Function_for_miR_synthesis_2(cell, ksynMiR, miR_gene_TF2)
  ksynMiR*miR_gene_TF2*cell/cell;
end

model MODEL1610100000()
  // Proctor2017- Role of microRNAs in osteoarthritis (Positive Feedback By Micro RNA)
  // This model is described in the article:
  // Computer simulation models as a tool to investigate the role of microRNAs in osteoarthritis.
  // Proctor CJ, Smith GR.
  // PLoS ONE 2017; 12(11): e0187568
  // Abstract:
  // The aim of this study was to show how computational models can be used to increase our understanding of the role of microRNAs in osteoarthritis (OA) using miR-140 as an example. Bioinformatics analysis and experimental results from the literature were used to create and calibrate models of gene regulatory networks in OA involving miR-140 along with key regulators such as NF-?B, SMAD3, and RUNX2. The individual models were created with the modelling standard, Systems Biology Markup Language, and integrated to examine the overall effect of miR-140 on cartilage homeostasis. Down-regulation of miR-140 may have either detrimental or protective effects for cartilage, indicating that the role of miR-140 is complex. Studies of individual networks in isolation may therefore lead to different conclusions. This indicated the need to combine the five chosen individual networks involving miR-140 into an integrated model. This model suggests that the overall effect of miR-140 is to change the response to an IL-1 stimulus from a prolonged increase in matrix degrading enzymes to a pulse-like response so that cartilage degradation is temporary. Our current model can easily be modified and extended as more experimental data become available about the role of miR-140 in OA. In addition, networks of other microRNAs that are important in OA could be incorporated. A fully integrated model could not only aid our understanding of the mechanisms of microRNAs in ageing cartilage but could also provide a useful tool to investigate the effect of potential interventions to prevent cartilage loss.
  // This model is hosted on BioModels Database and identified by: MODEL1610100000.
  // To cite BioModels Database, please use: Chelliah V et al. BioModels: ten-year anniversary. Nucl. Acids Res. 2015, 43(Database issue):D542-8.
  // To the extent possible under law, all copyright and related or neighbouring rights to this encoded model have been dedicated to the public domain worldwide. Please refer to CC0 Public Domain Dedication for more information.
  // hasInstance biomodels.db:MODEL1610100000 taxonomy:9606 ncit:C25966
  // isDescribedBy ncit:C25966 pubmed:29095952
  // biomodels.db:MODEL1610100000 biomodels.db:BIOMD0000000862
  // biomodels.db:MODEL1610100000
  // hasProperty mamo:MAMO_0000046

  // Compartments:
  compartment cell = 1;

  // Species:
  species miR in cell = 1000/cell;
  species miR_gene in cell = 2/cell;
  species miR_gene_TF1 in cell = 0;
  species miR_gene_TF2 in cell = 0;
  species Signal in cell = 0;
  species TF1 in cell = 0;
  species TF1_mRNA in cell = 0;
  species TF2 in cell = 1000/cell;
  species $Sink in cell = 0;

  // Parameters:
  kbinTF1miRgene = 0.002;
  kbinTF2miRgene = 0.0001;
  kdegMiR = 0.0004;
  kdegTF1 = 1e-5;
  kdegTF1mRNA = 0.0001;
  kdegTF1mRNAbyMiR = 1e-6;
  krelTF1miRgene = 0.001;
  krelTF2miRgene = 0.001;
  ksynMiR = 0.2;
  ksynTF1 = 0.0003;
  ksynTF1mRNA = 0.01;

  // Reactions:
  miR_gene_TF1_binding: miR_gene + TF1 => miR_gene_TF1; cell*Function_for_miR_gene_TF1_binding(TF1, cell, kbinTF1miRgene, miR_gene);
  miR_gene_TF1_release: miR_gene_TF1 => miR_gene + TF1; cell*Function_for_miR_gene_TF1_release(cell, krelTF1miRgene, miR_gene_TF1);
  miR_gene_TF2_binding: miR_gene + TF2 => miR_gene_TF2; cell*Function_for_miR_gene_TF2_binding(TF2, cell, kbinTF2miRgene, miR_gene);
  miR_gene_TF2_release: miR_gene_TF2 => miR_gene + TF2; cell*Function_for_miR_gene_TF2_release(cell, krelTF2miRgene, miR_gene_TF2);
  miR_synthesis: miR_gene_TF2 => miR_gene_TF2 + miR; cell*Function_for_miR_synthesis_2(cell, ksynMiR, miR_gene_TF2);
  miR_degradation: miR => $Sink; cell*Function_for_miR_degradation(cell, kdegMiR, miR);
  TF1_transcription: Signal => Signal + TF1_mRNA; cell*Function_for_TF1_transcription(Signal, cell, ksynTF1mRNA);
  TF1_mRNA_degradation: TF1_mRNA => $Sink; cell*Function_for_TF1_mRNA_degradation(TF1_mRNA, cell, kdegTF1mRNA);
  TF1_mRNA_degradation_via_miR: TF1_mRNA + miR => miR; cell*Function_for_TF1_mRNA_degradation_via_miR(TF1_mRNA, cell, kdegTF1mRNAbyMiR, miR);
  TF1_translation: TF1_mRNA => TF1_mRNA + TF1; cell*Function_for_TF1_translation(TF1_mRNA, cell, ksynTF1);
  TF1_degradation: TF1 => $Sink; cell*Function_for_TF1_degradation(TF1, cell, kdegTF1);

  // Events:
  ActivateSignal: at (time > 3600): Signal = 100/cell;
  DeactivateSignal: at (time > 7200): Signal = 0/cell;

  // Unit definitions:
  unit substance = item;
end
