// SBML level 2 version 4
// dcterms:bibliographicCitation: Substrate complex competition is a regulatory motif that allows NFκB RelA to license but not amplify NFκB RelB. urn:miriam:pubmed:31048505

function MM_Kcat_1(Km, NIK, kcat, p100)
  NIK*kcat*p100/(Km + p100);
end

model New_Model()
  // Simon2019 - NIK-dependent p100 processing into p52, Michaelis-Menten, SBML 2v4
  // This model represents NIK-dependent p100 processing into p52 with Michaelis-Menten kinetics. While this model shows identical dose-response to the mass action representation, when IkBd degradation is included the dose-response is no-longer monotonic in mass action models due to substrate complex competition.
  // biomodels.db:MODEL1903280001 biomodels.db:BIOMD0000000866
  // biomodels.db:MODEL1903280001
  // hasProperty mamo:MAMO_0000046
  // isDescribedBy pubmed:31048505 doi:10.1073/pnas.1816000116

  // Compartments:
  compartment compartment = 1;

  // Species:
  species $p100t in compartment = 2.5;  // ensembl:ENSG00000077150
  species p100 in compartment = 0;  // uniprot:Q00653
  species p52 in compartment = 0;  // uniprot:Q00653
  species NIK in compartment = 10;  // uniprot:Q99558

  // Assignment rules:
  p52_uM := p52/1000;

  // Reactions:
  p100_mRNA_Expressions: $p100t => p100; compartment*p100_mRNA_Expressions_k1*p100t;  // hasProperty ncit:C18888
    p100_mRNA_Expressions_k1 = 0.2;
  p100_processing: p100 => p52; compartment*MM_Kcat_1(Km, NIK, kcat, p100);  // modifiers: NIK; hasProperty GO:0006397
    Km = 10; kcat = 0.05;
  p52_degradation: p52 => ; compartment*p52_degradation_k1*p52;  // hasProperty ncit:C61559
    p52_degradation_k1 = 0.00038;
  p100_degradation: p100 => ; compartment*p100_degradation_k1*p100;  // hasProperty ncit:C61559
    p100_degradation_k1 = 0.00038;

  // Unit definitions:
  unit volume = 1e-3 litre;
  unit substance = 1e-9 mole;
end
