// SBML level 2 version 4
// dcterms:bibliographicCitation: Substrate complex competition is a regulatory motif that allows NFκB RelA to license but not amplify NFκB RelB. urn:miriam:pubmed:31048505

model New_Model()
  // Simon2019 - NIK-dependent p100 processing into p52, Mass Action, SBML 2v4
  // This model represents NIK-dependent p100 processing into p52 with mass action kinetics. While this model shows identical dose-response to the Michaelis-Menten representation, when IkBd degradation is included the dose-response is no longer monotonic in mass action models due to substrate complex competition.
  // biomodels.db:MODEL1903280002 biomodels.db:BIOMD0000000868
  // biomodels.db:MODEL1903280002
  // hasProperty mamo:MAMO_0000046
  // isDescribedBy pubmed:31048505 doi:10.1073/pnas.1816000116

  // Compartments:
  compartment compartment = 1;

  // Species:
  species $p100t in compartment = 2.5;  // ensembl:ENSG00000077150
  species p100 in compartment = 0;  // uniprot:Q00653
  species p52 in compartment = 0;  // uniprot:Q00653
  species NIK in compartment = 10;  // uniprot:Q99558
  species p100_NIK in compartment = 0; p100_NIK is "p100:NIK";  // hasPart uniprot:Q99558; hasPart uniprot:Q00653

  // Assignment rules:
  p52_uM := p52/1000;

  // Reactions:
  p100_mRNA_Expressions: $p100t => p100; compartment*p100_mRNA_Expressions_k1*p100t;  // hasProperty ncit:C18888
    p100_mRNA_Expressions_k1 = 0.2;
  p100_processing: p100_NIK => p52 + NIK; compartment*p100_processing_k1*p100_NIK;  // hasProperty GO:0006397
    p100_processing_k1 = 0.05;
  p52_degradation: p52 => ; compartment*p52_degradation_k1*p52;  // hasProperty ncit:C61559
    p52_degradation_k1 = 0.00038;
  p100_degradation: p100 => ; compartment*p100_degradation_k1*p100;  // hasProperty ncit:C61559
    p100_degradation_k1 = 0.00038;
  p100_NIK_binding: p100 + NIK -> p100_NIK; compartment*(p100_NIK_binding_k1*p100*NIK - k2*p100_NIK);  // hasProperty GO:0003729
    p100_NIK_binding_k1 = 0.005; k2 = 0.00024;

  // Unit definitions:
  unit volume = 1e-3 litre;
  unit substance = 1e-9 mole;
end
