// SBML level 2 version 4
// dcterms:bibliographicCitation: Substrate complex competition is a regulatory motif that allows NFκB RelA to license but not amplify NFκB RelB. urn:miriam:pubmed:31048505

function MM_Kcat_1(Km, NIK, kcat, p100)
  NIK*kcat*p100/(Km + p100);
end

function MM_Kcat_2(IkBd, Km, NIK, kcat)
  NIK*kcat*IkBd/(Km + IkBd);
end

model New_Model()
  // Simon2019 - NIK-dependent p100 processing into p52 and IkBd degradation, Michaelis-Menten, SBML 2v4
  // This model represents NIK-dependent p100 processing into p52 and NIK-dependent IkBd degradation with Michaelis-Menten kinetics. Compare this Michaelis-Menten representation to the mass action model in which the dose-response to increasing p100 mRNA is no longer monotonic due to substrate complex competition.
  // biomodels.db:MODEL1904020002 biomodels.db:BIOMD0000000869
  // biomodels.db:MODEL1904020002
  // hasProperty mamo:MAMO_0000046
  // isDescribedBy pubmed:31048505 doi:10.1073/pnas.1816000116

  // Compartments:
  compartment compartment = 1;

  // Species:
  species $p100t in compartment = 2.5;  // ensembl:ENSG00000077150
  species p100 in compartment = 0;  // uniprot:Q00653
  species p52 in compartment = 0;  // uniprot:Q00653
  species NIK in compartment = 10;  // uniprot:Q99558
  species IkBd in compartment = 0;  // hasPart uniprot:Q00653

  // Assignment rules:
  p52_uM := p52/1000;
  IkBd_uM := IkBd/1000;

  // Reactions:
  p100_mRNA_Expressions: $p100t => p100; compartment*p100_mRNA_Expressions_k1*p100t;  // hasProperty ncit:C18888
    p100_mRNA_Expressions_k1 = 0.2;
  p100_processing: p100 => p52; compartment*MM_Kcat_1(p100_processing_Km, NIK, p100_processing_kcat, p100);  // modifiers: NIK; hasInstance GO:0006397
    p100_processing_Km = 10; p100_processing_kcat = 0.05;
  p52_degradation: p52 => ; compartment*p52_degradation_k1*p52;  // hasProperty ncit:C61559
    p52_degradation_k1 = 0.00038;
  p100_degradation: p100 => ; compartment*p100_degradation_k1*p100;  // hasProperty ncit:C61559
    p100_degradation_k1 = 0.00038;
  p100_dimerization: 2 p100 -> IkBd; compartment*(p100_dimerization_k1*p100^2 - k2*IkBd);  // hasProperty ncit:C97201
    p100_dimerization_k1 = 1.6e-5; k2 = 0.00024;
  IkBd_degradation: IkBd => ; compartment*IkBd_degradation_k1*IkBd;  // hasProperty ncit:C61559
    IkBd_degradation_k1 = 0.00038;
  IkBd_degradation_by_NIK: IkBd => ; compartment*MM_Kcat_2(IkBd, IkBd_degradation_by_NIK_Km, NIK, IkBd_degradation_by_NIK_kcat);  // modifiers: NIK; hasInstance ncit:C61559
    IkBd_degradation_by_NIK_Km = 10; IkBd_degradation_by_NIK_kcat = 0.05;

  // Unit definitions:
  unit volume = 1e-3 litre;
  unit substance = 1e-9 mole;
end
