// SBML level 2 version 4
// dcterms:bibliographicCitation: Dynamics of HIV infection of CD4+ T cells. http://identifiers.org/pubmed/8096155

function Function_for_production_of_CD4__T_cell(s, r, T)
  s + r*T;
end
Function_for_production_of_CD4__T_cell is "Function for production of CD4+ T cell";

function Function_for_death_of_CD4__T_cell(mu_T, k_1, V, T, r, T_1, T_2, T_max)
  mu_T*T + k_1*V*T + r*T*((T + T_1 + T_2)/T_max);
end
Function_for_death_of_CD4__T_cell is "Function for death of CD4+ T cell";

function Function_for_production_of_latently_infected_T_cell(k_1, V, T)
  k_1*V*T;
end

function Function_for_death_of_latently_infected_T_cell(mu_T, T_1, k_2)
  mu_T*T_1 + k_2*T_1;
end

function Function_for_production_of_actively_infected_T_cell(k_2, T_1)
  k_2*T_1;
end

function Function_for_death_of_Actively_infected_T_cell(mu_b, T_2)
  mu_b*T_2;
end

function Function_for_production_of_infectious_virus(N, mu_b, T_2)
  N*mu_b*T_2;
end

function Function_for_Death_of_Infectious_Virus_particle(k_1, V, T, mu_V)
  k_1*V*T + mu_V*V;
end

model Perelson1993_HIVinfection_CD4Tcells_ModelA()
  // Perelson1993 - HIVinfection_CD4Tcells_ModelA
  // This a model from the article:
  // Dynamics of HIV infection of CD4+ T cells.
  // Perelson AS, Kirschner DE, De Boer R. Math Biosci 1993 Mar;114(1):81-125 8096155 ,
  // Abstract:
  // We examine a model for the interaction of HIV with CD4+ T cells that considers four populations: uninfected T cells, latently infected T cells, actively infected T cells, and free virus. Using this model we show that many of the puzzling quantitative features of HIV infection can be explained simply. We also consider effects of AZT on viral growth and T-cell population dynamics. The model exhibits two steady states, an uninfected state in which no virus is present and an endemically infected state, in which virus and infected T cells are present. We show that if N, the number of infectious virions produced per actively infected T cell, is less a critical value, Ncrit, then the uninfected state is the only steady state in the nonnegative orthant, and this state is stable. For N > Ncrit, the uninfected state is unstable, and the endemically infected state can be either stable, or unstable and surrounded by a stable limit cycle. Using numerical bifurcation techniques we map out the parameter regimes of these various behaviors. oscillatory behavior seems to lie outside the region of biologically realistic parameter values. When the endemically infected state is stable, it is characterized by a reduced number of T cells compared with the uninfected state. Thus T-cell depletion occurs through the establishment of a new steady state. The dynamics of the establishment of this new steady state are examined both numerically and via the quasi-steady-state approximation. We develop approximations for the dynamics at early times in which the free virus rapidly binds to T cells, during an intermediate time scale in which the virus grows exponentially, and a third time scale on which viral growth slows and the endemically infected steady state is approached. Using the quasi-steady-state approximation the model can be simplified to two ordinary differential equations the summarize much of the dynamical behavior. We compute the level of T cells in the endemically infected state and show how that level varies with the parameters in the model. The model predicts that different viral strains, characterized by generating differing numbers of infective virions within infected T cells, can cause different amounts of T-cell depletion and generate depletion at different rates. Two versions of the model are studied. In one the source of T cells from precursors is constant, whereas in the other the source of T cells decreases with viral load, mimicking the infection and killing of T-cell precursors.(ABSTRACT TRUNCATED AT 400 WORDS)
  // This model was taken from the CellML repository and automatically converted to SBML.
  // The original model was: Perelson AS, Kirschner DE, De Boer R. (1993) - version=1.0
  // The original CellML model was created by:
  // Ethan Choi
  // mcho099@aucklanduni.ac.nz
  // The University of Auckland
  // This model originates from BioModels Database: A Database of Annotated Published Models (http://www.ebi.ac.uk/biomodels/). It is copyright (c) 2005-2011 The BioModels.net Team.
  // To the extent possible under law, all copyright and related or neighbouring rights to this encoded model have been dedicated to the public domain worldwide. Please refer to CC0 Public Domain Dedication for more information.
  // In summary, you are entitled to use this encoded model in absolutely any manner you deem suitable, verbatim, or with modification, alone or embedded it in a larger context, redistribute it, commercially or not, in a restricted way or not..
  // To cite BioModels Database, please use: Li C, Donizelli M, Rodriguez N, Dharuri H, Endler L, Chelliah V, Li L, He E, Henry A, Stefan MI, Snoep JL, Hucka M, Le Novère N, Laibe C (2010) BioModels Database: An enhanced, curated and annotated resource for published quantitative kinetic models. BMC Syst Biol., 4:92.
  // isDescribedBy pubmed:8096155
  // biomodels.db:MODEL1006230079 biomodels.db:BIOMD0000000874
  // biomodels.db:MODEL1006230079
  // isVersionOf efo:0000764
  // isVersionOf GO:0046718
  // occursIn BTO:0002417

  // Compartments:
  compartment COMpartment = 1;

  // Species:
  species T in COMpartment = 1000;  // hasProperty uniprot:P01730
  species T_1 in COMpartment = 0;  // hasProperty uniprot:P01730
  species T_2 in COMpartment = 0;  // hasProperty uniprot:P01730
  species V in COMpartment = 0.001;

  // Parameters:
  s = 10;
  r = 0.03;
  T_max = 1500;
  mu_T = 0.02;
  k_1 = 2.4e-5;
  k_2 = 0.003;
  mu_b = 0.24;
  mu_V = 2.4;
  N = 1000;

  // Assignment rules:
  T_tot := T + T_1 + T_2;

  // Reactions:
  Production_of_CD4__T_cell: => T; COMpartment*Function_for_production_of_CD4__T_cell(s, r, T); Production_of_CD4__T_cell is "Production of CD4+ T cell";
  Death_of_CD4__T_cell: T => ; COMpartment*Function_for_death_of_CD4__T_cell(mu_T, k_1, V, T, r, T_1, T_2, T_max); Death_of_CD4__T_cell is "Death of CD4+ T cell";  // modifiers: V, T_1, T_2
  Production_of_Latently_infected_T_cell: => T_1; COMpartment*Function_for_production_of_latently_infected_T_cell(k_1, V, T);  // modifiers: V, T
  Death_of_Latently_infected_T_cell: T_1 => ; COMpartment*Function_for_death_of_latently_infected_T_cell(mu_T, T_1, k_2);
  Production_of_Actively_infected_T_cell: => T_2; COMpartment*Function_for_production_of_actively_infected_T_cell(k_2, T_1);  // modifiers: T_1
  Death_of_Actively_infected_T_cell: T_2 => ; COMpartment*Function_for_death_of_Actively_infected_T_cell(mu_b, T_2);
  Production_of_infectious_virus_particle: => V; COMpartment*Function_for_production_of_infectious_virus(N, mu_b, T_2);  // modifiers: T_2
  Death_of_infectious_virus_particle: V => ; COMpartment*Function_for_Death_of_Infectious_Virus_particle(k_1, V, T, mu_V);  // modifiers: T

  // Unit definitions:
  unit time = 86400 second;
end
