// SBML level 2 version 4
// dcterms:bibliographicCitation: urn:miriam:pubmed:24814512

function Rate_Law_for_reaction_for_A(alpha_2, P, beta_2, I, mu_2, B, A, K_B)
  alpha_2*P - (beta_2*I + mu_2*(1 - B/K_B))*A;
end

function Rate_Law_for_reaction_for_B(g, B, K_B, alpha_4, I, beta_4, P, gamma, time)
  (g*(1 - B/K_B) + alpha_4*I - beta_4*P)*B + exp(-1*gamma*time);
end

function Rate_Law_for_reaction_for_I(alpha_3, P, rho_2, B, beta_3, A, mu_3, I)
  alpha_3*P + rho_2*B - (beta_3*A + mu_3)*I;
end

function Rate_Law_for_reaction_for_P(alpha_1, I, rho_1, B, P, beta_1, A, mu_1, K_B)
  (alpha_1*I + rho_1*B)*(1 - P) - (beta_1*A + mu_1*(1 - B/K_B))*P;
end

model Jarrett2015___Modelling_the_interaction_between_immune_response__bacterial_dynamics_and_inflammatory_damage()
  // Jarrett2015 - Modelling the interaction between immune response, bacterial dynamics and inflammatory damage
  // biomodels.db:MODEL1803200002 biomodels.db:BIOMD0000000920
  // biomodels.db:MODEL1803200002
  // isVersionOf GO:0050727
  // hasTaxon taxonomy:10090
  // isDescribedBy pubmed:24814512
  // hasProperty efo:0005681 efo:0000602 mamo:MAMO_0000046

  // Compartments:
  compartment BALB_c_Mouse = 1; BALB_c_Mouse is "BALB/c Mouse";  // hasProperty efo:0000602; hasProperty efo:0000602

  // Species:
  species anti_inflammatory__A in BALB_c_Mouse = 3; anti_inflammatory__A is "anti-inflammatory (A)";  // hasProperty BTO:0004520
  species inflammation__I in BALB_c_Mouse = 1; inflammation__I is "inflammation (I)";  // isVersionOf ncit:C3137
  species bacterial_infection__B in BALB_c_Mouse = 1; bacterial_infection__B is "bacterial infection (B)";  // isVersionOf efo:0005681
  species pro_inflammatory__P in BALB_c_Mouse = 1; pro_inflammatory__P is "pro-inflammatory (P)";  // isVersionOf GO:0006954; hasProperty BTO:0005655; hasProperty BTO:0001678

  // Parameters:
  alpha_1 = 0.27;
  rho_1 = 0.2;
  beta_1 = 0.01;
  mu_1 = 0.12;
  K_B = 1;  // encodes ncit:C25443
  alpha_2 = 0.11;
  beta_2 = 0.135;
  mu_2 = 0.25;
  alpha_3 = 1.05;
  beta_3 = 2;
  rho_2 = 0.45;
  mu_3 = 0.0174;
  g = 0.9;
  alpha_4 = 1.5;
  beta_4 = 5;  // encodes GO:0006925
  gamma = 0.01;

  // Reactions:
  reaction_for_A: => anti_inflammatory__A; BALB_c_Mouse*Rate_Law_for_reaction_for_A(alpha_2, pro_inflammatory__P, beta_2, inflammation__I, mu_2, bacterial_infection__B, anti_inflammatory__A, K_B);  // modifiers: pro_inflammatory__P, inflammation__I, bacterial_infection__B; isVersionOf GO:0006954; hasProperty GO:0050728
  reaction_For_I: => inflammation__I; BALB_c_Mouse*Rate_Law_for_reaction_for_I(alpha_3, pro_inflammatory__P, rho_2, bacterial_infection__B, beta_3, anti_inflammatory__A, mu_3, inflammation__I);  // modifiers: pro_inflammatory__P, bacterial_infection__B, anti_inflammatory__A; hasProperty ncit:C3137
  reaction_for_B: => bacterial_infection__B; BALB_c_Mouse*Rate_Law_for_reaction_for_B(g, bacterial_infection__B, K_B, alpha_4, inflammation__I, beta_4, pro_inflammatory__P, gamma, time);  // modifiers: inflammation__I, pro_inflammatory__P; hasProperty ncit:C2890
  reaction_For_P: => pro_inflammatory__P; BALB_c_Mouse*Rate_Law_for_reaction_for_P(alpha_1, inflammation__I, rho_1, bacterial_infection__B, pro_inflammatory__P, beta_1, anti_inflammatory__A, mu_1, K_B);  // modifiers: inflammation__I, bacterial_infection__B, anti_inflammatory__A; hasProperty GO:0050729

  // Unit definitions:
  unit volume = 1e-3 litre;
  unit time = 3600 second;
  unit substance = item;
end
