// SBML level 2 version 4
// dcterms:bibliographicCitation: urn:miriam:pubmed:29410878

function Rate_Law_for_reaction_auxin_induction(Sauxin, auxin, Tauxin)
  Sauxin - auxin/Tauxin;
end

function Rate_Law_for_reaction_synthesis_of_IAA_along_with_natural_decay_of_IAA(SIAA, IAA, TIAA)
  SIAA - IAA/TIAA;
end

function Rate_Law_for_reaction_synthesis_of_ARF_along_with_natural_decay_of_ARF(SARF, ARF, TARF)
  SARF - ARF/TARF;
end

function Rate_Law_for_reaction_natural_decay_of_IAA(alpha, auxin, IAA)
  alpha*auxin*IAA;
end

function Rate_Law_for_reaction_for__natural_decay_of_ARF(beta, IAA, ARF)
  beta*IAA*ARF;
end
Rate_Law_for_reaction_for__natural_decay_of_ARF is "Rate Law for reaction for natural decay of ARF";

model Grigolon2018_Responses_to_auxin_signals()
  // Grigolon2018-Responses to auxin signals
  // Plants depend on the signalling of the phytohormone auxin for their development and for responding to environmental perturbations. The associated biomolecular signalling network involves a negative feedback on Aux/IAA proteins which mediate the influence of auxin (the signal) on the auxin response factor (ARF) transcription factors (the drivers of the response). To probe the role of this feedback, we consider alternative in silico signalling networks implementing different operating principles. By a comparative analysis, we find that the presence of a negative feedback allows the system to have a far larger sensitivity in its dynamical response to auxin and that this sensitivity does not prevent the system from being highly resilient. Given this insight, we build a new biomolecular signalling model for quantitatively describing such Aux/IAA and ARF responses.
  // biomodels.db:MODEL1706070000 biomodels.db:BIOMD0000000927
  // occursIn BTO:0001481
  // hasTaxon taxonomy:47299
  // isDescribedBy pubmed:29410878
  // hasProperty CHEBI:26158 omit:0011910 mamo:MAMO_0000046
  // isDescribedBy pubmed:29410878

  // Compartments:
  compartment compartment = 1;

  // Species:
  species auxin in compartment = 0.2;  // hasProperty efo:0005900
  species IAA in compartment = 0.03333;  // hasProperty CHEBI:16411
  species ARF in compartment = 49.99;  // hasProperty PR:000028506

  // Parameters:
  Tauxin = 10;
  TIAA = 333;
  TARF = 2;
  alpha_no_reg = 0.05;
  alpha_reg = 150;
  SIAA = 1;
  SARF = 25;
  beta = 0.003;
  Sauxin = 0.02;

  // Reactions:
  reaction_for_auxin_induction: => auxin; compartment*Rate_Law_for_reaction_auxin_induction(Sauxin, auxin, Tauxin);  // hasProperty EO:0007074
  reaction_for_synthesis_of_IAA_along_with_natural_decay_of_IAA: => IAA; compartment*Rate_Law_for_reaction_synthesis_of_IAA_along_with_natural_decay_of_IAA(SIAA, IAA, TIAA);  // hasProperty ncit:C75947; hasProperty ncit:C61367
  reaction_for_synthesis_of_ARF_along_with_natural_decay_of_ARF: => ARF; compartment*Rate_Law_for_reaction_synthesis_of_ARF_along_with_natural_decay_of_ARF(SARF, ARF, TARF);  // hasProperty ncit:C61367
  reaction_for__natural_decay_of_ARF: ARF => ; compartment*Rate_Law_for_reaction_for__natural_decay_of_ARF(beta, IAA, ARF); reaction_for__natural_decay_of_ARF is "reaction for natural decay of ARF";  // modifiers: IAA; hasProperty ncit:C75947
  reaction_natural_decay_of_IAA: IAA => ; compartment*Rate_Law_for_reaction_natural_decay_of_IAA(alpha_no_reg, auxin, IAA);  // modifiers: auxin; hasProperty ncit:C75947

  // Unit definitions:
  unit volume = 1e-3 litre;
  unit substance = 1e-3 mole;
end
