// SBML level 2 version 4
// dcterms:bibliographicCitation: urn:miriam:pubmed:17189866

function Constant_flux__irreversible(v)
  v;
end
Constant_flux__irreversible is "Constant flux (irreversible)";

function Function_modifier_substrate(k, modifier, substrate)
  k*modifier*substrate;
end

function Function_Michaelis_Menten_Rate_Law(k, E, S1, S2, Km)
  k*E*(S1 - S2)/(Km + S1 - S2);
end

function Function_Michaelis_Menten_Rate_Law_v2(k, E, S, Km)
  k*E*S/(Km + S);
end

model Sible2007___Mitotic_cell_cycle_mecanism_in_Xenopus_Laevis()
  // Sible2007 - Mitotic cell cycle mecanism in Xenopus Laevis
  // Although not a traditional experimental "method," mathematical modeling can provide a powerful approach for investigating complex cell signaling networks, such as those that regulate the eukaryotic cell division cycle. We describe here one modeling approach based on expressing the rates of biochemical reactions in terms of nonlinear ordinary differential equations. We discuss the steps and challenges in assigning numerical values to model parameters and the importance of experimental testing of a mathematical model. We illustrate this approach throughout with the simple and well-characterized example of mitotic cell cycles in frog egg extracts. To facilitate new modeling efforts, we describe several publicly available modeling environments, each with a collection of integrated programs for mathematical modeling. This review is intended to justify the place of mathematical modeling as a standard method for studying molecular regulatory networks and to guide the non-expert to initiate modeling projects in order to gain a systems-level perspective for complex control systems.
  // biomodels.db:MODEL1809060005 biomodels.db:BIOMD0000000942
  // hasPart GO:0051726
  // hasTaxon taxonomy:8355
  // isDescribedBy pubmed:17189866
  // hasProperty mamo:MAMO_0000046
  // isDescribedBy pubmed:17189866

  // Compartments:
  compartment nuclear = 1;  // ncit:C13361

  // Species:
  species $Cdc25 in nuclear;  // isVersionOf uniprot:P30309
  species Cdc25_phosphorylated in nuclear = 0;  // isVersionOf uniprot:P30309; hasProperty PATO:0002220
  species Cyclin_Cdk1_MPF in nuclear = 0;  // hasPart uniprot:P13350; hasPart uniprot:P35567
  species Cyclin_Cdk1_preMPF in nuclear = 0;  // hasPart uniprot:P13350; hasPart uniprot:P35567; hasProperty PATO:0002220
  species $Wee1 in nuclear;  // isVersionOf uniprot:Q8QGV2
  species Wee1_phosphorylated in nuclear = 0;  // isVersionOf uniprot:Q8QGV2; hasProperty PATO:0002220
  // Cyclin B is mentionned is the publication as part of a referenced experiment
  species Cyclin in nuclear = 0;  // isVersionOf uniprot:P13350
  species $Cdk1 in nuclear;  // isVersionOf uniprot:P35567
  species $IE in nuclear;
  species IE_phosphorylated in nuclear = 1;  // hasProperty PATO:0002220
  species APC_active in nuclear = 1;  // uniprot:P70039; hasProperty PATO:0002354
  species $Cdk1_total in nuclear = 100;  // isVersionOf uniprot:P35567
  species $Cdc25_total in nuclear = 1;  // isVersionOf uniprot:P30309
  species $Wee1_total in nuclear = 1;  // isVersionOf uniprot:Q8QGV2
  species $IE_total in nuclear = 1;
  species $APC_total in nuclear = 1;  // isVersionOf uniprot:P70039
  species $ppase in nuclear = 1;
  species $Cyclin_total in nuclear;  // isVersionOf uniprot:P13350

  // Parameters:
  k1 = 1;
  v2 = 0.005; v2 is "v2_";
  v2_ = 0.25; v2_ is "v2__";
  k3 = 0.005;
  v25 = 0.017; v25 is "v25_";
  v25_ = 0.17; v25_ is "v25__";
  vwee = 0.01; vwee is "vwee_";
  vwee_ = 1; vwee_ is "vwee__";
  ka = 0.02;
  KKa = 0.1;
  kb = 0.1;
  KKb = 1;
  kc = 0.13;
  KKc = 0.01;
  kd = 0.13;
  KKd = 1;
  ke = 0.02;
  KKe = 0.1;
  kf = 0.1;
  KKf = 1;
  kg = 0.02;
  KKg = 0.01;
  kh = 0.15;
  KKh = 0.01;

  // Assignment rules:
  Wee1 := Wee1_total - Wee1_phosphorylated;
  Cdk1 := Cdk1_total;
  IE := IE_total - IE_phosphorylated;
  Cdc25 := Cdc25_total - Cdc25_phosphorylated;
  Cyclin_total := Cyclin_Cdk1_MPF + Cyclin_Cdk1_preMPF + Cyclin;
  kwee := vwee*Wee1_phosphorylated + vwee_*(Wee1_total - Wee1_phosphorylated);
  k25 := v25*(Cdc25_total - Cdc25_phosphorylated) + v25_*Cdc25_phosphorylated;
  k2 := v2*(APC_total - APC_active) + v2_*APC_active;

  // Reactions:
  R1_Dephosphorylation: Cdc25_phosphorylated => ; nuclear*Function_Michaelis_Menten_Rate_Law_v2(kb, ppase, Cdc25_phosphorylated, KKb);  // modifiers: ppase; GO:0006470
  R2_Phosphorylation: => Cdc25_phosphorylated; nuclear*Function_Michaelis_Menten_Rate_Law(ka, Cyclin_Cdk1_MPF, Cdc25_total, Cdc25_phosphorylated, KKa);  // modifiers: Cyclin_Cdk1_MPF, Cdc25_total; isVersionOf GO:0006468
  R3_Dephosphorylation: Cyclin_Cdk1_preMPF => Cyclin_Cdk1_MPF; nuclear*k25*Cyclin_Cdk1_preMPF;  // modifiers: Cdc25_phosphorylated; GO:0006470
  R4_Phosphorylation: Cyclin_Cdk1_MPF => Cyclin_Cdk1_preMPF; nuclear*kwee*Cyclin_Cdk1_MPF;  // modifiers: Wee1; isVersionOf GO:0006468
  R5_Dephosphorylation: Wee1_phosphorylated => ; nuclear*Function_Michaelis_Menten_Rate_Law_v2(kf, ppase, Wee1_phosphorylated, KKf);  // modifiers: ppase; GO:0006470
  R6_Phosphorylation: => Wee1_phosphorylated; nuclear*Function_Michaelis_Menten_Rate_Law(ke, Cyclin_Cdk1_MPF, Wee1_total, Wee1_phosphorylated, KKe);  // modifiers: Cyclin_Cdk1_MPF, Wee1_total; isVersionOf GO:0006468
  R7_Protein_Complex__Formation_by_binding: Cyclin => Cyclin_Cdk1_MPF; nuclear*Function_modifier_substrate(k3, Cdk1, Cyclin); R7_Protein_Complex__Formation_by_binding is "R7 Protein Complex Formation by binding";  // modifiers: Cdk1
  R8_Synthesis: => Cyclin; nuclear*Constant_flux__irreversible(k1);  // ncit:C61408
  R9_Dephosphorylation: IE_phosphorylated => ; nuclear*Function_Michaelis_Menten_Rate_Law_v2(kh, ppase, IE_phosphorylated, KKh);  // modifiers: ppase; GO:0006470
  R10_Phosphorylation: => IE_phosphorylated; nuclear*Function_Michaelis_Menten_Rate_Law(kg, Cyclin_Cdk1_MPF, IE_total, IE_phosphorylated, KKg);  // modifiers: Cyclin_Cdk1_MPF, IE_total; GO:0006468
  R11_Inactivation: APC_active => ; nuclear*Function_Michaelis_Menten_Rate_Law_v2(kd, ppase, APC_active, KKd);  // modifiers: ppase
  R12_Activation: => APC_active; nuclear*Function_Michaelis_Menten_Rate_Law(kc, IE_phosphorylated, APC_total, APC_active, KKc);  // modifiers: IE_phosphorylated, APC_total
  R13_Degradation: Cyclin_Cdk1_MPF => ; nuclear*k2*Cyclin_Cdk1_MPF;
  R14_Degradation: Cyclin => ; nuclear*k2*Cyclin;
  R15_Degradation: Cyclin_Cdk1_preMPF => ; nuclear*k2*Cyclin_Cdk1_preMPF;

  // Unit definitions:
  unit volume = 1e-3 litre;
  unit time = 60 second;
  unit substance = 1e-3 mole;
end
