// SBML level 2 version 4
// dcterms:bibliographicCitation: urn:miriam:doi:10.1002/acs.856
// dcterms:bibliographicCitation: urn:miriam:pubmed:15094319

model Evans2005___Compartmental_model_for_antineoplastic_drug_topotecan_in_breast_cancer_cells()
  // Evans2005 - Compartmental model for antineoplastic drug topotecan in breast cancer cells
  // Compartment model for the antineoplastic drug topotecan. Modelling drug in its active lactone and inactive hydroxy acid forms in the medium, extracellular, cytoplasm and nucleus.
  // biomodels.db:MODEL1805210001 biomodels.db:BIOMD0000000946
  // hasPart CHEBI:63632
  // hasPart CHEBI:70727
  // isVersionOf PW:0002367
  // occursIn BTO:0000093
  // hasTaxon taxonomy:9606

  // Compartments:
  compartment breast_cancer_cell = 1;  // isVersionOf BTO:0000093

  // Species:
  species $L_m in breast_cancer_cell = (1 + v0)*D;  // hasPart CHEBI:25000; isVersionOf kegg.compound:C11158; occursIn BTO:0000316; hasProperty CHEBI:35610
  species $H_m in breast_cancer_cell = 0;  // hasPart CHEBI:35868; isVersionOf kegg.compound:C11158; occursIn BTO:0000316; hasProperty PATO:0002355
  species $L_e in breast_cancer_cell = 0;  // hasPart CHEBI:25000; isVersionOf kegg.compound:C11158; occursIn GO:0005576; hasProperty CHEBI:35610
  species $H_e in breast_cancer_cell = 0;  // hasPart CHEBI:35868; isVersionOf kegg.compound:C11158; occursIn GO:0005576; hasProperty PATO:0002355
  species $L_c in breast_cancer_cell = 0;  // hasPart CHEBI:25000; isVersionOf kegg.compound:C11158; occursIn GO:0005737; hasProperty CHEBI:35610
  species $H_c in breast_cancer_cell = 0;  // hasPart CHEBI:35868; isVersionOf kegg.compound:C11158; occursIn GO:0005737; hasProperty PATO:0002355
  species $L_n in breast_cancer_cell = 0;  // hasPart CHEBI:25000; hasPart CHEBI:16991; isVersionOf kegg.compound:C11158; isVersionOf GO:0065004

  // Parameters:
  k_mi = 1.3974e-6;
  k_mo = 0.085551;
  k_i = 0.02211;
  k_e = 0.0078915;  // encodes GO:0015562
  k_b = 0.00038085;  // encodes GO:0005488
  k_dl = 0.055522;
  k_dh = 1.5639e-7;
  B_T = 89.972;
  V_c = 829;
  V_n = 326;
  v0 = 1.5045e-5;
  D = 10;  // isVersionOf EFO:0000428
  k_om = 0.00015599;
  k_cm = 0.00029553;
  alpha = 24125;
  k_oc = 0.00012913;  // isDescribedBy pubmed:15094319
  k_cc = 0.00031578;  // isDescribedBy pubmed:15094319

  // Assignment rules:
  V_e := 2000000000000*v0/(1 + v0);
  V_m := 2000000000000 - V_e;
  v1 := alpha*v0/(1 + v0);
  v2 := V_n/V_c;

  // Rate rules:
  L_m' = -(k_om + k_mi)*L_m + k_cm*H_m + k_mo*v0*L_e;
  H_m' = k_om*L_m - (k_cm + k_mi)*H_m + k_mo*v0*H_e;
  L_e' = k_mi/v0*L_m - (k_mo + k_om + k_i)*L_e + k_cm*H_e + k_e/v1*L_c;
  H_e' = k_mi/v0*H_m + k_om*L_e - (k_cm + k_mo)*H_e;
  L_c' = k_i*v1*L_e - (k_e + k_oc)*L_c + k_cc*H_c + k_dl*v2*L_n - k_b*(B_T - L_n)*L_c;
  H_c' = k_oc*L_c - k_cc*H_c + k_dh*v2*L_n;
  L_n' = k_b/v2*(B_T - L_n)*L_c - (k_dl + k_dh)*L_n;

  // Unit definitions:
  unit volume = 1e-3 litre;
  unit substance = 1e-3 mole;
end
