// SBML level 2 version 4
// dcterms:bibliographicCitation: urn:miriam:doi:10.1016/j.cnsns.2020.105570

function Constant_flux__irreversible(v)
  v;
end
Constant_flux__irreversible is "Constant flux (irreversible)";

function Rate_Law_for_CARTcell_proliferation(rho_c, L, B, C, beta, I_0, C_50)
  rho_c*(L + B)*C + rho_c*beta*I_0/(1 + C/C_50);
end

function Rate_Law_for_Leukaemia_proliferation(rho_L, L)
  rho_L*L;
end

function Rate_Law_for_Leukaemia_death(alpha, L, C)
  alpha*L*C;
end

function Rate_Law_for_Bcell_death(alpha, B, C, tao_B)
  alpha*B*C + 1/tao_B*B;
end

function Rate_Law_for_CARTcell_death(tao_c, C)
  1/tao_c*C;
end

function Rate_Law_for_Bcell_proliferation(I_0, tao_I, C, C_50)
  I_0/tao_I/(1 + C/C_50);
end

model Leon_Triana2020___CAR_T_cell_therapy_in_B_cell_acute_lymphoblastic_leukaemia_with_contribution_from_immature_B_cells()
  // Leon-Triana2020 - CAR T-cell therapy in B-cell acute lymphoblastic leukaemia with contribution from immature B cells
  // This model is based on the publication:
  // "CAR T cell therapy in B-cell acute lymphoblastic leukaemia: Insights from mathematical models".
  // Odelaisy León-Triana, Soukaina Sabir, Gabriel F. Calvo, Juan Belmonte-Beitia, Salvador Chulián, Álvaro Martínez-Rubio, María Rosa, Antonio Pérez-Martínez, Manuel Ramirez-Orellana, Víctor M. Pérez-García
  // doi: 10.1016/j.cnsns.2020.105570
  // This model is based on equations (3a)-(3c) from the paper.
  // Abstract:
  // Immunotherapies use components of the patient immune system to selectively target can- cer cells. The use of chimeric antigenic receptor (CAR) T cells to treat B-cell malignancies –leukaemias and lymphomas–is one of the most successful examples, with many patients experiencing long-lasting full responses to this therapy. This treatment works by extract- ing the patient’s T cells and transducing them with the CAR, enabling them to recognize and target cells carrying the antigen CD19 + , which is expressed in these haematological cancers. Here we put forward a mathematical model describing the time response of leukaemias to the injection of CAR T cells. The model accounts for mature and progenitor B-cells, leukaemic cells, CAR T cells and side effects by including the main biological processes involved. The model explains the early post-injection dynamics of the different compart- ments and the fact that the number of CAR T cells injected does not critically affect the treatment outcome. An explicit formula is found that gives the maximum CAR T cell ex- pansion in vivo and the severity of side effects. Our mathematical model captures other known features of the response to this immunotherapy. It also predicts that CD19 + cancer relapses could be the result of competition between leukaemic and CAR T cells, analogous to predator-prey dynamics. We discuss this in the light of the available evidence and the possibility of controlling relapses by early re-challenging of the leukaemia cells with stored CAR T cells.
  // biomodels.db:MODEL2107120002 biomodels.db:BIOMD0000001012
  // occursIn BTO:0000089
  // hasTaxon taxonomy:9606
  // isDescribedBy doi:10.1016/j.cnsns.2020.105570
  // hasProperty HP:0004812 ncit:C15262 DOID:1037 ncit:C126102 GO:0002376 mamo:MAMO_0000046
  // isDescribedBy doi:10.1016/j.cnsns.2020.105570

  // Compartments:
  compartment Whole_organism_blood = 1;  // isVersionOf BTO:0000089; isVersionOf ncit:C13413

  // Species:
  species CAR_T_cells in Whole_organism_blood = 10000000; CAR_T_cells is "CAR_T-cells";  // isVersionOf CL:0000084; isVersionOf ncit:C137999
  species Leukaemic_B_cells in Whole_organism_blood = 5e10;  // isVersionOf ncit:C41073; hasProperty ncit:C18128
  species B_cells_healthy in Whole_organism_blood = 2.5e10;  // isVersionOf CL:0000785; hasProperty ncit:C115935
  species B_cell_progenitors in Whole_organism_blood = I_0;  // CL:0011026; isVersionOf CL:0000826; hasProperty ncit:C129255

  // Parameters:
  tao_B = 60 unit_0;
  rho_L = 0.03333333 unit_1;
  tao_C = 14 unit_0;
  rho_C has unit_2;
  alpha = 4.5e-11 unit_2;
  tao_I = 6 unit_0;
  beta = 0.1;
  C_50 = 1000000000 unit_3;
  I_0 = 10000000 unit_4;

  // Assignment rules:
  rho_C := 0.25*alpha;
  k := rho_C/alpha;

  // Reactions:
  CARTcell_proliferation: => CAR_T_cells; Whole_organism_blood*Rate_Law_for_CARTcell_proliferation(rho_C, Leukaemic_B_cells, B_cells_healthy, CAR_T_cells, beta, I_0, C_50);  // modifiers: Leukaemic_B_cells, B_cells_healthy; isVersionOf GO:0042098
  CARTcell_death: CAR_T_cells => ; Whole_organism_blood*Rate_Law_for_CARTcell_death(tao_C, CAR_T_cells);  // isVersionOf GO:0008219
  Leukaemia_proliferation: => Leukaemic_B_cells; Whole_organism_blood*Rate_Law_for_Leukaemia_proliferation(rho_L, Leukaemic_B_cells);  // isVersionOf ncit:C28378
  Leukaemia_death: Leukaemic_B_cells => ; Whole_organism_blood*Rate_Law_for_Leukaemia_death(alpha, Leukaemic_B_cells, CAR_T_cells);  // modifiers: CAR_T_cells; isVersionOf GO:0008219
  Bcell_death: B_cells_healthy => ; Whole_organism_blood*Rate_Law_for_Bcell_death(alpha, B_cells_healthy, CAR_T_cells, tao_B);  // modifiers: CAR_T_cells; isVersionOf GO:0008219
  Bcell_proliferation: B_cell_progenitors => B_cells_healthy; Whole_organism_blood*Rate_Law_for_Bcell_proliferation(I_0, tao_I, CAR_T_cells, C_50);  // modifiers: CAR_T_cells; isVersionOf GO:0042100
  proBcell_proliferation: => B_cell_progenitors; Whole_organism_blood*Constant_flux__irreversible(I_0);  // isVersionOf GO:0042100

  // Unit definitions:
  unit length = metre;
  unit area = metre^2;
  unit volume = litre;
  unit time = 86400 second;
  unit substance = item;
  unit unit_0 = 86400 second; unit_0 is "d";
  unit unit_1 = 1 / (86400 second); unit_1 is "1/d";
  unit unit_2 = 1 / (86400 second * item); unit_2 is "1/(d*#)";
  unit unit_3 = item; unit_3 is "#";
  unit unit_4 = item / (86400 second); unit_4 is "#/d";
end
