// SBML level 2 version 4
// dcterms:bibliographicCitation: urn:miriam:pubmed:9015458

function Rate_Law_for_delta_activation(G, rho)
  G/rho;
end

function Rate_Law_for_delta_inhibition(d, rho)
  rho*d;
end

function Rate_law_for_notch_inhibition(mu, n)
  mu*n;
end

function Rate_law_for_notch_activation(F)
  F;
end

model Collier1996___Delta_Notch_intercellular_signalling_and_lateral_inhibition()
  // Collier1996 - Delta Notch intercellular signalling and lateral inhibition
  // ODE model describing how slight variations in Notch and Delta cellular concentrations, through lateral inhibition, lead to cells with different states of differentiation. Lateral inhibition is a process whereby a given cell adopting a given fate prevents its immediate neighbouring cells from doing likewise. Notch and Delta are interacting transmembrane proteins and according to this model, lateral inhibition is due to a process where the inhibited cells (where notch has been activated by Delta) loose their ability to inhibit other cells (by synthesizing Delta). This process creates a feedback loop where cells with more delta proteins on their surface inhibit their immediate neighbours and adopt a different cell fate than those neighbours.
  // biomodels.db:MODEL2204050001 biomodels.db:BIOMD0000001047
  // occursIn BTO:0006223
  // hasTaxon taxonomy:7215
  // isDescribedBy pubmed:9015458
  // hasProperty GO:0046331 GO:0007219 GO:0009888 mamo:MAMO_0000046
  // isDescribedBy pubmed:9015458

  // Compartments:
  compartment cell_1___plasma_membrane = 1; cell_1___plasma_membrane is "cell 1 - plasma membrane";  // isVersionOf GO:0005886
  compartment cell_2___plasma_membrane = 1; cell_2___plasma_membrane is "cell 2 - plasma membrane";  // isVersionOf GO:0005886

  // Species:
  species delta1 in cell_1___plasma_membrane = 1;  // isVersionOf uniprot:P10041
  species delta2 in cell_2___plasma_membrane = 0.99;  // isVersionOf uniprot:P10041
  species notch1 in cell_1___plasma_membrane = 1;  // isVersionOf uniprot:P07207; isVersionOf ncit:C113838
  species notch2 in cell_2___plasma_membrane = 0.99;  // isVersionOf ncit:C113838; isVersionOf uniprot:P07207

  // Parameters:
  a = 0.01;
  b = 100;
  h = 2;
  k = 2;
  mu = 1;
  rho = 1;
  Initial_for_a = a;
  Initial_for_b = b;
  Initial_for_h = h;
  Initial_for_k = k;

  // Assignment rules:
  G1 := 1/(1 + Initial_for_b*notch1^Initial_for_h);
  G2 := 1/(1 + Initial_for_b*notch2^Initial_for_h);
  F1 := delta1^Initial_for_k/(Initial_for_a + delta1^Initial_for_k);
  F2 := delta2^Initial_for_k/(Initial_for_a + delta2^Initial_for_k);

  // Reactions:
  notch1_activation: => notch1; cell_1___plasma_membrane*Rate_law_for_notch_activation(F2);
  notch2_activation: => notch2; cell_2___plasma_membrane*Rate_law_for_notch_activation(F1);
  delta2_activation: => delta2; cell_2___plasma_membrane*Rate_Law_for_delta_activation(G2, rho);
  delta1_activation: => delta1; cell_1___plasma_membrane*Rate_Law_for_delta_activation(G1, rho);
  delta1_inhibition: delta1 => ; cell_1___plasma_membrane*Rate_Law_for_delta_inhibition(delta1, rho);
  delta2_inhibition: delta2 => ; cell_2___plasma_membrane*Rate_Law_for_delta_inhibition(delta2, rho);
  notch1_inhibition: notch1 => ; cell_1___plasma_membrane*Rate_law_for_notch_inhibition(mu, notch1);
  notch2_inhibition: notch2 => ; cell_2___plasma_membrane*Rate_law_for_notch_inhibition(mu, notch2);

  // Unit definitions:
  unit length = metre;
  unit area = metre^2;
  unit volume = litre;
  unit time = second;
  unit substance = mole;
end
