// SBML level 2 version 4
// dcterms:bibliographicCitation: urn:miriam:doi:10.1016/j.jtbi.2021.110685

function function_1(s, rho, c)
  s*rho*c;
end

model Chulian2021___feedback_signalling_in_B_lymphopoeisis()
  // Chulian2021 - feedback signalling in B lymphopoeisis
  // biomodels.db:MODEL2205170001 biomodels.db:BIOMD0000001056
  // occursIn BTO:0000141
  // hasTaxon taxonomy:9606
  // isDescribedBy doi:10.1016/j.jtbi.2021.110685
  // hasProperty GO:0006955 GO:0030097 mamo:MAMO_0000046
  // isDescribedBy doi:10.1016/j.jtbi.2021.110685

  // Compartments:
  compartment Bone_marrow = 1;  // BTO:0000141

  // Species:
  species C1 in Bone_marrow = 1000000;  // isVersionOf ncit:C32766
  species C2 in Bone_marrow = 0;  // isVersionOf ncit:C12474
  species C3 in Bone_marrow = 0;  // isVersionOf ncit:C33058

  // Parameters:
  k = 1e-10;
  rho1 = 0.0289;
  rho2 = 0.0193;
  alpha1 = 0.008;
  alpha2 = 0.006;
  alpha3 = 0.02;
  Initial_for_k = k;

  // Assignment rules:
  s1 := 1/(1 + Initial_for_k*C3);
  s2 := 1/(1 + Initial_for_k*(C1 + C2 + C3));

  // Reactions:
  Proliferation_of_early_B_cells: => C1; Bone_marrow*function_1(s2, rho1, C1); Proliferation_of_early_B_cells is "Proliferation of early B-cells";
  transition_from_early_B_cells_to_intermediate_B_cells: C1 => C2; Bone_marrow*alpha1*C1; transition_from_early_B_cells_to_intermediate_B_cells is "transition from early B-cells to intermediate B-cells";  // isVersionOf sbo:C18314
  Proliferation_of_intermediate_B_cells: => C2; Bone_marrow*function_1(s2, rho2, C2); Proliferation_of_intermediate_B_cells is "Proliferation of intermediate B-cells";
  Transition_of_intermediate_B_cells_to_late_B_cells: C2 => C3; Bone_marrow*alpha2*C2; Transition_of_intermediate_B_cells_to_late_B_cells is "Transition of intermediate B-cells to late B-cells";  // isVersionOf sbo:C18314
  Blood_transition_of_late_B_cells: C3 => ; Bone_marrow*alpha3*C3; Blood_transition_of_late_B_cells is "Blood transition of late B-cells";  // isVersionOf sbo:C12434

  // Unit definitions:
  unit length = metre;
  unit area = metre^2;
  unit volume = dimensionless^0;
  unit time = 3600 second;
  unit substance = item;
end
