// SBML level 2 version 4
// dcterms:bibliographicCitation: urn:miriam:doi:10.1016/j.jtbi.2020.110252

function Constant_flux__irreversible(v)
  v;
end
Constant_flux__irreversible is "Constant flux (irreversible)";

function Hill_function(k4, y1, g, K)
  k4*y1^g/(K + y1^g);
end

function function_1(k2, y2)
  k2*y2;
end

model Nikolov2020___p53_miR34_model()
  // Nikolov2020 - p53-miR34 model
  // biomodels.db:MODEL2205180001 biomodels.db:BIOMD0000001057
  // isVersionOf GO:0072331
  // occursIn ncit:C48694
  // hasTaxon taxonomy:9606
  // isDescribedBy doi:10.1016/j.jtbi.2020.110252
  // hasProperty GO:0006281 GO:0090398 ncit:C17557 mamo:MAMO_0000046

  // Compartments:
  compartment cell = 1;  // ncit:C48694

  // Species:
  species TFp53 in cell = 0;  // uniprot:P04637
  species miR34a in cell = 0;

  // Parameters:
  k1 = 0.5;
  k2 = 1;
  k3 = 0.001;
  k4 = 0.06;
  k5 = 0.1;
  K = 1;
  g = 1;

  // Reactions:
  Constant_synthesis_of_TFp53: => TFp53; cell*Constant_flux__irreversible(k1);
  Positive_feedback_loop_through_miR34: => TFp53; cell*function_1(k2, miR34a);  // modifiers: miR34a; isVersionOf ncit:C82652
  Degradation_of_P53: TFp53 => ; cell*k3*TFp53;
  Transcriptional_activation_of_miR43a_by_p53: => miR34a; cell*Hill_function(k4, TFp53, g, K);  // modifiers: TFp53
  Degradation_of_miR34a: miR34a => ; cell*k5*miR34a;

  // Unit definitions:
  unit length = metre;
  unit area = metre^2;
  unit volume = litre;
  unit time = dimensionless^0;
  unit substance = 1e-3 mole;
end
