// SBML level 2 version 4
// dcterms:bibliographicCitation: urn:miriam:doi:10.1016/j.cub.2022.04.016

function function_3(k1, k2, b, substrate)
  (k1 + k2*b)*substrate;
end

function Constant_flux__irreversible(v)
  v;
end
Constant_flux__irreversible is "Constant flux (irreversible)";

function function_16(kass_, MBF, NRM1t, MBFtot)
  kass_*MBF*(NRM1t - (MBFtot - MBF));
end

function function_4(k, substrate, modifier)
  k*substrate*modifier;
end

function function_15(kdis, MBFtot, MBF)
  kdis*(MBFtot - MBF);
end

function function_7(k1, a, n, k2, k3)
  k1 + k2*a^n/(k3^n + a^n);
end

function function_8(kdsic_, kdsic, Clb, Cln, Jsic1, Sic1t)
  (kdsic_ + kdsic*Clb*(Cln + Clb)/(Jsic1 + Cln + Clb))*Sic1t;
end

function function_2(k, param)
  k*param;
end

function function_10(kisbf, ClbM, SBF, Jsbf)
  kisbf*ClbM*SBF/(Jsbf + SBF);
end

function function_9(kasbf_, kasbf, Cln, SBF, Jscbf)
  (kasbf_ + kasbf*Cln)*(1 - SBF)/(Jscbf + 1 - SBF);
end

function function_13(kacdc14, Polo, Cdc14, Jcdc14)
  kacdc14*Polo*(1 - Cdc14)/(Jcdc14 + 1 - Cdc14);
end

function function_14(kicdc14, Cdc14, Jcdc14)
  kicdc14*Cdc14/(Jcdc14 + Cdc14);
end

function function_11(kacdh1_, kacdh1, Cdc14, Cdh1, Jcdh1)
  (kacdh1_ + kacdh1*Cdc14)*(1 - Cdh1)/(Jcdh1 + 1 - Cdh1);
end

function function_1(k, modifier)
  k*modifier;
end

function function_12(kicdh1_, Cln, kicdh1, Clb, Cdh1, Jcdh1)
  (kicdh1_*Cln + kicdh1*Clb)*Cdh1/(Jcdh1 + Cdh1);
end

model Novak2022___Mitotic_kinase_oscillation()
  // Novak2022 - Mitotic kinase oscillation
  // biomodels.db:MODEL2205190001 biomodels.db:BIOMD0000001058
  // occursIn GO:0005737
  // hasTaxon taxonomy:9606
  // isDescribedBy doi:10.1016/j.cub.2022.04.016
  // hasProperty GO:0055047 mamo:MAMO_0000046
  // isDescribedBy doi:10.1016/j.cub.2022.04.016

  // Compartments:
  compartment compartment = 1;

  // Species:
  species Cln in compartment = 0.1;  // isVersionOf uniprot:P24867
  species ClbSt in compartment = 1;  // isVersionOf uniprot:P30283
  species MBF in compartment = 0.05;  // hasPart uniprot:P09959; hasPart uniprot:P39678; isVersionOf GO:0032991; isVersionOf ncit:C17207
  species Nrm1t in compartment = 0.509;  // isVersionOf ncit:C18527
  species ClbMt in compartment = 1;  // hasPart uniprot:P24869; hasPart uniprot:P00546; isVersionOf GO:0032991
  species Polo in compartment = 0.25;  // occursIn ncit:C28597
  species Sic1t in compartment = 0;  // isVersionOf CHEBI:48706
  species SBF in compartment = 1;  // isVersionOf ncit:C26199; isVersionOf GO:0032991
  species Cdh1 in compartment = 0;  // isVersionOf CHEBI:48706
  species Cdc14 in compartment = 0.1;  // isVersionOf uniprot:Q00684

  // Parameters:
  kscln = 0.2;
  kdcln = 0.2;
  kasbf = 1; kasbf is "kasbf'";
  kasbf_0 = 10;
  kisbf = 25;
  jsbf = 1;
  ksclbs = 0.15;
  kdclbs = 0.1; kdclbs is "kdclbs'";
  kdclbs_0 = 0.05;
  ksnrm1 = 0.05;
  kdnrm1 = 0.1;
  MBFtot = 0.5;
  kass = 1; kass is "kass'";
  kdiss = 0.001; kdiss is "kdiss'";
  Jmbf = 0.01;
  ksclbm = 0.01; ksclbm is "ksclbm'";
  ksclbm_0 = 0.01;
  kdclbm = 0.01; kdclbm is "kdclbm'";
  kdclbm_0 = 1;
  Jclbm = 0.05;
  n = 2;  // isVersionOf ncit:C67363
  kspolo = 0.01;
  kdpolo = 0.01; kdpolo is "kdpolo'";
  kdpolo_0 = 1;
  kacdc14 = 1;
  kicdc14 = 0.25;
  jcdc14 = 0.01;
  kssic = 0.02; kssic is "kssic'";
  kdsic = 0.01; kdsic is "kdsic'";
  kdsic_0 = 2;
  Jsic1 = 0.01;
  Kdiss = 0.05;
  kacdh1 = 1; kacdh1 is "kacdh1'";
  kacdh1_0 = 10;
  kicdh1 = 0.2; kicdh1 is "kicdh1'";
  kicdh1_0 = 10;
  Jcdh1 = 0.01;
  ndClbM = 0;  // isVersionOf ncit:C67363
  Initial_for_Jmbf = Jmbf;
  Initial_for_Kdiss = Kdiss;
  Initial_for_ndClbM = ndClbM;

  // Assignment rules:
  Clbt := ClbSt + ClbMt + Initial_for_ndClbM;
  BB := Sic1t + Clbt + Initial_for_Kdiss;
  Sic1Clb := 2*Sic1t*Clbt/(BB + sqrt(BB^2 - 4*Sic1t*Clbt));
  ClbM := (ClbMt + Initial_for_ndClbM)*(Clbt - Sic1Clb)/Clbt;
  MBFa := MBF*Cln/(Initial_for_Jmbf + Cln);
  Clb := Clbt - Sic1Clb;
  ClbS := ClbSt*(Clbt - Sic1Clb)/Clbt;

  // Reactions:
  Transcription_of_Cln: => Cln; compartment*function_1(kscln, SBF);  // modifiers: SBF; isVersionOf GO:0009299
  Autoregulation_of_Cln_synthesis: Cln => ; compartment*kdcln*Cln;  // isVersionOf GO:1902893
  Activation_by_MBF_of_ClbS_transcription: => ClbSt; compartment*function_2(ksclbs, MBFa);  // isVersionOf ncit:C17554
  Degradation_of_ClbS: ClbSt => ; compartment*function_3(kdclbs, kdclbs_0, Cdh1, ClbSt);  // modifiers: Cdh1; isVersionOf ncit:C61559
  Synthesis_of_MBF: => MBF; compartment*function_15(kdiss, MBFtot, MBF);  // isVersionOf ncit:C61408
  Transcriptional_repression_of_MBF_by_Nrm1t: MBF => ; compartment*function_16(kass, MBF, Nrm1t, MBFtot);  // modifiers: Nrm1t; isVersionOf ncit:C17554
  Activation_of_Nrm1_transcription_by_MBF: => Nrm1t; compartment*function_2(ksnrm1, MBFa);  // isVersionOf ncit:C17554
  Degradation_of_Nrm1_by_APC_C_Cdh1_complex: Nrm1t => ; compartment*function_4(kdnrm1, Nrm1t, Cdh1); Degradation_of_Nrm1_by_APC_C_Cdh1_complex is "Degradation of Nrm1 by APC/C-Cdh1 complex";  // modifiers: Cdh1; isVersionOf ncit:C61559
  Autocatalytic_synthesis_of_ClbMt: => ClbMt; compartment*function_7(ksclbm, ClbM, n, ksclbm_0, Jclbm);  // isVersionOf ncit:C61408
  APC_C_Cdh1_dependent_degradation_of_M_phase_cyclins: ClbMt => ; compartment*function_3(kdclbm, kdclbm_0, Cdh1, ClbMt); APC_C_Cdh1_dependent_degradation_of_M_phase_cyclins is "APC/C-Cdh1 dependent degradation of M-phase cyclins";  // modifiers: Cdh1; isVersionOf ncit:C61559
  Cdk1_dependent_synthesis_of_Polo_kinase: => Polo; compartment*function_2(kspolo, ClbM); Cdk1_dependent_synthesis_of_Polo_kinase is "Cdk1-dependent synthesis of Polo-kinase";  // isVersionOf ncit:C61408
  Cdh1_dependent_degradation_of_Polo: Polo => ; compartment*function_3(kdpolo, kdpolo_0, Cdh1, Polo); Cdh1_dependent_degradation_of_Polo is "Cdh1-dependent degradation of Polo";  // modifiers: Cdh1; isVersionOf ncit:C61559
  Constant_synthesis_of_Sic1: => Sic1t; compartment*Constant_flux__irreversible(kssic);  // isVersionOf ncit:C61408
  Sic1_phosphorylation_catalyzed_by_Clb_and_Cln_kinases_followed_by_Sic1_degradation: Sic1t => ; compartment*function_8(kdsic, kdsic_0, Clb, Cln, Jsic1, Sic1t);  // modifiers: Cln; isVersionOf ncit:C61559
  Activation_of_SBF_by_Cln: => SBF; compartment*function_9(kasbf, kasbf_0, Cln, SBF, jsbf);  // modifiers: Cln
  Inhibition_of_SBF_by_Cdk1: SBF => ; compartment*function_10(kisbf, ClbM, SBF, jsbf);
  Activation_of_Cdh1_by_Cln: => Cdh1; compartment*function_11(kacdh1, kacdh1_0, Cdc14, Cdh1, Jcdh1);  // modifiers: Cdc14
  Inhibition_of_Cdh1_Cdk1: Cdh1 => ; compartment*function_12(kicdh1, Cln, kicdh1_0, Clb, Cdh1, Jcdh1);  // modifiers: Cln
  Activation_of_Cdc14_by_Cln: => Cdc14; compartment*function_13(kacdc14, Polo, Cdc14, jcdc14);  // modifiers: Polo
  Inhibition_of_Cdc14_by_Cdk1: Cdc14 => ; compartment*function_14(kicdc14, Cdc14, jcdc14);

  // Unit definitions:
  unit length = metre;
  unit area = metre^2;
  unit volume = litre;
  unit time = dimensionless^0;
  unit substance = item;
end
