// SBML level 2 version 4
// dcterms:bibliographicCitation: urn:miriam:doi:10.1016/j.jtbi.2020.110511

function Constant_flux__irreversible(v)
  v;
end
Constant_flux__irreversible is "Constant flux (irreversible)";

function function_1(a1, Hplus_x1, S1, Hmin_x2)
  (a1*Hplus_x1 + S1)*Hmin_x2;
end

function function_3(S_i, H_minx_j)
  S_i*H_minx_j;
end

function function_2(a2, Hplus_x2)
  a2*Hplus_x2;
end

model Frank2021___Macrophage_polarization()
  // Frank2021 - Macrophage polarization
  // The model describes the mechanisms by which macrophages differentiate into a given phenotype. The model shows that both extracellular and intracellular signalling are both important for that process. More specifically, STAT1 activity favors macrophages polarization towards M1 phenotype and STAT6 activity favors macrophage polarization towards M2 phenotype. However, these polarizations are can be reversed by molecular signalling.
  // biomodels.db:MODEL2205230001 biomodels.db:BIOMD0000001060
  // occursIn BTO:0000801
  // hasTaxon taxonomy:9606
  // isDescribedBy doi:10.1016/j.jtbi.2020.110511
  // hasProperty GO:0042116 mamo:MAMO_0000046
  // isDescribedBy doi:10.1016/j.jtbi.2020.110511

  // Compartments:
  compartment Macrophage = 1;  // BTO:0000801

  // Species:
  species x1 in Macrophage = 1.2;  // uniprot:P42224
  species x2 in Macrophage = 2;  // uniprot:P42226

  // Parameters:
  a1 = 5;
  a2 = 5;
  b1 = 0.05;
  b2 = 0.05;
  n1 = 6;  // isVersionOf ncit:C48923
  n2 = 6;  // isVersionOf ncit:C48923
  k1 = 1;  // isVersionOf sbo:C48228
  k2 = 1;  // isVersionOf sbo:C48228
  l1 = 1;  // isVersionOf ncit:C48923
  l2 = 1;  // isVersionOf ncit:C48923
  p1 = 0.5;  // isVersionOf ncit:C48228
  p2 = 1;  // isVersionOf ncit:C48228
  q1 = 5;
  q2 = 5;
  S1 = 3.75;  // isVersionOf CHEBI:5939
  S2 = 3.75;  // isVersionOf ncit:C20508

  // Assignment rules:
  H_plus_x1 := x1^n1/(x1^n1 + k1^n1);
  H_min_x_1 := p1^l1/(p1^l1 + x1^l1);
  H_plus_x2 := x2^n2/(x2^n2 + k2^n2);
  H_min_x2 := p2^l2/(p2^l2 + x2^l2);

  // Reactions:
  _1: => x1; Macrophage*function_1(a1, H_plus_x1, S1, H_min_x2);
  _2: => x1; Macrophage*Constant_flux__irreversible(b1);  // isVersionOf ncit:C90067
  _3: x1 => ; Macrophage*q1*x1;
  _4: => x2; Macrophage*function_2(a2, H_plus_x2);
  _5: => x2; Macrophage*function_3(S2, H_min_x_1);
  _6: => x2; Macrophage*Constant_flux__irreversible(b2);  // isVersionOf ncit:C90067
  _7: x2 => ; Macrophage*q2*x2;

  // Unit definitions:
  unit length = metre;
  unit area = metre^2;
  unit volume = dimensionless^0;
  unit time = dimensionless^0;
  unit substance = item;
end
