<?xml version="1.0" encoding="UTF-8"?>
<neuroml xmlns="http://www.neuroml.org/schema/neuroml2"
    xmlns:xsi="http://www.w3.org/2001/XMLSchema-instance"
    xsi:schemaLocation="http://www.neuroml.org/schema/neuroml2  https://raw.githubusercontent.com/NeuroML/NeuroML2/development/Schemas/NeuroML2/NeuroML_v2beta4.xsd"
    id="FN">

    <!-- parameter set for relaxation oscillator -->
    <fitzHughNagumo1969Cell id="FN" a="0.7" b="0.8" I="1" phi="0.08" V0="0.0" W0="0.0"/>

    <network id="net1">
        <population id="fn1pop" component="FN" size="1"/>
    </network>

</neuroml>
